  <aerodynamics>

    <axis name="LIFT">
	<function name="aero/CL_base">
	    <table>
		<independentVar lookup="row">velocities/mach</independentVar>
		<independentVar lookup="column">aero/alpha-deg</independentVar>
		<independentVar lookup="table">aero/beta-deg</independentVar>
		<tableData breakPoint="-10.00000">
                    -10.00     -5.00      0.00      5.00     10.00     15.00     20.00     30.00
		    0.20000  -0.46626  -0.14142   0.18638   0.50290   0.80325   1.06794   1.27781   1.53861
		    0.50000  -0.48987  -0.14836   0.19778   0.53330   0.84679   1.12899   1.35162   1.62595
		    0.90000  -0.59932  -0.17903   0.24915   0.66373   1.05782   1.41080   1.70226   2.04367
		</tableData>

		<tableData breakPoint="0.00000">
                    -10.00     -5.00      0.00      5.00     10.00     15.00     20.00     30.00
		    0.20000  -0.47423  -0.14206   0.18760   0.51448   0.81327   1.09116   1.32133   1.58419
		    0.50000  -0.49969  -0.14899   0.19880   0.54670   0.86248   1.15250   1.39540   1.67712
		    0.90000  -0.61760  -0.18222   0.24979   0.68395   1.09109   1.45447   1.75634   2.11040
		</tableData>

		<tableData breakPoint="10.00000">
                    -10.00     -5.00      0.00      5.00     10.00     15.00     20.00     30.00
		    0.20000  -0.46625  -0.14142   0.18638   0.50290   0.80325   1.06794   1.27781   1.53862
		    0.50000  -0.48987  -0.14836   0.19778   0.53330   0.84679   1.12899   1.35163   1.62595
		    0.90000  -0.59932  -0.17903   0.24914   0.66373   1.05782   1.41080   1.70226   2.04367
		</tableData>
	    </table>
	</function>

	<function name="aero/force/Lift_alpha">
	    <description>Lift due to alpha</description>
	    <product>
		<property>aero/qbar-psf</property>
		<property>metrics/Sw-sqft</property>
		<!-- aeromatic
		     <table>
		     <independentVar lookup="row">aero/alpha-rad</independentVar>
		     <tableData>
		     -0.20 -0.5783
		     0.00  0.3213
		     0.28  1.5937
		     0.60  0.8303
		     </tableData>
		     </table> -->
		<property>aero/CL_base</property>
		<difference>
		    <value>1</value>
		    <product>
			<property>fcs/wing-fold/wing-fold-pos</property>
			<value>0.9</value>
		    </product>
		</difference>
	    </product>
	</function>

      <function name="aero/force/Lift_pitch_rate">
        <description>Lift due to pitch rate</description>
        <product>
          <property>aero/qbar-psf</property>
          <property>metrics/Sw-sqft</property>
          <property>velocities/q-aero-rad_sec</property>
          <property>aero/ci2vel</property>
          <value> 4.2695 </value>
        </product>
      </function>

      <function name="aero/force/Lift_alpha_rate">
        <description>Lift due to alpha rate</description>
        <product>
          <property>aero/qbar-psf</property>
          <property>metrics/Sw-sqft</property>
          <property>aero/alphadot-rad_sec</property>
          <property>aero/ci2vel</property>
          <value> 2.3362 </value>
        </product>
      </function>

      <function name="aero/force/Lift_elevator">
	<description>Lift due to Elevator Deflection</description>
	<product>
          <property>aero/qbar-psf</property>
          <property>metrics/Sw-sqft</property>
          <property>fcs/elevator-pos-rad</property>
          <value> 0.3777 </value>
	</product>
      </function>

      <function name="aero/CL_flap_30">
	  <table>
	      <independentVar lookup="row">velocities/mach</independentVar>
	      <independentVar lookup="column">aero/alpha-deg</independentVar>
	      <independentVar lookup="table">aero/beta-deg</independentVar>
	      <tableData breakPoint="-10.00000">
                  -10.00     -5.00      0.00      5.00     10.00     15.00     20.00     30.00
		  0.20000   0.63936   0.62483   0.60197   0.58967   0.54008   0.49139   0.44446   0.31332
		  0.50000   0.68550   0.67176   0.64376   0.62242   0.57842   0.51044   0.46434   0.33325
		  0.90000   0.95115   0.93050   0.90215   0.85809   0.79212   0.72203   0.63488   0.44758
	      </tableData>

	      <tableData breakPoint="0.00000">
                  -10.00     -5.00      0.00      5.00     10.00     15.00     20.00     30.00
		  0.20000   0.65170   0.63377   0.60676   0.57550   0.54055   0.50175   0.44541   0.34588
		  0.50000   0.70042   0.68110   0.65549   0.62108   0.59475   0.53343   0.47866   0.36017
		  0.90000   0.97735   0.94427   0.91650   0.87783   0.81976   0.74732   0.65105   0.46747
	      </tableData>

	      <tableData breakPoint="10.00000">
                  -10.00     -5.00      0.00      5.00     10.00     15.00     20.00     30.00
		  0.20000   0.63935   0.62483   0.60197   0.58968   0.54009   0.49139   0.44446   0.31331
		  0.50000   0.68550   0.67176   0.64375   0.62241   0.57843   0.51043   0.46432   0.33325
		  0.90000   0.95115   0.93049   0.90215   0.85809   0.79212   0.72204   0.63488   0.44758
	      </tableData>

	  </table>
      </function>

      <function name="aero/CL_flap_40">
	  <table>
	      <independentVar lookup="row">velocities/mach</independentVar>
	      <independentVar lookup="column">aero/alpha-deg</independentVar>
	      <independentVar lookup="table">aero/beta-deg</independentVar>
	      <tableData breakPoint="-10.00000">
                  -10.00     -5.00      0.00      5.00     10.00     15.00     20.00     30.00
		  0.20000   0.74930   0.72702   0.69683   0.67700   0.62071   0.55829   0.50356   0.35183
		  0.50000   0.80039   0.78366   0.74563   0.71879   0.67015   0.58665   0.52721   0.37151
		  0.90000   1.11299   1.08643   1.04432   0.98850   0.90773   0.81739   0.71874   0.49825
	      </tableData>

	      <tableData breakPoint="0.00000">
                  -10.00     -5.00      0.00      5.00     10.00     15.00     20.00     30.00
		  0.20000   0.76139   0.73837   0.70418   0.66692   0.61982   0.56841   0.50484   0.38534
		  0.50000   0.81895   0.79281   0.76122   0.71442   0.67027   0.60575   0.54032   0.40231
		  0.90000   1.14502   1.10169   1.06437   1.01214   0.93802   0.84914   0.73406   0.52051
	      </tableData>

	      <tableData breakPoint="10.00000">
                  -10.00     -5.00      0.00      5.00     10.00     15.00     20.00     30.00
		  0.20000   0.74929   0.72702   0.69684   0.67699   0.62071   0.55829   0.50356   0.35182
		  0.50000   0.80040   0.78366   0.74563   0.71871   0.67016   0.58664   0.52719   0.37152
		  0.90000   1.11299   1.08643   1.04432   0.98850   0.90774   0.81740   0.71874   0.49827
	      </tableData>

	  </table>
      </function>

      <function name="aero/CL_flap">
	  <interpolate1d>
	      <property>fcs/surfaces/flap-pos-deg</property>
	      <value>0</value> <value>0</value>
	      <value>30</value> <property>aero/CL_flap_30</property>
	      <value>40</value> <property>aero/CL_flap_40</property>
	  </interpolate1d>
      </function>

      <function name="aero/force/Lift_flap">
	<description>Delta Lift due to flaps</description>
	<product>
          <property>aero/qbar-psf</property>
          <property>metrics/Sw-sqft</property>
          <!-- <value> 0.0102 </value> -->
	  <property>aero/CL_flap</property>
	</product>
      </function>

    </axis>

    <axis name="DRAG">

      <function name="aero/force/Drag_basic">
	<description>Drag at zero lift</description>
	<product>
          <property>aero/qbar-psf</property>
          <property>metrics/Sw-sqft</property>
          <table>
            <independentVar lookup="row">aero/alpha-rad</independentVar>
            <tableData>
              -1.57    1.4086
              -0.28    0.0684
              0.00    0.0139
              0.28    0.0684
              1.57    1.4086
            </tableData>
          </table>
	</product>
      </function>

      <function name="aero/force/Drag_induced">
	<description>Induced drag</description>
        <product>
          <property>aero/qbar-psf</property>
          <property>metrics/Sw-sqft</property>
          <property>aero/cl-squared</property>
          <value> 0.0667 </value>
        </product>
      </function>

      <function name="aero/force/Drag_mach">
	<description>Drag due to mach</description>
        <product>
          <property>aero/qbar-psf</property>
          <property>metrics/Sw-sqft</property>
          <table>
            <independentVar lookup="row">velocities/mach</independentVar>
            <tableData>
              0.00    0.0000
              0.81    0.0000
              1.10    0.0230
              1.80    0.0150
            </tableData>
          </table>
        </product>
      </function>

      <function name="aero/force/Drag_beta">
	<description>Drag due to sideslip</description>
	<product>
          <property>aero/qbar-psf</property>
          <property>metrics/Sw-sqft</property>
          <table>
            <independentVar lookup="row">aero/beta-rad</independentVar>
            <tableData>
              -1.57    1.2300
              -0.26    0.0500
              0.00    0.0000
              0.26    0.0500
              1.57    1.2300
            </tableData>
          </table>
	</product>
      </function>

      <function name="aero/force/Drag_elevator">
	<description>Drag due to Elevator Deflection</description>
	<product>
          <property>aero/qbar-psf</property>
          <property>metrics/Sw-sqft</property>
          <abs><property>fcs/elevator-pos-rad</property></abs>
          <value> 0.0400 </value>
	</product>
      </function>

      <function name="aero/force/Drag_gear">
	<description>Drag due to gear</description>
        <product>
          <property>aero/qbar-psf</property>
          <property>metrics/Sw-sqft</property>
          <property>gear/gear-pos-norm</property>
          <value> 0.0200 </value>
        </product>
      </function>

      <function name="aero/force/Drag_flap">
	<description>Drag due to flaps</description>
        <product>
          <property>aero/qbar-psf</property>
          <property>metrics/Sw-sqft</property>
          <property>fcs/flap-pos-deg</property>
          <value> 0.0022 </value>
        </product>
      </function>

      <function name="aero/force/Drag_speedbrake">
	<description>Drag due to speedbrakes</description>
        <product>
          <property>aero/qbar-psf</property>
          <property>metrics/Sw-sqft</property>
          <property>fcs/speedbrake-pos-norm</property>
          <value> 0.0800 </value>
        </product>
      </function>

    </axis>

    <axis name="SIDE">

      <function name="aero/force/Side_beta">
	<description>Side force due to beta</description>
	<product>
          <property>aero/qbar-psf</property>
          <property>metrics/Sw-sqft</property>
          <property>aero/beta-rad</property>
          <value> 0.3461 </value>
	</product>
      </function>

      <function name="aero/force/Side_roll_rate">
	<description>Side force due to roll rate</description>
	<product>
          <property>aero/qbar-psf</property>
          <property>metrics/Sw-sqft</property>
          <property>aero/bi2vel</property>
          <property>velocities/p-aero-rad_sec</property>
          <table>
            <independentVar lookup="row">aero/Re</independentVar>
            <tableData>
              16998866   5.1703
              18698754   0.4100
              25498298   0.1822
              33714708   0.1042
            </tableData>
          </table>
	</product>
      </function>

      <function name="aero/force/Side_yaw_rate">
	<description>Side force due to yaw rate</description>
	<product>
          <property>aero/qbar-psf</property>
          <property>metrics/Sw-sqft</property>
          <property>aero/bi2vel</property>
          <property>velocities/r-aero-rad_sec</property>
          <value> 0.3252 </value>
	</product>
      </function>

      <function name="aero/force/Side_rudder">
	<description>Side force due to rudder</description>
	<product>
          <property>aero/qbar-psf</property>
          <property>metrics/Sw-sqft</property>
          <property>fcs/rudder-pos-rad</property>
          <value> 0.2108 </value>
	</product>
      </function>

    </axis>

    <axis name="PITCH">

      <function name="aero/moment/Pitch_alpha">
	<description>Pitch moment due to alpha</description>
	<product>
          <property>aero/qbar-psf</property>
          <property>metrics/Sw-sqft</property>
          <property>metrics/cbarw-ft</property>
          <property>aero/alpha-rad</property>
          <value> -0.1 </value> <!-- -0.9734 -->
	</product>
      </function>

      <function name="aero/moment/Pitch_elevator">
	<description>Pitch moment due to elevator</description>
	<product>
          <property>aero/qbar-psf</property>
          <property>metrics/Sw-sqft</property>
          <property>metrics/cbarw-ft</property>
          <property>fcs/surfaces/elevator-pos-rad</property>
          <table>
            <independentVar lookup="row">velocities/mach</independentVar>
            <tableData> <!-- -1.3097 -0.3274 -->
              0.0    -1.2
              2.0    -0.3
            </tableData>
          </table>
	</product>
      </function>

      <function name="aero/moment/Pitch_damp">
	<description>Pitch moment due to pitch rate</description>
	<product>
          <property>aero/qbar-psf</property>
          <property>metrics/Sw-sqft</property>
          <property>metrics/cbarw-ft</property>
          <property>aero/ci2vel</property>
          <property>velocities/q-aero-rad_sec</property>
          <value> -9.7532 </value>
	</product>
      </function>

      <function name="aero/moment/Pitch_alphadot">
	<description>Pitch moment due to alpha rate</description>
	<product>
          <property>aero/qbar-psf</property>
          <property>metrics/Sw-sqft</property>
          <property>metrics/cbarw-ft</property>
          <property>aero/ci2vel</property>
          <property>aero/alphadot-rad_sec</property>
          <value> -5.3369 </value>
	</product>
      </function>

    </axis>

    <axis name="ROLL">

      <function name="aero/moment/Roll_beta">
	<description>Roll moment due to beta</description>
	<product>
          <property>aero/qbar-psf</property>
          <property>metrics/Sw-sqft</property>
          <property>metrics/bw-ft</property>
          <property>aero/beta-rad</property>
          <table>
            <independentVar lookup="row">aero/alpha-rad</independentVar>
            <independentVar lookup="column">aero/Re</independentVar>
            <tableData>
              16998866 18698754 25498298 33714708
              -0.0349  -0.2820  -0.0206  -0.0110  -0.0139
              0.3491  -1.9915  -0.2130  -0.2334  -0.3118
            </tableData>
          </table>
	</product>
      </function>

      <function name="aero/moment/Roll_damp">
	<description>Roll moment due to roll rate</description>
	<product>
          <property>aero/qbar-psf</property>
          <property>metrics/Sw-sqft</property>
          <property>metrics/bw-ft</property>
          <property>aero/bi2vel</property>
          <property>velocities/p-aero-rad_sec</property>
          <value> -0.2862 </value>
	</product>
      </function>

      <function name="aero/moment/Roll_yaw">
	<description>Roll moment due to yaw rate</description>
	<product>
          <property>aero/qbar-psf</property>
          <property>metrics/Sw-sqft</property>
          <property>metrics/bw-ft</property>
          <property>aero/bi2vel</property>
          <property>velocities/r-aero-rad_sec</property>
          <table>
            <independentVar lookup="row">aero/alpha-rad</independentVar>
            <independentVar lookup="column">aero/Re</independentVar>
            <tableData>
              16998866 18698754 25498298 33714708
              -0.0349   0.5714   0.0731   0.0492   0.0411
              0.3491   4.5147   0.5049   0.4810   0.4729
            </tableData>
          </table>
	</product>
      </function>

      <function name="aero/CMx_right-flaperon_-51">
	  <table>
	      <independentVar lookup="row">velocities/mach</independentVar>
	      <independentVar lookup="column">aero/alpha-deg</independentVar>
	      <independentVar lookup="table">aero/beta-deg</independentVar>
	      <tableData breakPoint="-10.00000">
                  -5.00      0.00      5.00     10.00     15.00     20.00     30.00
		  0.20000   0.08324   0.08562   0.08655   0.08660   0.08577   0.08420   0.07535
		  0.50000   0.08949   0.09266   0.09351   0.09350   0.09216   0.08984   0.08014
		  0.90000   0.12153   0.13105   0.12977   0.13105   0.12954   0.12482   0.10848
	      </tableData>

	      <tableData breakPoint="0.00000">
                  -5.00      0.00      5.00     10.00     15.00     20.00     30.00
		  0.20000   0.07836   0.07998   0.08174   0.08241   0.08180   0.07914   0.06974
		  0.50000   0.08379   0.08583   0.08771   0.08846   0.08760   0.08468   0.07431
		  0.90000   0.11741   0.12084   0.12352   0.12485   0.12343   0.11876   0.10306
	      </tableData>

	      <tableData breakPoint="10.00000">
                  -5.00      0.00      5.00     10.00     15.00     20.00     30.00
		  0.20000   0.07038   0.07141   0.07451   0.07535   0.07475   0.07270   0.06304
		  0.50000   0.07493   0.07603   0.07945   0.08041   0.07955   0.07766   0.06648
		  0.90000   0.10654   0.10896   0.11231   0.11414   0.11240   0.10893   0.09441
	      </tableData>

	  </table>
      </function>

      <function name="aero/CMx_right-flaperon">
	  <interpolate1d>
	      <property>fcs/surfaces/right-flaperon-pos-deg</property>
	      <value>-51</value> <property>aero/CMx_right-flaperon_-51</property>
	      <value>0</value> <value>0</value>
	  </interpolate1d>
      </function>

      <function name="aero/moment/Roll_left_flaperon">
	<description>Roll moment due to flaperon</description>
	<product>
          <property>aero/qbar-psf</property>
          <property>metrics/Sw-sqft</property>
          <property>metrics/bw-ft</property>
	  <property>aero/CMx_left-flaperon</property>
	  <!--
          <property>fcs/surfaces/left-flaperon-pos-rad</property>
          <table>
            <independentVar lookup="row">velocities/mach</independentVar>
            <tableData>
              0.0    0.0800
              2.0    0.0200
            </tableData>
          </table>
	  -->
	</product>
      </function>

      <function name="aero/CMx_left-flaperon_-51">
	  <table>
	      <independentVar lookup="row">velocities/mach</independentVar>
	      <independentVar lookup="column">aero/alpha-deg</independentVar>
	      <independentVar lookup="table">aero/beta-deg</independentVar>
	      <tableData breakPoint="-10.00000">
                  -10.00     -5.00      0.00      5.00     10.00     15.00     20.00     30.00
		  0.20000  -0.06004  -0.06076  -0.06192  -0.06509  -0.06590  -0.06554  -0.06402  -0.05636
		  0.50000  -0.06416  -0.06480  -0.06608  -0.06959  -0.07051  -0.06996  -0.06855  -0.05949
		  0.90000  -0.09109  -0.09404  -0.09675  -0.10001  -0.10191  -0.10051  -0.09778  -0.08521
	      </tableData>

	      <tableData breakPoint="0.00000">
                  -10.00     -5.00      0.00      5.00     10.00     15.00     20.00     30.00
		  0.20000  -0.06524  -0.06736  -0.06874  -0.07048  -0.07108  -0.07071  -0.06852  -0.06088
		  0.50000  -0.07008  -0.07225  -0.07389  -0.07573  -0.07642  -0.07578  -0.07342  -0.06508
		  0.90000  -0.09957  -0.10308  -0.10609  -0.10859  -0.10988  -0.10877  -0.10477  -0.09134
	      </tableData>

	      <tableData breakPoint="10.00000">
                  -10.00     -5.00      0.00      5.00     10.00     15.00     20.00     30.00
		  0.20000  -0.06838  -0.07123  -0.07339  -0.07320  -0.07364  -0.07300  -0.07187  -0.06456
		  0.50000  -0.07402  -0.07668  -0.07965  -0.07930  -0.07957  -0.07865  -0.07675  -0.06865
		  0.90000  -0.10324  -0.10650  -0.11514  -0.11282  -0.11377  -0.11283  -0.10853  -0.09448
	      </tableData>

	  </table>
      </function>

      <function name="aero/CMx_left-flaperon">
	  <interpolate1d>
	      <property>fcs/surfaces/left-flaperon-pos-deg</property>
	      <value>-51</value> <property>aero/CMx_left-flaperon_-51</property>
	      <value>0</value> <value>0</value>
	  </interpolate1d>
      </function>

      <function name="aero/moment/Roll_right_flaperon">
	<description>Roll moment due to flaperon</description>
	<product>
          <property>aero/qbar-psf</property>
          <property>metrics/Sw-sqft</property>
          <property>metrics/bw-ft</property>
	  <property>aero/CMx_right-flaperon</property>
	  <!--
          <property>fcs/surfaces/right-flaperon-pos-rad</property>
	  <table>
            <independentVar lookup="row">velocities/mach</independentVar>
            <tableData>
              0.0   -0.0800
              2.0   -0.0200
            </tableData>
          </table>
	  -->
	</product>
      </function>

      <function name="aero/moment/Roll_rudder">
	<description>Roll moment due to rudder</description>
	<product>
          <property>aero/qbar-psf</property>
          <property>metrics/Sw-sqft</property>
          <property>metrics/bw-ft</property>
          <property>fcs/rudder-pos-rad</property>
          <value> 0.0100 </value>
	</product>
      </function>

    </axis>

    <axis name="YAW">

      <!-- Stall initiator -->

      <function name="aero/moment/Yaw_alpha">
	<description>Yaw moment due to alpha</description>
	<product>
          <property>aero/qbar-psf</property>
          <property>metrics/Sw-sqft</property>
          <property>metrics/bw-ft</property>
          <property>aero/alpha-rad</property>
          <table>
            <independentVar lookup="row">aero/beta-rad</independentVar>
            <independentVar lookup="column">aero/Re</independentVar>
            <tableData>
              16998866 18698754
              -0.3491  -1.0000   0.0000
              0.3491   1.0000   0.0000
            </tableData>
          </table>
	</product>
      </function>

      <function name="aero/moment/Yaw_beta">
	<description>Yaw moment due to beta</description>
	<product>
          <property>aero/qbar-psf</property>
          <property>metrics/Sw-sqft</property>
          <property>metrics/bw-ft</property>
          <property>aero/beta-rad</property>
          <value> 0.1926 </value> <!-- 0.1626 -->
	</product>
      </function>


      <function name="aero/moment/Yaw_roll_rate">
	<description>Yaw moment due to roll rate</description>
	<product>
          <property>aero/qbar-psf</property>
          <property>metrics/Sw-sqft</property>
          <property>metrics/bw-ft</property>
          <property>aero/bi2vel</property>
          <property>velocities/r-aero-rad_sec</property>
	  <value>-1.1</value>
	  <!--
          <table>
            <independentVar lookup="row">aero/Re</independentVar>
            <tableData>
              16998866  -0.19922
              18698754  -0.01580
              25498298  -0.00702
              33714708  -0.00402
            </tableData>
          </table>
	  -->
	</product>
      </function>

      <function name="aero/moment/Yaw_damp">
	<description>Yaw moment due to yaw rate</description>
	<product>
          <property>aero/qbar-psf</property>
          <property>metrics/Sw-sqft</property>
          <property>metrics/bw-ft</property>
          <property>aero/bi2vel</property>
          <property>velocities/r-aero-rad_sec</property>
          <value> -0.1605 </value>
	</product>
      </function>

      <function name="aero/moment/Yaw_rudder">
	<description>Yaw moment due to rudder</description>
	<product>
          <property>aero/qbar-psf</property>
          <property>metrics/Sw-sqft</property>
          <property>metrics/bw-ft</property>
          <property>fcs/rudder-pos-rad</property>
          <value> -0.0990 </value>
	</product>
      </function>

      <function name="aero/moment/Yaw_flaperon">
	<description>Adverse yaw</description>
	<product>
          <property>aero/qbar-psf</property>
          <property>metrics/Sw-sqft</property>
          <property>metrics/bw-ft</property>
          <property>fcs/surfaces/left-flaperon-pos-rad</property>
          <value> 0.0000 </value>
	</product>
      </function>

    </axis>

  </aerodynamics>
