<?xml version="1.0"?>
<?xml-stylesheet type="text/xsl" href="http://jsbsim.sourceforge.net/JSBSim.xsl"?>

<fdm_config name="A-6E" version="2.0" release="ALPHA"
   xmlns:xsi="http://www.w3.org/2001/XMLSchema-instance"
   xsi:noNamespaceSchemaLocation="http://jsbsim.sourceforge.net/JSBSim.xsd">

 <fileheader>
  <author> Aeromatic v 3.3.0 </author>
  <filecreationdate> 03 Apr 2019 </filecreationdate>
  <version>$Revision: 1.68 $</version>
  <description> Models a A-6E. </description>
 </fileheader>

<!--
  File:     A-6E.xml
  Inputs:
    name:          A-6E
    type:          2 engine transonic/supersonic fighter
    stall speed:   145.00kts
    max weight:    60000.00 lb
    length:        54.50 ft
    wing:
     span:         53.00 ft
     area:         528.90 sq-ft
     mean chord:   10.90 ft
     aspect ratio: 5.31:1
     taper ratio:  0.31:1
     incidence:    2.00 degrees
     dihedral:     -1.00 degrees
     sweep:        25.00 degrees

    no. engines:   2
    engine type:   Turbine Engine
    engine layout: middle fuselage

    control type:   Conventional with Yaw Damper

    gear type:     tricycle
    steering type: steering
    retractable?:  yes

  Outputs:
    wing loading:  113.44 lb/sq-ft
    payload:       21600.00 lbs
    CL-alpha:      4.50 per radian
    CL-0:          0.32
    CL-max:        1.59
    CD-0:          0.01
    K:             0.12
    Mcrit:         0.81
-->

 <metrics>
   <wingarea  unit="FT2">   528.90 </wingarea>
   <wingspan  unit="FT" >    53.00 </wingspan>
   <wing_incidence>           2.00 </wing_incidence>
   <chord     unit="FT" >    10.90 </chord>
   <htailarea unit="FT2">   117.00 </htailarea>
   <htailarm  unit="FT" >    24.90 </htailarm>
   <vtailarea  unit="FT2">   79.25 </vtailarea>
   <vtailarm  unit="FT" >    24.90 </vtailarm>
   <location name="AERORP" unit="IN">
     <x>   355.20 </x>
     <y>     0.00 </y>
     <z>     0.00 </z>
   </location>
   <location name="EYEPOINT" unit="IN">
     <x>   130.80 </x>
     <y>     0.00 </y>
     <z>    38.00 </z>
   </location>
   <location name="VRP" unit="IN">
     <x>     0.0 </x>
     <y>     0.0 </y>
     <z>     0.0 </z>
   </location>
 </metrics>

 <mass_balance>
   <ixx unit="SLUG*FT2">  53320.00 </ixx>
   <iyy unit="SLUG*FT2">  87273.00 </iyy>
   <izz unit="SLUG*FT2">  139927.00 </izz>
   <emptywt unit="LBS" >  25980.00 </emptywt>
   <location name="CG" unit="IN">
     <x>   355.20 </x>
     <y>     0.00 </y>
     <z>   -16.35 </z>
   </location>
   <pointmass name="Payload">
    <description> 21600.00 LBS should bring model up to entered max weight </description>
    <weight unit="LBS"> 10800.00 </weight>
    <location name="POINTMASS" unit="IN">
     <x>   355.20 </x>
     <y>     0.00 </y>
     <z>   -16.35 </z>
   </location>
  </pointmass>
 </mass_balance>

 <propulsion>

   <engine file="J52-P8">
    <location unit="IN">
      <x>   355.20 </x>
      <y>   -20.00 </y>
      <z>   -12.00 </z>
    </location>
    <orient unit="DEG">
      <pitch>     0.00 </pitch>
       <roll>     0.00 </roll>
        <yaw>     0.00 </yaw>
    </orient>
    <feed> 0 </feed>

    <thruster file="direct">
     <sense> 1 </sense>
     <location unit="IN">
       <x>   355.20 </x>
       <y>   -20.00 </y>
       <z>   -12.00 </z>
     </location>
     <orient unit="DEG">
       <pitch>     0.00 </pitch>
        <roll>     0.00 </roll>
         <yaw>     0.00 </yaw>
     </orient>
    </thruster>
  </engine>

   <engine file="J52-P8">
    <location unit="IN">
      <x>   355.20 </x>
      <y>    20.00 </y>
      <z>   -12.00 </z>
    </location>
    <orient unit="DEG">
      <pitch>     0.00 </pitch>
       <roll>     0.00 </roll>
        <yaw>     0.00 </yaw>
    </orient>
    <feed> 1 </feed>

    <thruster file="direct">
     <sense> 1 </sense>
     <location unit="IN">
       <x>   355.20 </x>
       <y>    20.00 </y>
       <z>   -12.00 </z>
     </location>
     <orient unit="DEG">
       <pitch>     0.00 </pitch>
        <roll>     0.00 </roll>
         <yaw>     0.00 </yaw>
     </orient>
    </thruster>
  </engine>

  <tank type="FUEL" number="0">
     <location unit="IN">
       <x>   355.20 </x>
       <y>     0.00 </y>
       <z>   -16.35 </z>
     </location>
     <capacity unit="LBS"> 4140.00 </capacity>
     <contents unit="LBS"> 2070.00 </contents>
  </tank>
  <tank type="FUEL" number="1">
     <location unit="IN">
       <x>   355.20 </x>
       <y>     0.00 </y>
       <z>   -16.35 </z>
     </location>
     <capacity unit="LBS"> 4140.00 </capacity>
     <contents unit="LBS"> 2070.00 </contents>
  </tank>
  <tank type="FUEL" number="2">
     <location unit="IN">
       <x>   355.20 </x>
       <y>     0.00 </y>
       <z>   -16.35 </z>
     </location>
     <capacity unit="LBS"> 4140.00 </capacity>
     <contents unit="LBS"> 2070.00 </contents>
  </tank>

 </propulsion>

 <!--
 <ground_reactions>

  <contact type="BOGEY" name="NOSE">
    <location unit="IN">
      <x>    85.02 </x>
      <y>     0.00 </y>
      <z>   -78.48 </z>
    </location>
    <static_friction>  0.80 </static_friction>
    <dynamic_friction> 0.50 </dynamic_friction>
    <rolling_friction> 0.02 </rolling_friction>
    <spring_coeff  unit="LBS/FT">     18000.00 </spring_coeff>
    <damping_coeff unit="LBS/FT/SEC"> 9000.00 </damping_coeff>
    <max_steer unit="DEG"> 5.00 </max_steer>
    <brake_group> NONE </brake_group>
    <retractable> 1 </retractable>
  </contact>

  <contact type="BOGEY" name="LEFT_MAIN">
    <location unit="IN">
      <x>   369.41 </x>
      <y>   -57.24 </y>
      <z>   -78.48 </z>
    </location>
    <static_friction>  0.80 </static_friction>
    <dynamic_friction> 0.50 </dynamic_friction>
    <rolling_friction> 0.02 </rolling_friction>
    <spring_coeff  unit="LBS/FT">     60000.00 </spring_coeff>
    <damping_coeff unit="LBS/FT/SEC"> 30000.00 </damping_coeff>
    <max_steer unit="DEG">0</max_steer>
    <brake_group> LEFT </brake_group>
    <retractable> 1 </retractable>
  </contact>

  <contact type="BOGEY" name="RIGHT_MAIN">
    <location unit="IN">
      <x>   369.41 </x>
      <y>    57.24 </y>
      <z>   -78.48 </z>
    </location>
    <static_friction>  0.80 </static_friction>
    <dynamic_friction> 0.50 </dynamic_friction>
    <rolling_friction> 0.02 </rolling_friction>
    <spring_coeff  unit="LBS/FT">     60000.00 </spring_coeff>
    <damping_coeff unit="LBS/FT/SEC"> 30000.00 </damping_coeff>
    <max_steer unit="DEG">0</max_steer>
    <brake_group> RIGHT </brake_group>
    <retractable> 1 </retractable>
  </contact>

  <contact type="STRUCTURE" name="LEFT_WING">
    <location unit="IN">
     <x>   355.20 </x>
     <y>  -318.00 </y>
     <z>   -16.35 </z>
    </location>
   <static_friction>  1 </static_friction>
   <dynamic_friction> 1 </dynamic_friction>
   <spring_coeff unit="LBS/FT">      60000.00 </spring_coeff>
   <damping_coeff unit="LBS/FT/SEC"> 60000.00 </damping_coeff>
  </contact>

  <contact type="STRUCTURE" name="RIGHT_WING">
    <location unit="IN">
     <x>   355.20 </x>
     <y>   318.00 </y>
     <z>   -16.35 </z>
    </location>
   <static_friction>  1 </static_friction>
   <dynamic_friction> 1 </dynamic_friction>
   <spring_coeff unit="LBS/FT">      60000.00 </spring_coeff>
   <damping_coeff unit="LBS/FT/SEC"> 60000.00 </damping_coeff>
  </contact>

</ground_reactions> -->

 <ground_reactions file="Systems/ground_reactions.xml"/>
 <system file="Propulsion.xml"/>
 <system file="Aircraft_control.xml"/>
 <system file="Landing_Gear.xml"/>
 <system file="Flaps.xml"/>
 <system file="Spoilers.xml"/>
 <system file="Speedbrake.xml"/>
 <system file="Arrestor_Hook.xml"/>
 <system file="Catapult.xml"/>

 <flight_control name="FCS: A-6E">

 </flight_control>

 <aerodynamics>

  <axis name="LIFT">

    <function name="aero/force/Lift_alpha">
      <description>Lift due to alpha</description>
      <product>
          <property>aero/qbar-psf</property>
          <property>metrics/Sw-sqft</property>
          <table>
            <independentVar lookup="row">aero/alpha-rad</independentVar>
            <tableData>
              -0.20 -0.5783
               0.00  0.3213
               0.28  1.5937
               0.60  0.8303
            </tableData>
          </table>
      </product>
    </function>

    <function name="aero/force/Lift_pitch_rate">
        <description>Lift due to pitch rate</description>
        <product>
          <property>aero/qbar-psf</property>
          <property>metrics/Sw-sqft</property>
          <property>velocities/q-aero-rad_sec</property>
          <property>aero/ci2vel</property>
          <value> 4.2695 </value>
        </product>
      </function>

      <function name="aero/force/Lift_alpha_rate">
        <description>Lift due to alpha rate</description>
        <product>
           <property>aero/qbar-psf</property>
           <property>metrics/Sw-sqft</property>
           <property>aero/alphadot-rad_sec</property>
           <property>aero/ci2vel</property>
           <value> 2.3362 </value>
        </product>
      </function>

    <function name="aero/force/Lift_elevator">
       <description>Lift due to Elevator Deflection</description>
       <product>
           <property>aero/qbar-psf</property>
           <property>metrics/Sw-sqft</property>
           <property>fcs/elevator-pos-rad</property>
           <value> 0.3777 </value>
       </product>
    </function>

    <function name="aero/force/Lift_flap">
       <description>Delta Lift due to flaps</description>
       <product>
           <property>aero/qbar-psf</property>
           <property>metrics/Sw-sqft</property>
           <property>fcs/flap-pos-deg</property>
           <value> 0.0102 </value>
       </product>
    </function>


    <function name="aero/force/Lift_spoilers">
       <description>Delta Lift due to spoilers</description>
       <product>
           <property>aero/qbar-psf</property>
           <property>metrics/Sw-sqft</property>
           <property>fcs/spoilers-pos-norm</property>
           <value> 0.0000 </value>
       </product>
    </function>

  </axis>

  <axis name="DRAG">

    <function name="aero/force/Drag_basic">
       <description>Drag at zero lift</description>
       <product>
          <property>aero/qbar-psf</property>
          <property>metrics/Sw-sqft</property>
          <table>
            <independentVar lookup="row">aero/alpha-rad</independentVar>
            <tableData>
             -1.57    1.4086
             -0.28    0.0684
              0.00    0.0139
              0.28    0.0684
              1.57    1.4086
            </tableData>
          </table>
       </product>
    </function>

    <function name="aero/force/Drag_induced">
       <description>Induced drag</description>
         <product>
           <property>aero/qbar-psf</property>
           <property>metrics/Sw-sqft</property>
           <property>aero/cl-squared</property>
           <value> 0.0667 </value>
         </product>
    </function>

    <function name="aero/force/Drag_mach">
       <description>Drag due to mach</description>
        <product>
          <property>aero/qbar-psf</property>
          <property>metrics/Sw-sqft</property>
          <table>
            <independentVar lookup="row">velocities/mach</independentVar>
            <tableData>
                0.00    0.0000
                0.81    0.0000
                1.10    0.0230
                1.80    0.0150
            </tableData>
          </table>
        </product>
    </function>

    <function name="aero/force/Drag_beta">
       <description>Drag due to sideslip</description>
       <product>
          <property>aero/qbar-psf</property>
          <property>metrics/Sw-sqft</property>
          <table>
            <independentVar lookup="row">aero/beta-rad</independentVar>
            <tableData>
              -1.57    1.2300
              -0.26    0.0500
               0.00    0.0000
               0.26    0.0500
               1.57    1.2300
            </tableData>
          </table>
       </product>
    </function>

    <function name="aero/force/Drag_elevator">
       <description>Drag due to Elevator Deflection</description>
       <product>
           <property>aero/qbar-psf</property>
           <property>metrics/Sw-sqft</property>
           <abs><property>fcs/elevator-pos-rad</property></abs>
           <value> 0.0400 </value>
       </product>
    </function>

    <function name="aero/force/Drag_gear">
       <description>Drag due to gear</description>
         <product>
           <property>aero/qbar-psf</property>
           <property>metrics/Sw-sqft</property>
           <property>gear/gear-pos-norm</property>
           <value> 0.0200 </value>
         </product>
    </function>

    <function name="aero/force/Drag_flap">
       <description>Drag due to flaps</description>
         <product>
           <property>aero/qbar-psf</property>
           <property>metrics/Sw-sqft</property>
           <property>fcs/flap-pos-deg</property>
           <value> 0.0022 </value>
         </product>
    </function>


    <function name="aero/force/Drag_spoilers">
       <description>Drag due to spoilers</description>
         <product>
           <property>aero/qbar-psf</property>
           <property>metrics/Sw-sqft</property>
           <property>fcs/spoilers-pos-norm</property>
           <value> 0.0139 </value>
         </product>
    </function>

    <function name="aero/force/Drag_speedbrake">
       <description>Drag due to speedbrakes</description>
         <product>
           <property>aero/qbar-psf</property>
           <property>metrics/Sw-sqft</property>
           <property>fcs/speedbrake-pos-norm</property>
           <value> 0.0800 </value>
         </product>
    </function>

  </axis>

  <axis name="SIDE">

    <function name="aero/force/Side_beta">
       <description>Side force due to beta</description>
       <product>
           <property>aero/qbar-psf</property>
           <property>metrics/Sw-sqft</property>
           <property>aero/beta-rad</property>
           <value> -0.3461 </value>
       </product>
    </function>
    <function name="aero/force/Side_roll_rate">
       <description>Side force due to roll rate</description>
       <product>
           <property>aero/qbar-psf</property>
           <property>metrics/Sw-sqft</property>
           <property>aero/bi2vel</property>
           <property>velocities/p-aero-rad_sec</property>
           <table>
             <independentVar lookup="row">aero/Re</independentVar>
             <tableData>
                16998866   5.1703
                18698754   0.4100
                25498298   0.1822
                33714708   0.1042
             </tableData>
           </table>
       </product>
    </function>

    <function name="aero/force/Side_yaw_rate">
       <description>Side force due to yaw rate</description>
       <product>
           <property>aero/qbar-psf</property>
           <property>metrics/Sw-sqft</property>
           <property>aero/bi2vel</property>
           <property>velocities/r-aero-rad_sec</property>
           <value> 0.3252 </value>
       </product>
    </function>

    <function name="aero/force/Side_rudder">
       <description>Side force due to rudder</description>
       <product>
           <property>aero/qbar-psf</property>
           <property>metrics/Sw-sqft</property>
           <property>fcs/rudder-pos-rad</property>
           <value> 0.2108 </value>
       </product>
    </function>

  </axis>

  <axis name="PITCH">

    <function name="aero/moment/Pitch_alpha">
       <description>Pitch moment due to alpha</description>
       <product>
           <property>aero/qbar-psf</property>
           <property>metrics/Sw-sqft</property>
           <property>metrics/cbarw-ft</property>
           <property>aero/alpha-rad</property>
           <value> -0.9734 </value>
       </product>
    </function>

    <function name="aero/moment/Pitch_elevator">
       <description>Pitch moment due to elevator</description>
       <product>
          <property>aero/qbar-psf</property>
          <property>metrics/Sw-sqft</property>
          <property>metrics/cbarw-ft</property>
          <property>fcs/elevator-pos-rad</property>
          <table>
            <independentVar lookup="row">velocities/mach</independentVar>
            <tableData>
              0.0    -1.3097
              2.0    -0.3274
            </tableData>
          </table>
       </product>
    </function>

    <function name="aero/moment/Pitch_damp">
       <description>Pitch moment due to pitch rate</description>
       <product>
           <property>aero/qbar-psf</property>
           <property>metrics/Sw-sqft</property>
           <property>metrics/cbarw-ft</property>
           <property>aero/ci2vel</property>
           <property>velocities/q-aero-rad_sec</property>
           <value> -9.7532 </value>
       </product>
    </function>

    <function name="aero/moment/Pitch_alphadot">
       <description>Pitch moment due to alpha rate</description>
       <product>
           <property>aero/qbar-psf</property>
           <property>metrics/Sw-sqft</property>
           <property>metrics/cbarw-ft</property>
           <property>aero/ci2vel</property>
           <property>aero/alphadot-rad_sec</property>
           <value> -5.3369 </value>
       </product>
    </function>

  </axis>

  <axis name="ROLL">

    <function name="aero/moment/Roll_beta">
       <description>Roll moment due to beta</description>
       <product>
           <property>aero/qbar-psf</property>
           <property>metrics/Sw-sqft</property>
           <property>metrics/bw-ft</property>
           <property>aero/beta-rad</property>
           <table>
             <independentVar lookup="row">aero/alpha-rad</independentVar>
             <independentVar lookup="column">aero/Re</independentVar>
             <tableData>
                         16998866 18698754 25498298 33714708
                 -0.0349  -0.2820  -0.0206  -0.0110  -0.0139
                  0.3491  -1.9915  -0.2130  -0.2334  -0.3118
             </tableData>
           </table>
       </product>
    </function>

    <function name="aero/moment/Roll_damp">
       <description>Roll moment due to roll rate</description>
       <product>
           <property>aero/qbar-psf</property>
           <property>metrics/Sw-sqft</property>
           <property>metrics/bw-ft</property>
           <property>aero/bi2vel</property>
           <property>velocities/p-aero-rad_sec</property>
           <value> -0.2862 </value>
       </product>
    </function>

    <function name="aero/moment/Roll_yaw">
       <description>Roll moment due to yaw rate</description>
       <product>
           <property>aero/qbar-psf</property>
           <property>metrics/Sw-sqft</property>
           <property>metrics/bw-ft</property>
           <property>aero/bi2vel</property>
           <property>velocities/r-aero-rad_sec</property>
           <table>
             <independentVar lookup="row">aero/alpha-rad</independentVar>
             <independentVar lookup="column">aero/Re</independentVar>
             <tableData>
                         16998866 18698754 25498298 33714708
                 -0.0349   0.5714   0.0731   0.0492   0.0411
                  0.3491   4.5147   0.5049   0.4810   0.4729
             </tableData>
           </table>
       </product>
    </function>

    <function name="aero/moment/Roll_aileron">
       <description>Roll moment due to aileron</description>
       <product>
          <property>aero/qbar-psf</property>
          <property>metrics/Sw-sqft</property>
          <property>metrics/bw-ft</property>
          <property>fcs/left-aileron-pos-rad</property>
           <table>
            <independentVar lookup="row">velocities/mach</independentVar>
            <tableData>
              0.0    0.1200
              2.0    0.0300
            </tableData>
          </table>
       </product>
    </function>

    <function name="aero/moment/Roll_rudder">
       <description>Roll moment due to rudder</description>
       <product>
           <property>aero/qbar-psf</property>
           <property>metrics/Sw-sqft</property>
           <property>metrics/bw-ft</property>
           <property>fcs/rudder-pos-rad</property>
           <value> 0.0100 </value>
       </product>
    </function>

    <function name="aero/moment/Roll_spoilers">
       <description>Roll moment due to spoilers</description>
       <product>
          <property>aero/qbar-psf</property>
          <property>metrics/Sw-sqft</property>
          <property>metrics/bw-ft</property>
          <property>fcs/spoilers-pos-norm</property>
          <property>fcs/left-aileron-pos-rad</property>
          <table>
            <independentVar lookup="row">aero/alpha-rad</independentVar>
            <tableData>
             -0.175   0.0000
              0.0     0.2400
              0.175   0.0000
            </tableData>
          </table>
       </product>
    </function>

  </axis>

  <axis name="YAW">

    <!-- Stall initiator -->
    <function name="aero/moment/Yaw_alpha">
       <description>Yaw moment due to alpha</description>
       <product>
           <property>aero/qbar-psf</property>
           <property>metrics/Sw-sqft</property>
           <property>metrics/bw-ft</property>
           <property>aero/alpha-rad</property>
           <table>
             <independentVar lookup="row">aero/beta-rad</independentVar>
             <independentVar lookup="column">aero/Re</independentVar>
             <tableData>
                         16998866 18698754
                 -0.3491  -1.0000   0.0000
                  0.3491   1.0000   0.0000
             </tableData>
           </table>
       </product>
    </function>

    <function name="aero/moment/Yaw_beta">
       <description>Yaw moment due to beta</description>
       <product>
           <property>aero/qbar-psf</property>
           <property>metrics/Sw-sqft</property>
           <property>metrics/bw-ft</property>
           <property>aero/beta-rad</property>
           <value> 0.1626 </value>
       </product>
    </function>

    <function name="aero/moment/Yaw_roll_rate">
       <description>Yaw moment due to roll rate</description>
       <product>
           <property>aero/qbar-psf</property>
           <property>metrics/Sw-sqft</property>
           <property>metrics/bw-ft</property>
           <property>aero/bi2vel</property>
           <property>velocities/p-rad_sec</property>
           <table>
             <independentVar lookup="row">aero/Re</independentVar>
             <tableData>
                16998866  -1.9922
                18698754  -0.1580
                25498298  -0.0702
                33714708  -0.0402
             </tableData>
           </table>
       </product>
    </function>

    <function name="aero/moment/Yaw_damp">
       <description>Yaw moment due to yaw rate</description>
       <product>
           <property>aero/qbar-psf</property>
           <property>metrics/Sw-sqft</property>
           <property>metrics/bw-ft</property>
           <property>aero/bi2vel</property>
           <property>velocities/r-aero-rad_sec</property>
           <value> -0.1605 </value>
       </product>
    </function>

    <function name="aero/moment/Yaw_rudder">
       <description>Yaw moment due to rudder</description>
       <product>
           <property>aero/qbar-psf</property>
           <property>metrics/Sw-sqft</property>
           <property>metrics/bw-ft</property>
           <property>fcs/rudder-pos-rad</property>
           <value> -0.0990 </value>
       </product>
    </function>

    <function name="aero/moment/Yaw_aileron">
       <description>Adverse yaw</description>
       <product>
           <property>aero/qbar-psf</property>
           <property>metrics/Sw-sqft</property>
           <property>metrics/bw-ft</property>
           <property>fcs/left-aileron-pos-rad</property>
           <value> 0.0000 </value>
       </product>
    </function>

  </axis>

 </aerodynamics>

 <external_reactions>

  <force name="hook" frame="BODY">
   <location unit="FT">
    <x> 49.595 </x>
    <y> 0 </y>
    <z> -1.09</z>
   </location>
   <direction>
    <x>-0.9995</x>
    <y> 0 </y>
    <z> 0.01 </z>
   </direction>
  </force>

  <force name="catapult" frame="BODY">
   <location unit="IN">
    <x> 85.02 </x>
    <y> 0 </y>
    <z> -78.48 </z>
   </location>
   <direction>
    <x> 1 </x>
    <y> 0 </y>
    <z> 0 </z>
   </direction>
  </force>

 </external_reactions>

</fdm_config>
