<!--
Generated by vsp2jsbsim.py
Author: Jüttner Domokos

Based on the work of Richard Harrison-->
<aerodynamics>

  <function name="aero/beta-deg-abs">
    <description>Beta absolute value</description>
    <abs>
      <property>aero/beta-deg</property>
    </abs>
  </function>

  <function name="aero/pb">
    <description>PB Denormalization</description>
    <product>
      <property>aero/bi2vel</property>
      <property>velocities/p-aero-rad_sec</property>
    </product>
  </function>

  <function name="aero/qb">
    <description>For denormalization</description>
    <product>
      <property>aero/ci2vel</property>
      <property>velocities/q-aero-rad_sec</property>
    </product>
  </function>

  <function name="aero/rb">
    <description>For denormalization</description>
    <product>
      <property>aero/bi2vel</property>
      <property>velocities/r-aero-rad_sec</property>
    </product>

  </function>
  <!-- CL -->
  <!-- base -->
  <function name="aero/CL_base">
    <table>
      <independentVar lookup="row">velocities/mach</independentVar>
      <independentVar lookup="column">aero/alpha-deg</independentVar>
      <independentVar lookup="table">aero/beta-deg</independentVar>
      <tableData breakPoint="-10.00000">
                -10.00     -5.00      0.00      5.00     10.00     12.50     15.00     17.50     20.00     25.00     30.00     40.00     50.00     60.00
        0.20000  -0.71583  -0.36760   0.00595   0.38606   0.73377   0.84431   0.89900   0.93346   0.96091   0.98057   0.98917   0.99374   0.99472   0.96955
        0.60000  -0.77283  -0.41010   0.00613   0.42903   0.79492   0.87702   0.91761   0.94750   0.96681   0.98299   0.99117   0.99862   0.99981   0.93683
        0.88000  -0.84859  -0.51310   0.00715   0.52189   0.86891   0.90895   0.93031   0.95352   0.97415   0.99899   1.00372   1.01955   1.00451   0.98946
        0.92000  -0.85815  -0.54662   0.00762   0.55472   0.87760   0.91176   0.93057   0.95115   0.98030   1.00556   1.01844   1.03335   1.02926   1.00005
        0.96000  -0.86451  -0.59772   0.00831   0.59677   0.88294   0.91665   0.94335   0.96578   0.98888   1.02061   1.04864   1.06712   1.05768   1.02736
        0.98000  -0.86816  -0.63411   0.00881   0.63314   0.89412   0.92249   0.95097   0.96844   0.99862   1.05222   1.08370   1.10532   1.10463   1.07030
        1.01000  -0.86120  -0.76259  -0.00458   0.75284   0.84431   0.85757   0.87369   0.89057   0.90984   0.94681   0.97359   0.96804   0.95790   0.93667
      </tableData>

      <tableData breakPoint="-5.00000">
                -10.00     -5.00      0.00      5.00     10.00     12.50     15.00     17.50     20.00     25.00     30.00     40.00     50.00     60.00
        0.20000  -0.73951  -0.37767   0.00636   0.38745   0.74972   0.85741   0.90126   0.93538   0.96433   0.99110   0.99528   1.00035   1.00645   0.99905
        0.60000  -0.79484  -0.42084   0.00665   0.43769   0.80527   0.88450   0.91407   0.94461   0.96912   0.99636   0.99523   1.00521   1.00968   1.01058
        0.88000  -0.85563  -0.52579   0.00767   0.52946   0.87763   0.90611   0.92690   0.96767   0.98865   0.99948   1.00446   1.02376   1.02549   1.01516
        0.92000  -0.86367  -0.56045   0.00802   0.53442   0.88580   0.88786   0.94908   0.96702   0.98817   1.00226   1.01751   1.03804   1.04291   1.03018
        0.96000  -0.86941  -0.61412   0.00849   0.62639   0.86957   0.92943   0.95251   0.96192   0.99222   1.01329   1.03222   1.07373   1.07705   1.06196
        0.98000  -0.87319  -0.65693   0.00881   0.61511   0.90963   0.92465   0.95796   0.97529   1.00246   1.03445   1.08231   1.11919   1.12784   1.10674
        1.01000  -0.86529  -0.77638  -0.00539   0.75864   0.84939   0.85662   0.88096   0.89516   0.91123   0.95655   0.97745   0.97565   0.97295   0.96705
      </tableData>

      <tableData breakPoint="0.00000">
                -10.00     -5.00      0.00      5.00     10.00     12.50     15.00     17.50     20.00     25.00     30.00     40.00     50.00     60.00
        0.20000  -0.74905  -0.38086   0.00633   0.39095   0.76497   0.86487   0.91225   0.94461   0.96771   0.98873   0.99444   1.00358   1.01166   1.00898
        0.60000  -0.80118  -0.42427   0.00672   0.43455   0.81541   0.89247   0.93028   0.95668   0.97495   0.99250   0.99812   1.00797   1.01531   1.01941
        0.88000  -0.85699  -0.53041   0.00782   0.53950   0.88224   0.92475   0.94608   0.96378   0.98792   1.00630   1.01406   1.02639   1.03317   1.02703
        0.92000  -0.86428  -0.56514   0.00814   0.57338   0.89268   0.92577   0.94816   0.96675   0.99298   1.01488   1.02429   1.04058   1.04814   1.04156
        0.96000  -0.86977  -0.61934   0.00857   0.62378   0.89951   0.92805   0.95449   0.97335   1.00098   1.03710   1.05280   1.07740   1.08459   1.07480
        0.98000  -0.87327  -0.66455   0.00883   0.66054   0.90651   0.93798   0.96287   0.98143   1.01295   1.06740   1.09323   1.12459   1.13576   1.11974
        1.01000  -0.86673  -0.78169  -0.00566   0.76508   0.85119   0.86654   0.88290   0.90073   0.92063   0.96549   0.97831   0.97827   0.97818   0.97799
      </tableData>

      <tableData breakPoint="5.00000">
                -10.00     -5.00      0.00      5.00     10.00     12.50     15.00     17.50     20.00     25.00     30.00     40.00     50.00     60.00
        0.20000  -0.73972  -0.37771   0.00632   0.38706   0.74933   0.85740   0.90111   0.93476   0.96405   0.99099   0.99524   1.00027   1.00648   1.00122
        0.60000  -0.79489  -0.42084   0.00663   0.43182   0.80503   0.88439   0.91384   0.94407   0.96760   0.99632   0.99500   1.00518   1.00963   1.01056
        0.88000  -0.85566  -0.52582   0.00766   0.53365   0.87859   0.90554   0.92717   0.96771   0.98862   1.00023   1.00442   1.02381   1.02467   1.01509
        0.92000  -0.86370  -0.56070   0.00801   0.55985   0.88530   0.88854   0.94933   0.96681   0.98819   1.00242   1.01738   1.03821   1.04291   1.03006
        0.96000  -0.86945  -0.61417   0.00848   0.62736   0.86948   0.92988   0.95254   0.96223   0.99241   1.01341   1.03325   1.07560   1.07707   1.06199
        0.98000  -0.87321  -0.65692   0.00880   0.61415   0.90950   0.92475   0.95812   0.97575   1.00273   1.03502   1.08268   1.11896   1.12802   1.10703
        1.01000  -0.86523  -0.77637  -0.00538   0.75863   0.84936   0.85684   0.88100   0.89510   0.91089   0.95785   0.97745   0.97565   0.97295   0.96706
      </tableData>

      <tableData breakPoint="10.00000">
                -10.00     -5.00      0.00      5.00     10.00     12.50     15.00     17.50     20.00     25.00     30.00     40.00     50.00     60.00
        0.20000  -0.71605  -0.36763   0.00588   0.38742   0.73387   0.84449   0.89915   0.93375   0.96080   0.98034   0.98949   0.99368   0.99460   0.97046
        0.60000  -0.77297  -0.41013   0.00607   0.42920   0.79520   0.87702   0.91777   0.94757   0.96677   0.98295   0.99146   0.99854   0.99994   0.93561
        0.88000  -0.84872  -0.51313   0.00710   0.52203   0.86855   0.90874   0.93023   0.95337   0.97423   0.99904   1.00377   1.01978   1.00447   0.98936
        0.92000  -0.85825  -0.54666   0.00760   0.55459   0.87746   0.91159   0.93023   0.94946   0.98075   1.00590   1.01803   1.03652   1.02919   0.99996
        0.96000  -0.86453  -0.59782   0.00831   0.59724   0.88292   0.91659   0.94317   0.96560   0.98864   1.02097   1.04887   1.06699   1.05768   1.02739
        0.98000  -0.86820  -0.63411   0.00881   0.63345   0.89438   0.92240   0.95079   0.96837   0.99892   1.05326   1.08264   1.10521   1.10485   1.07028
        1.01000  -0.86116  -0.76258  -0.00457   0.75283   0.84428   0.85740   0.87369   0.89059   0.91022   0.94686   0.97362   0.96804   0.95791   0.93667
      </tableData>

    </table>
  </function>

  <!-- elevator -->
  <function name="aero/CL_elevator_-24">
    <table>
      <independentVar lookup="row">velocities/mach</independentVar>
      <independentVar lookup="column">aero/alpha-deg</independentVar>
      <independentVar lookup="table">aero/beta-deg</independentVar>
      <tableData breakPoint="0.00000">
                -10.00     -5.00      0.00      5.00     10.00     12.50     15.00     17.50     20.00     25.00     30.00     40.00     50.00     60.00
        0.20000  -0.11328  -0.16331  -0.20544  -0.24554  -0.28856  -0.28947  -0.29987  -0.30957  -0.31350  -0.28869  -0.24114  -0.13518  -0.03814  -0.00369
        0.60000  -0.09842  -0.15743  -0.20128  -0.24235  -0.27305  -0.29026  -0.30489  -0.31832  -0.32891  -0.31116  -0.26266  -0.15172  -0.04569  -0.00032
        0.88000  -0.08798  -0.14538  -0.19031  -0.23023  -0.26657  -0.28828  -0.30779  -0.32311  -0.34356  -0.34943  -0.33076  -0.21095  -0.07814   0.00052
        0.92000  -0.08718  -0.14273  -0.18685  -0.22506  -0.26580  -0.28533  -0.30590  -0.32019  -0.34141  -0.35340  -0.34615  -0.23592  -0.09398   0.00087
        0.96000  -0.08985  -0.13950  -0.18200  -0.21702  -0.26227  -0.28060  -0.30064  -0.31224  -0.33251  -0.35317  -0.35252  -0.27819  -0.12260   0.00094
        0.98000  -0.09320  -0.13787  -0.17868  -0.20863  -0.25808  -0.27889  -0.29345  -0.30160  -0.32144  -0.35137  -0.35389  -0.31519  -0.15130  -0.00018
        1.01000  -0.11162  -0.14624  -0.17511  -0.19355  -0.22809  -0.24344  -0.25980  -0.27764  -0.29754  -0.34241  -0.35524  -0.35525  -0.22701   0.00000
      </tableData>

    </table>
  </function>

  <function name="aero/CL_elevator_-9.5">
    <table>
      <independentVar lookup="row">velocities/mach</independentVar>
      <independentVar lookup="column">aero/alpha-deg</independentVar>
      <independentVar lookup="table">aero/beta-deg</independentVar>
      <tableData breakPoint="0.00000">
                -10.00     -5.00      0.00      5.00     10.00     12.50     15.00     17.50     20.00     25.00     30.00     40.00     50.00     60.00
        0.20000  -0.10010  -0.13259  -0.13693  -0.14023  -0.13807  -0.13322  -0.12909  -0.12481  -0.11839  -0.09460  -0.05248  -0.00665  -0.00049  -0.00429
        0.60000  -0.09250  -0.13688  -0.14690  -0.15068  -0.14406  -0.14344  -0.14034  -0.13689  -0.13073  -0.10125  -0.05593  -0.00469   0.00000   0.00000
        0.88000  -0.08668  -0.13656  -0.16779  -0.17387  -0.17072  -0.17122  -0.16915  -0.16373  -0.16529  -0.12715  -0.07572  -0.00249   0.00025   0.00076
        0.92000  -0.08697  -0.13597  -0.17100  -0.18097  -0.18038  -0.18174  -0.17867  -0.17282  -0.17589  -0.14004  -0.08695  -0.00288   0.00042   0.00027
        0.96000  -0.09003  -0.13554  -0.17320  -0.18816  -0.19324  -0.19589  -0.19302  -0.18687  -0.19203  -0.16533  -0.10918  -0.00380   0.00069   0.00023
        0.98000  -0.09370  -0.13601  -0.17420  -0.19100  -0.20468  -0.21223  -0.20510  -0.19829  -0.20529  -0.18874  -0.13185  -0.00544   0.00086   0.00011
        1.01000  -0.10439  -0.14634  -0.17511  -0.19237  -0.21777  -0.22761  -0.23756  -0.24269  -0.24268  -0.23946  -0.19190  -0.03813   0.00000   0.00000
      </tableData>

    </table>
  </function>

  <function name="aero/CL_elevator_-3">
    <table>
      <independentVar lookup="row">velocities/mach</independentVar>
      <independentVar lookup="column">aero/alpha-deg</independentVar>
      <independentVar lookup="table">aero/beta-deg</independentVar>
      <tableData breakPoint="0.00000">
                -10.00     -5.00      0.00      5.00     10.00     12.50     15.00     17.50     20.00     25.00     30.00     40.00     50.00     60.00
        0.20000  -0.04073  -0.04318  -0.04448  -0.03522  -0.04304  -0.04157  -0.03928  -0.03738  -0.03547  -0.01522  -0.00033  -0.00022  -0.00086  -0.00041
        0.60000  -0.04304  -0.04696  -0.04801  -0.04937  -0.04539  -0.04470  -0.04302  -0.04119  -0.03942  -0.01287  -0.00010  -0.00014  -0.00050   0.00017
        0.88000  -0.05066  -0.05295  -0.05554  -0.05811  -0.05431  -0.05404  -0.05256  -0.04653  -0.04925  -0.01450   0.00017   0.00000   0.00000  -0.00025
        0.92000  -0.05308  -0.05606  -0.05776  -0.06088  -0.05745  -0.05717  -0.05570  -0.04886  -0.05255  -0.01928   0.00013   0.00013   0.00000   0.00000
        0.96000  -0.05739  -0.05920  -0.06100  -0.06494  -0.06172  -0.06144  -0.06067  -0.05193  -0.05697  -0.03251  -0.00199  -0.00028   0.00017   0.00014
        0.98000  -0.06055  -0.06131  -0.06353  -0.07253  -0.06542  -0.06895  -0.06477  -0.06380  -0.06074  -0.04552  -0.00632   0.00118  -0.00327  -0.00018
        1.01000  -0.07182  -0.07332  -0.07404  -0.07650  -0.07642  -0.07618  -0.07576  -0.07493  -0.07430  -0.07142  -0.02796   0.00000   0.00000   0.00000
      </tableData>

    </table>
  </function>

  <function name="aero/CL_elevator_1.5">
    <table>
      <independentVar lookup="row">velocities/mach</independentVar>
      <independentVar lookup="column">aero/alpha-deg</independentVar>
      <independentVar lookup="table">aero/beta-deg</independentVar>
      <tableData breakPoint="0.00000">
                -10.00     -5.00      0.00      5.00     10.00     12.50     15.00     17.50     20.00     25.00     30.00     40.00     50.00     60.00
        0.20000   0.02061   0.02151   0.02207   0.02185   0.02058   0.01963   0.01863   0.01762   0.01276   0.00111   0.00000   0.00000  -0.00086  -0.00040
        0.60000   0.02172   0.02253   0.02380   0.02363   0.02180   0.02176   0.02018   0.01884   0.00971   0.00000   0.00013   0.00000  -0.00076   0.00000
        0.88000   0.02599   0.02602   0.02749   0.02820   0.02574   0.02701   0.02474   0.02225   0.00902  -0.00013   0.00000   0.00035  -0.00030  -0.00033
        0.92000   0.02734   0.02699   0.02857   0.02990   0.02653   0.02855   0.02610   0.02375   0.01038   0.00000  -0.00055   0.00059  -0.00023   0.00000
        0.96000   0.02916   0.02813   0.03012   0.03155   0.02967   0.03184   0.02855   0.02755   0.01670  -0.00073   0.00000   0.00030   0.00000   0.00000
        0.98000   0.03069   0.02888   0.03133   0.04028   0.02905   0.03111   0.03049   0.02979   0.02388  -0.00118   0.00035   0.00063  -0.00010  -0.00014
        1.01000   0.03631   0.03653   0.03641   0.03695   0.03694   0.03631   0.03591   0.03542   0.03460   0.01284   0.00000   0.00000   0.00000   0.00000
      </tableData>

    </table>
  </function>

  <function name="aero/CL_elevator">
    <interpolate1d>
      <property>fcs/surfaces/elevator-pos-deg</property>
      <value>-24</value> <property>aero/CL_elevator_-24</property>
      <value>-9.5</value> <property>aero/CL_elevator_-9.5</property>
      <value>-3</value> <property>aero/CL_elevator_-3</property>
      <value>0</value> <value>0</value>
      <value>1.5</value> <property>aero/CL_elevator_1.5</property>
    </interpolate1d>
  </function>

  <!-- flaps -->
  <function name="aero/CL_flaps_20">
    <table>
      <independentVar lookup="row">velocities/mach</independentVar>
      <independentVar lookup="column">aero/alpha-deg</independentVar>
      <independentVar lookup="table">aero/beta-deg</independentVar>
      <tableData breakPoint="0.00000">
                -10.00     -5.00      0.00      5.00     10.00     12.50     15.00     17.50     20.00     25.00     30.00     40.00     50.00     60.00
        0.20000   0.41879   0.42734   0.42539   0.39932   0.38630   0.40832   0.46811   0.49140   0.50503   0.55035   0.59977   0.64170   0.60100   0.40138
        0.60000   0.44470   0.48720   0.48325   0.45170   0.44659   0.45095   0.47823   0.52467   0.53566   0.58007   0.62520   0.67370   0.64971   0.48420
        0.88000   0.45819   0.65516   0.65210   0.60842   0.49189   0.48922   0.57641   0.57939   0.57558   0.61022   0.65330   0.71655   0.72538   0.62963
        0.92000   0.46026   0.71893   0.71563   0.56152   0.47827   0.55719   0.58052   0.58725   0.58053   0.61345   0.65495   0.72579   0.73951   0.66398
        0.96000   0.46809   0.82878   0.85199   0.65788   0.58408   0.59039   0.59601   0.60303   0.59015   0.60749   0.65420   0.74092   0.75357   0.69499
        0.98000   0.48593   0.93124   0.92343   0.48335   0.60672   0.60752   0.61191   0.59671   0.59670   0.61081   0.65540   0.75669   0.76524   0.70774
        1.01000   0.21428   0.96427   0.96756   0.48396   0.64591   0.62524   0.60802   0.59426   0.58406   0.57243   0.60763   0.72288   0.73389   0.73387
      </tableData>

    </table>
  </function>

  <function name="aero/CL_flaps_30">
    <table>
      <independentVar lookup="row">velocities/mach</independentVar>
      <independentVar lookup="column">aero/alpha-deg</independentVar>
      <independentVar lookup="table">aero/beta-deg</independentVar>
      <tableData breakPoint="0.00000">
                -10.00     -5.00      0.00      5.00     10.00     12.50     15.00     17.50     20.00     25.00     30.00     40.00     50.00     60.00
        0.20000   0.57839   0.58440   0.57316   0.54706   0.48650   0.45489   0.47294   0.50820   0.51301   0.55505   0.59983   0.64229   0.60274   0.40520
        0.60000   0.62640   0.66602   0.65311   0.61702   0.50561   0.47545   0.48178   0.52315   0.54737   0.57829   0.62296   0.67326   0.65200   0.48651
        0.88000   0.70174   0.89483   0.88072   0.63162   0.51977   0.48977   0.51687   0.59488   0.57394   0.59706   0.64807   0.71489   0.72786   0.63107
        0.92000   0.72743   0.98176   0.96586   0.61565   0.50579   0.50694   0.60043   0.59037   0.57369   0.60782   0.65077   0.72406   0.74059   0.66430
        0.96000   0.77777   1.12930   1.07767   0.51253   0.56998   0.61551   0.60490   0.60351   0.58749   0.60677   0.65303   0.74388   0.75783   0.69793
        0.98000   0.83264   1.26924   1.10555   0.86559   0.64301   0.63427   0.62177   0.59701   0.59745   0.61065   0.65954   0.76209   0.77243   0.71166
        1.01000   0.60141   1.33097   1.12489   0.48648   0.66696   0.63665   0.61222   0.59343   0.57915   0.56349   0.59809   0.71942   0.73391   0.73390
      </tableData>

    </table>
  </function>

  <function name="aero/CL_flaps">
    <interpolate1d>
      <property>fcs/surfaces/flaps-pos-deg</property>
      <value>0</value> <value>0</value>
      <value>20</value> <property>aero/CL_flaps_20</property>
      <value>30</value> <property>aero/CL_flaps_30</property>
    </interpolate1d>
  </function>

  <!-- left-flaperon -->
  <function name="aero/CL_left-flaperon_-51">
    <table>
      <independentVar lookup="row">velocities/mach</independentVar>
      <independentVar lookup="column">aero/alpha-deg</independentVar>
      <independentVar lookup="table">aero/beta-deg</independentVar>
      <tableData breakPoint="0.00000">
                -10.00     -5.00      0.00      5.00     10.00     12.50     15.00     17.50     20.00     25.00     30.00     40.00     50.00     60.00
        0.20000  -0.04378  -0.14848  -0.16607  -0.16128  -0.19002  -0.11985  -0.05671  -0.00133   0.00359  -0.00151  -0.03754  -0.00400  -0.00143  -0.00361
        0.60000  -0.02582  -0.15133  -0.19107  -0.18787  -0.16740  -0.10063  -0.02652   0.00617  -0.00203   0.00245  -0.03559  -0.00553  -0.00221  -0.00312
        0.88000  -0.01186  -0.14502  -0.25715  -0.23921  -0.18422  -0.06322  -0.00253  -0.01974   0.01146  -0.04268  -0.01551  -0.02131  -0.00617  -0.00437
        0.92000  -0.01006  -0.13727  -0.28017  -0.20683  -0.14936  -0.07629   0.02638   0.00592  -0.08308  -0.02318  -0.02268  -0.00840  -0.00697  -0.01329
        0.96000  -0.00052  -0.04138  -0.14188  -0.33382  -0.14480  -0.08297  -0.01377  -0.01608  -0.05057  -0.01613  -0.03349  -0.02880  -0.01197  -0.03185
        0.98000   0.26469   0.17600  -0.24087  -0.38233  -0.14929  -0.09106   0.01510   0.02182   0.00871  -0.01823  -0.05031  -0.07798  -0.02056  -0.02318
        1.01000  -0.01128  -0.00978  -0.21127  -0.24653  -0.03625  -0.04192  -0.02935  -0.04022  -0.04162  -0.14078  -0.09826  -0.04850  -0.01951  -0.00125
      </tableData>

    </table>
  </function>

  <function name="aero/CL_left-flaperon">
    <interpolate1d>
      <property>fcs/surfaces/left-flaperon-pos-deg</property>
      <value>-51</value> <property>aero/CL_left-flaperon_-51</property>
      <value>0</value> <value>0</value>
    </interpolate1d>
  </function>

  <!-- right-flaperon -->
  <function name="aero/CL_right-flaperon_-51">
    <table>
      <independentVar lookup="row">velocities/mach</independentVar>
      <independentVar lookup="column">aero/alpha-deg</independentVar>
      <independentVar lookup="table">aero/beta-deg</independentVar>
      <tableData breakPoint="0.00000">
                -10.00     -5.00      0.00      5.00     10.00     12.50     15.00     17.50     20.00     25.00     30.00     40.00     50.00     60.00
        0.20000  -0.04390  -0.14851  -0.16566  -0.16342  -0.18855  -0.11979  -0.05764  -0.00078   0.00362  -0.00162  -0.03646  -0.00412  -0.00143  -0.00354
        0.60000  -0.02583  -0.15152  -0.19012  -0.20540  -0.16826  -0.10114  -0.02661   0.00543  -0.00128   0.00283  -0.03798  -0.00569  -0.00230  -0.00326
        0.88000  -0.01179  -0.14499  -0.25716  -0.23954  -0.15450  -0.06201  -0.00244  -0.01959   0.01134  -0.04461  -0.01579  -0.02132  -0.00633  -0.00447
        0.92000  -0.01002  -0.13711  -0.28019  -0.22307  -0.14505  -0.07615   0.01367   0.00545  -0.08285  -0.02377  -0.02047  -0.00493  -0.00732  -0.01099
        0.96000  -0.00035  -0.04146  -0.16154  -0.36413  -0.14663  -0.08304  -0.01364  -0.01367  -0.05061  -0.01557  -0.03380  -0.02978  -0.01207  -0.03196
        0.98000   0.26642   0.17483  -0.24270  -0.32777  -0.14988  -0.09486   0.01511   0.02348   0.00846  -0.01829  -0.05038  -0.07671  -0.02013  -0.02337
        1.01000  -0.01128  -0.00976  -0.21129  -0.24476  -0.03626  -0.04200  -0.02977  -0.04020  -0.04160  -0.14087  -0.09900  -0.04863  -0.01944  -0.00111
      </tableData>

    </table>
  </function>

  <function name="aero/CL_right-flaperon">
    <interpolate1d>
      <property>fcs/surfaces/right-flaperon-pos-deg</property>
      <value>-51</value> <property>aero/CL_right-flaperon_-51</property>
      <value>0</value> <value>0</value>
    </interpolate1d>
  </function>

  <!-- rudder -->
  <function name="aero/CL_rudder_-35">
    <table>
      <independentVar lookup="row">velocities/mach</independentVar>
      <independentVar lookup="column">aero/alpha-deg</independentVar>
      <independentVar lookup="table">aero/beta-deg</independentVar>
      <tableData breakPoint="-10.00000">
                -10.00     -5.00      0.00      5.00     10.00     12.50     15.00     17.50     20.00     25.00     30.00     40.00     50.00     60.00
        0.20000   0.00497   0.00577   0.00460   0.00719  -0.00106  -0.00038   0.00337   0.00736   0.01272  -0.00238  -0.08562  -0.02446  -0.00989   0.00267
        0.60000   0.00795   0.00925   0.00943   0.01264  -0.00263  -0.00505   0.00509   0.00876   0.01045  -0.07538  -0.08658  -0.02386  -0.00639   0.01154
        0.88000   0.03282   0.04210   0.04856   0.04698   0.01604   0.02119   0.04860  -0.00511  -0.01639  -0.04716  -0.01496  -0.02353  -0.00163  -0.00596
        0.92000   0.06342   0.06946   0.08304   0.07410   0.04306   0.02673   0.08241  -0.00980  -0.04344  -0.06562  -0.00952  -0.02208  -0.00563  -0.00443
        0.96000   0.15896   0.16244   0.21755   0.06758   0.03311   0.04904   0.02485  -0.03185  -0.03048  -0.04536   0.63643  -0.02871  -0.00727  -0.00342
        0.98000   0.33336   0.25410   0.14918   0.17023   0.11235   0.05671   0.05709   0.18021   0.02430  -0.13323  -0.02072  -0.02842  -0.00797  -0.00447
        1.01000   0.16368   0.15519   0.13407   0.12350   0.10822   0.10116   0.08662   0.07441   0.05378  -0.04842  -0.10450  -0.11068  -0.10176  -0.06001
      </tableData>

      <tableData breakPoint="-5.00000">
                -10.00     -5.00      0.00      5.00     10.00     12.50     15.00     17.50     20.00     25.00     30.00     40.00     50.00     60.00
        0.20000   0.00228   0.00178   0.00164   0.01340  -0.00279  -0.00513  -0.00532   0.00600   0.00789  -0.01108  -0.02067   0.00526  -0.00489  -0.00068
        0.60000   0.00342   0.00312   0.00381   0.01057  -0.00282  -0.01894   0.00226   0.02616   0.02254  -0.01571  -0.05572  -0.01026  -0.00482  -0.00330
        0.88000   0.01000   0.01294   0.04049   0.08959  -0.03809  -0.03907   0.02049   0.00743  -0.06396  -0.05275  -0.03634  -0.01326  -0.00564  -0.00574
        0.92000   0.01817   0.02828   0.14593   0.12654  -0.03282   0.01887  -0.01573   0.01342  -0.00608  -0.02134  -0.03507  -0.01632  -0.00731  -0.00601
        0.96000   0.08570   0.16766   0.09081   0.12396   0.07448  -0.01677   0.03918   0.03992   0.00840  -0.02123  -0.00554  -0.03281  -0.00983  -0.00713
        0.98000   0.21449   0.16789   0.07590   0.50970  -0.00847   0.03300   0.02287   0.01762  -0.03295  -0.02807   0.00407  -0.04432  -0.01080  -0.00913
        1.01000   0.06274   0.06675   0.07011   0.13219   0.06551   0.01707  -0.02169  -0.02271  -0.03254  -0.04784  -0.10911  -0.11051  -0.03425  -0.01361
      </tableData>

      <tableData breakPoint="0.00000">
                -10.00     -5.00      0.00      5.00     10.00     12.50     15.00     17.50     20.00     25.00     30.00     40.00     50.00     60.00
        0.20000   0.00243   0.00077   0.00045  -0.06236  -0.00756   0.00000   0.00369   0.00071  -0.00175  -0.00893  -0.10075  -0.00644  -0.00320  -0.00329
        0.60000   0.00252   0.00136   0.00078  -0.05551  -0.00234   0.00000   0.00033   0.00092  -0.00847  -0.08218  -0.01086  -0.00447  -0.00421  -0.00246
        0.88000   0.00367   0.00242   0.00156   0.00742   0.00073  -0.00268  -0.00115  -0.00042  -0.03823  -0.00662  -0.00639  -0.00671  -0.00728  -0.00418
        0.92000   0.00405   0.00270   0.00250   0.00127   0.00459  -0.00356  -0.00149  -0.00285  -0.07623  -0.00590  -0.00670  -0.00678  -0.00759  -0.00789
        0.96000   0.00487   0.00395   0.01776   0.01586  -0.00344  -0.00300  -0.00241   0.04729  -0.00371  -0.00668  -0.00895  -0.00754  -0.00810  -0.00806
        0.98000   0.05390   0.00491   0.00375   0.00094  -0.00107  -0.04014  -0.02102  -0.00167  -0.00366  -0.00634  -0.00786  -0.00894  -0.00958  -0.00730
        1.01000   0.00848   0.00609   0.00351   0.00058  -0.00202  -0.00354  -0.00492  -0.00622  -0.00764  -0.00988  -0.01147  -0.01344  -0.01328  -0.01065
      </tableData>

      <tableData breakPoint="5.00000">
                -10.00     -5.00      0.00      5.00     10.00     12.50     15.00     17.50     20.00     25.00     30.00     40.00     50.00     60.00
        0.20000   0.00339   0.00505  -0.00427   0.00384  -0.00909   0.02248   0.02278   0.00660  -0.00502  -0.01330   0.00721  -0.02687  -0.01825   0.00000
        0.60000   0.00488   0.00791   0.02416   0.08768  -0.00863   0.05001   0.02455  -0.01393  -0.00550   0.00690  -0.02795  -0.01996   0.00318  -0.00076
        0.88000   0.01471   0.02561   0.04610   3.30544  -0.05739   0.03999   0.02323  -0.00701   0.00411  -0.07041  -0.03429  -0.03417  -0.00112  -0.00291
        0.92000   0.02610   0.04872   0.05704   0.07670  -0.05047   0.02010   0.03139  -0.00854   0.10552  -0.06143  -0.04048  -0.03136  -0.00370  -0.00386
        0.96000   0.10753   0.16180   0.18529   0.11556   0.07756  -0.00596  -0.01696   0.01817  -0.06006  -0.03656  -0.03331  -0.03184  -0.00585  -0.00590
        0.98000   0.21669   0.17215   0.16532   0.10243   0.02205   0.02233   0.01359  -0.01075  -0.02785  -0.00469  -0.03773  -0.03418  -0.00913  -0.01060
        1.01000   0.07109   0.07624   0.07741   0.12644   0.05833   0.00932  -0.02941  -0.01597  -0.02979  -0.04808  -0.11483  -0.09931  -0.03587  -0.00662
      </tableData>

      <tableData breakPoint="10.00000">
                -10.00     -5.00      0.00      5.00     10.00     12.50     15.00     17.50     20.00     25.00     30.00     40.00     50.00     60.00
        0.20000   0.00839   0.01731   0.05900   0.05130   0.01280   0.00611   0.02920   0.02366  -0.01513  -0.04495  -0.09954   0.04725  -0.02192   0.00638
        0.60000   0.01270   0.02215   0.05164   0.02453   0.01241   0.00623   0.02454  -0.00194  -0.04029  -0.06492  -0.07087  -0.02084  -0.00820   0.02276
        0.88000   0.04748   0.06152   0.10744   0.06369   0.00798   0.06875  -0.00789  -0.02240  -0.03452  -0.08162  -0.05887  -0.02441   0.00230  -0.00244
        0.92000   0.07485   0.10158   0.16312   0.08576  -0.02221   0.00476  -0.00951  -0.01479  -0.03452  -0.06498  -0.05946  -0.02328  -0.00278  -0.00022
        0.96000   0.17253   0.22655   0.11540   0.05252   0.06571   0.12358   0.10705   0.06071   0.02500  -0.04286  -0.06735  -0.02578  -0.00438  -0.00046
        0.98000   1.41297   0.09187   0.14933   0.16869   0.09002   0.05524   0.04340   0.02748   0.06573  -0.04722  -0.04020  -0.02142  -0.00432  -0.00324
        1.01000   0.17148   0.16163   0.13777   0.12327   0.10561   0.09831   0.08625   0.07834   0.05371  -0.06078  -0.10884  -0.10199  -0.09896  -0.05320
      </tableData>

    </table>
  </function>

  <function name="aero/CL_rudder_35">
    <table>
      <independentVar lookup="row">velocities/mach</independentVar>
      <independentVar lookup="column">aero/alpha-deg</independentVar>
      <independentVar lookup="table">aero/beta-deg</independentVar>
      <tableData breakPoint="-10.00000">
                -10.00     -5.00      0.00      5.00     10.00     12.50     15.00     17.50     20.00     25.00     30.00     40.00     50.00     60.00
        0.20000   0.00883   0.01725   0.05684   0.05054   0.01258   0.00610   0.03032   0.02480  -0.01347  -0.04611  -0.09938   0.04756  -0.02192   0.00726
        0.60000   0.01314   0.02218   0.05004   0.01884   0.01261   0.00692   0.02427  -0.00196  -0.04135  -0.06682  -0.07066  -0.02045  -0.00849   0.02327
        0.88000   0.04730   0.06148   0.10711   0.06348   0.00793   0.06900  -0.01603  -0.02347  -0.03595  -0.08900  -0.05911  -0.02438   0.00246  -0.00245
        0.92000   0.07444   0.10137   0.16342   0.08557  -0.02301  -0.00271  -0.00979  -0.01598  -0.03457  -0.07910  -0.06006  -0.02055  -0.00391  -0.00015
        0.96000   0.17419   0.22622   0.11593   0.05639   0.06659   0.12430   0.10749   0.06069   0.04174  -0.04174  -0.06643  -0.02277  -0.00433  -0.00041
        0.98000   0.52991   0.09316   0.14913   0.16913   0.07804   0.05493   0.09945   0.02812   0.07963  -0.04775  -0.04110  -0.02155  -0.00424  -0.00124
        1.01000   0.17160   0.16162   0.13771   0.12344   0.10533   0.09787   0.08631   0.07853   0.05400  -0.06066  -0.10876  -0.10200  -0.09896  -0.05312
      </tableData>

      <tableData breakPoint="-5.00000">
                -10.00     -5.00      0.00      5.00     10.00     12.50     15.00     17.50     20.00     25.00     30.00     40.00     50.00     60.00
        0.20000   0.00371   0.00504   0.00367  -0.00557  -0.00924   0.02358   0.02303   0.00585  -0.00565  -0.01294   0.00936  -0.02700  -0.01955   0.00173
        0.60000   0.00503   0.00776   0.02108   0.08489  -0.00763   0.05089   0.02229  -0.01352  -0.00709   0.00538   0.00760  -0.01960   0.00164  -0.00088
        0.88000   0.01453   0.02548   0.05453   1058.26466  -0.05531   0.03945   0.02366  -0.00737   0.00830  -0.06920  -0.03457  -0.03316  -0.00269  -0.00370
        0.92000   0.02589   0.04876   0.05768   0.09823  -0.05121   0.02158   0.03287  -0.00996   0.08760  -0.06164  -0.04105  -0.03108  -0.00489  -0.00413
        0.96000   0.10932   0.16260   0.18507   0.11750   0.07540  -0.01306  -0.01756   0.01436  -0.05603  -0.03685  -0.03250  -0.03022  -0.00595  -0.00589
        0.98000   0.21599   0.17139   0.16781   0.10138   0.02225   0.02358   0.01491  -0.01079  -0.02744  -0.00404  -0.03728  -0.03420  -0.00885  -0.00969
        1.01000   0.07119   0.07626   0.07740   0.12655   0.05782   0.00985  -0.02937  -0.01587  -0.03012  -0.04677  -0.11493  -0.09933  -0.03578  -0.00664
      </tableData>

      <tableData breakPoint="0.00000">
                -10.00     -5.00      0.00      5.00     10.00     12.50     15.00     17.50     20.00     25.00     30.00     40.00     50.00     60.00
        0.20000   0.00221   0.00082   0.00044  -0.00038  -0.00897  -0.00038   0.00383   0.00071  -0.00168  -0.00933  -0.10042  -0.00658  -0.00480  -0.00240
        0.60000   0.00253   0.00147   0.00078   0.03538  -0.00235   0.00019   0.00023   0.00048  -0.01611  -0.08273  -0.01079  -0.00354  -0.00424  -0.00243
        0.88000   0.00365   0.00238   0.00156   0.03736   0.00096  -0.00227  -0.00124   0.00000  -0.03224  -0.00665  -0.00632  -0.00684  -0.00722  -0.00394
        0.92000   0.00412   0.00259   0.00251  -0.00724   0.00253  -0.00322  -0.00155  -0.00244  -0.07648  -0.00589  -0.00671  -0.00680  -0.00752  -0.00817
        0.96000   0.00481   0.00375   0.01793  -0.00522  -0.00223  -0.00247  -0.00234   0.04752  -0.00366  -0.00682  -0.00916  -0.00991  -0.00807  -0.00853
        0.98000   0.12861   0.00455   0.00376  -0.01410  -0.00125  -0.05901  -0.01825  -0.00159  -0.00330  -0.00668  -0.00795  -0.01114  -0.00996  -0.00797
        1.01000   0.00848   0.00610   0.00352   0.00068  -0.00204  -0.00354  -0.00492  -0.00618  -0.00768  -0.00981  -0.01145  -0.01344  -0.01329  -0.01067
      </tableData>

      <tableData breakPoint="5.00000">
                -10.00     -5.00      0.00      5.00     10.00     12.50     15.00     17.50     20.00     25.00     30.00     40.00     50.00     60.00
        0.20000   0.00240   0.00189   0.00166   0.01131  -0.00284  -0.00521  -0.00636   0.00657   0.00805  -0.01047  -0.01955   0.00419  -0.00500  -0.00280
        0.60000   0.00329   0.00329   0.00396   0.01575  -0.00163  -0.01807   0.00119   0.02745   0.02340  -0.01573  -0.05330  -0.01015  -0.00344  -0.00337
        0.88000   0.01013   0.01290   0.04107   0.08587  -0.03944  -0.03227   0.01993   0.00581  -0.06288  -0.05274  -0.03551  -0.01293  -0.00353  -0.00576
        0.92000   0.01836   0.02851   0.14634   0.10045  -0.03170   0.01838   0.00909   0.00787  -0.00597  -0.02136  -0.03439  -0.01624  -0.00708  -0.00585
        0.96000   0.08482   0.16804   0.09011   0.11811   0.07514  -0.01765   0.03396   0.05413   0.00632  -0.02238  -0.00633  -0.03180  -0.00983  -0.00722
        0.98000   0.21278   0.16823   0.07532   0.30259  -0.00857   0.03262   0.02234   0.01748  -0.03378  -0.02859   0.00426  -0.04575  -0.01112  -0.01002
        1.01000   0.06264   0.06673   0.07011   0.13207   0.06601   0.01606  -0.02178  -0.02280  -0.03218  -0.04917  -0.10913  -0.11052  -0.03431  -0.01364
      </tableData>

      <tableData breakPoint="10.00000">
                -10.00     -5.00      0.00      5.00     10.00     12.50     15.00     17.50     20.00     25.00     30.00     40.00     50.00     60.00
        0.20000   0.00466   0.00572   0.00505   0.00533  -0.00212  -0.00045   0.00290   0.00727   0.01314  -0.00186  -0.08591  -0.02461  -0.00939   0.00129
        0.60000   0.00759   0.00923   0.01011   0.01269  -0.00264  -0.00502   0.00571   0.01008   0.01006  -0.07943  -0.08605  -0.02379  -0.00607   0.01043
        0.88000   0.03310   0.04238   0.04908   0.04701   0.01638   0.02296   0.04939  -0.00488  -0.01520  -0.04971  -0.01573  -0.02226  -0.00230  -0.00607
        0.92000   0.06365   0.06951   0.08316   0.07503   0.04190   0.02615   0.08384  -0.02692  -0.04182  -0.06673  -0.00927  -0.02518  -0.00690  -0.00587
        0.96000   0.15722   0.16253   0.21788   0.07273   0.02988   0.04877   0.02684  -0.02948  -0.03347  -0.05056   0.27577  -0.02858  -0.00730  -0.00350
        0.98000   0.33385   0.25021   0.14917   0.16942   0.11355   0.05789   0.05100   0.26996   0.02538  -0.13777  -0.01599  -0.02821  -0.00811  -0.00597
        1.01000   0.16356   0.15523   0.13413   0.12353   0.10850   0.10146   0.08641   0.07429   0.05345  -0.04847  -0.10454  -0.11070  -0.10174  -0.06013
      </tableData>

    </table>
  </function>

  <function name="aero/CL_rudder">
    <interpolate1d>
      <property>fcs/surfaces/rudder-pos-deg</property>
      <value>-35</value> <property>aero/CL_rudder_-35</property>
      <value>0</value> <value>0</value>
      <value>35</value> <property>aero/CL_rudder_35</property>
    </interpolate1d>
  </function>

  <!-- slats -->
  <function name="aero/CL_slats_27.5">
    <table>
      <independentVar lookup="row">velocities/mach</independentVar>
      <independentVar lookup="column">aero/alpha-deg</independentVar>
      <independentVar lookup="table">aero/beta-deg</independentVar>
      <tableData breakPoint="0.00000">
                -10.00     -5.00      0.00      5.00     10.00     12.50     15.00     17.50     20.00     25.00     30.00     40.00     50.00     60.00
        0.20000  -0.00097  -0.00958  -0.01502  -0.01273  -0.00754   0.08139   0.19202   0.24951   0.28390   0.33835   0.37848   0.40909   0.38819   0.26718
        0.60000  -0.03221  -0.00966  -0.01598  -0.01462   0.02435   0.15994   0.24335   0.28624   0.31286   0.36047   0.39984   0.41847   0.40885   0.31896
        0.88000  -0.17713  -0.00892  -0.01676  -0.01720   0.16935   0.26884   0.31486   0.33485   0.34850   0.37770   0.40918   0.42212   0.42009   0.39226
        0.92000  -0.21890  -0.00810  -0.01635  -0.02365   0.21422   0.29260   0.32734   0.34287   0.34800   0.37673   0.40963   0.42225   0.42104   0.39793
        0.96000  -0.26638  -0.00605  -0.01483  -0.05551   0.26034   0.31855   0.33771   0.34911   0.34875   0.36963   0.40792   0.42223   0.42142   0.40125
        0.98000  -0.28543  -0.00338  -0.01250  -0.09230   0.28616   0.32489   0.34446   0.34956   0.34891   0.36155   0.40377   0.42231   0.42061   0.40083
        1.01000  -0.34161  -0.06271  -0.00631   0.05112   0.35137   0.35471   0.35394   0.35318   0.35228   0.35102   0.38868   0.42396   0.42210   0.41840
      </tableData>

    </table>
  </function>

  <function name="aero/CL_slats">
    <interpolate1d>
      <property>fcs/surfaces/slats-pos-deg</property>
      <value>0</value> <value>0</value>
      <value>27.5</value> <property>aero/CL_slats_27.5</property>
    </interpolate1d>
  </function>

  <!-- CDTOT -->
  <!-- base -->
  <function name="aero/CDtot_base">
    <table>
      <independentVar lookup="row">velocities/mach</independentVar>
      <independentVar lookup="column">aero/alpha-deg</independentVar>
      <independentVar lookup="table">aero/beta-deg</independentVar>
      <tableData breakPoint="-10.00000">
                -10.00     -5.00      0.00      5.00     10.00     12.50     15.00     17.50     20.00     25.00     30.00     40.00     50.00     60.00
        0.20000   0.06412   0.03608   0.02620   0.03979   0.06068   0.07930   0.09518   0.11113   0.12460   0.14832   0.19506   0.28591   0.44125   0.73125
        0.60000   0.07170   0.03841   0.02649   0.04379   0.06929   0.08636   0.10406   0.12144   0.13703   0.16214   0.21490   0.32091   0.50472   0.85478
        0.88000   0.08773   0.04473   0.02698   0.05296   0.08782   0.10209   0.12309   0.14264   0.16172   0.19497   0.26044   0.39777   0.63586   1.11320
        0.92000   0.09194   0.04704   0.02708   0.05687   0.09331   0.10838   0.12886   0.15721   0.16944   0.20567   0.27573   0.41795   0.66227   1.15181
        0.96000   0.09778   0.05073   0.02717   0.06307   0.10116   0.11625   0.13730   0.16010   0.18212   0.22137   0.29719   0.44687   0.68710   1.14505
        0.98000   0.10251   0.05396   0.02720   0.06949   0.10745   0.12130   0.14438   0.17211   0.19267   0.23301   0.31760   0.47587   0.70028   1.07555
        1.01000   0.18445   0.10076   0.03215   0.10258   0.18413   0.23367   0.26851   0.31635   0.36593   0.47631   0.59205   0.83501   1.15726   1.62990
      </tableData>

      <tableData breakPoint="-5.00000">
                -10.00     -5.00      0.00      5.00     10.00     12.50     15.00     17.50     20.00     25.00     30.00     40.00     50.00     60.00
        0.20000   0.06252   0.03352   0.02341   0.03430   0.06291   0.07876   0.09335   0.10852   0.12227   0.15613   0.19091   0.28384   0.43841   0.73611
        0.60000   0.07002   0.03585   0.02348   0.03732   0.07077   0.08597   0.10056   0.11856   0.13263   0.17077   0.21008   0.31783   0.50057   0.85899
        0.88000   0.08437   0.04255   0.02360   0.04371   0.08556   0.10070   0.11829   0.13935   0.17413   0.20255   0.25026   0.38556   0.62085   1.10343
        0.92000   0.08815   0.04508   0.02363   0.04720   0.08975   0.10464   0.12345   0.14510   0.18924   0.21255   0.26168   0.40063   0.63885   1.12953
        0.96000   0.09321   0.04932   0.02365   0.05144   0.09419   0.11117   0.13233   0.15111   0.21480   0.22440   0.27567   0.41192   0.63384   1.08127
        0.98000   0.09714   0.05314   0.02367   0.05573   0.09771   0.11657   0.14569   0.15139   0.17340   0.22930   0.28503   0.41045   0.59573   0.94398
        1.01000   0.18099   0.09632   0.02497   0.09551   0.17853   0.24775   0.26408   0.31960   0.39060   0.49632   0.59199   0.84425   1.18252   1.69441
      </tableData>

      <tableData breakPoint="0.00000">
                -10.00     -5.00      0.00      5.00     10.00     12.50     15.00     17.50     20.00     25.00     30.00     40.00     50.00     60.00
        0.20000   0.06201   0.03267   0.02251   0.03322   0.06157   0.07823   0.09268   0.10702   0.12194   0.15373   0.18834   0.28180   0.43756   0.74161
        0.60000   0.06931   0.03501   0.02251   0.03558   0.06888   0.08532   0.10043   0.11620   0.13282   0.16787   0.20719   0.31547   0.49935   0.86481
        0.88000   0.08304   0.04186   0.02251   0.04210   0.08259   0.09919   0.11674   0.13461   0.15571   0.19788   0.24602   0.38077   0.61588   1.10427
        0.92000   0.08663   0.04447   0.02251   0.04445   0.08596   0.10292   0.12120   0.13967   0.16175   0.20622   0.25612   0.39365   0.63055   1.12509
        0.96000   0.09128   0.04893   0.02251   0.04819   0.09017   0.10778   0.12700   0.14597   0.16892   0.21696   0.26726   0.39806   0.61412   1.06110
        0.98000   0.09458   0.05306   0.02251   0.05133   0.09283   0.11158   0.13044   0.14921   0.17238   0.22189   0.26952   0.38197   0.55676   0.90028
        1.01000   0.17979   0.09480   0.02250   0.09335   0.17696   0.21897   0.26340   0.31078   0.36192   0.47715   0.59169   0.84713   1.19132   1.71785
      </tableData>

      <tableData breakPoint="5.00000">
                -10.00     -5.00      0.00      5.00     10.00     12.50     15.00     17.50     20.00     25.00     30.00     40.00     50.00     60.00
        0.20000   0.06254   0.03352   0.02341   0.03433   0.06285   0.07875   0.09338   0.10851   0.12238   0.15615   0.19090   0.28384   0.43846   0.73620
        0.60000   0.07002   0.03585   0.02348   0.03697   0.07077   0.08595   0.10105   0.11853   0.13225   0.17082   0.21005   0.31786   0.50062   0.85907
        0.88000   0.08437   0.04255   0.02360   0.04398   0.08569   0.10068   0.11826   0.13932   0.17390   0.20268   0.25019   0.38550   0.62055   1.10321
        0.92000   0.08815   0.04509   0.02363   0.04640   0.08972   0.10456   0.12345   0.14508   0.18925   0.21256   0.26158   0.40052   0.63874   1.12938
        0.96000   0.09322   0.04933   0.02365   0.05137   0.09435   0.11131   0.13232   0.15107   0.21528   0.22434   0.27552   0.41203   0.63373   1.08095
        0.98000   0.09713   0.05314   0.02367   0.05576   0.09777   0.11663   0.14573   0.15139   0.17308   0.22922   0.28485   0.41019   0.59565   0.94400
        1.01000   0.18097   0.09632   0.02497   0.09549   0.17854   0.24678   0.26409   0.31978   0.39100   0.49675   0.59202   0.84425   1.18255   1.69451
      </tableData>

      <tableData breakPoint="10.00000">
                -10.00     -5.00      0.00      5.00     10.00     12.50     15.00     17.50     20.00     25.00     30.00     40.00     50.00     60.00
        0.20000   0.06414   0.03608   0.02620   0.03984   0.06069   0.07939   0.09521   0.11116   0.12478   0.14830   0.19499   0.28590   0.44142   0.73195
        0.60000   0.07171   0.03841   0.02649   0.04378   0.06932   0.08637   0.10408   0.12143   0.13698   0.16221   0.21480   0.32092   0.50474   0.85465
        0.88000   0.08775   0.04477   0.02698   0.05297   0.08783   0.10207   0.12310   0.14278   0.16170   0.19495   0.26038   0.39754   0.63568   1.11300
        0.92000   0.09196   0.04704   0.02708   0.05686   0.09333   0.10822   0.12895   0.15699   0.16945   0.20565   0.27546   0.41796   0.66209   1.15161
        0.96000   0.09777   0.05073   0.02717   0.06318   0.10117   0.11637   0.13741   0.16011   0.18221   0.22122   0.29677   0.44670   0.68683   1.14493
        0.98000   0.10250   0.05395   0.02720   0.06953   0.10743   0.12148   0.14447   0.17216   0.19246   0.23283   0.31721   0.47566   0.70013   1.07541
        1.01000   0.18444   0.10075   0.03215   0.10254   0.18413   0.23341   0.26851   0.31634   0.36604   0.47633   0.59193   0.83502   1.15728   1.62998
      </tableData>

    </table>
  </function>

  <!-- elevator -->
  <function name="aero/CDtot_elevator_-24">
    <table>
      <independentVar lookup="row">velocities/mach</independentVar>
      <independentVar lookup="column">aero/alpha-deg</independentVar>
      <independentVar lookup="table">aero/beta-deg</independentVar>
      <tableData breakPoint="0.00000">
                -10.00     -5.00      0.00      5.00     10.00     12.50     15.00     17.50     20.00     25.00     30.00     40.00     50.00     60.00
        0.20000   0.04625   0.03723   0.02587   0.01066  -0.03457  -0.02144  -0.02353  -0.03019  -0.03704  -0.04878  -0.05692  -0.06773  -0.07768  -0.11508
        0.60000   0.04837   0.03947   0.02728   0.01058  -0.04362  -0.02408  -0.02581  -0.03273  -0.03972  -0.05241  -0.06190  -0.07489  -0.08457  -0.12566
        0.88000   0.05401   0.04542   0.03114   0.01129  -0.06568  -0.02639  -0.02786  -0.03397  -0.04322  -0.05917  -0.07464  -0.09409  -0.09749  -0.12382
        0.92000   0.05538   0.04733   0.03246   0.01179  -0.07198  -0.02555  -0.02733  -0.03353  -0.04328  -0.06097  -0.07879  -0.10194  -0.10116  -0.11440
        0.96000   0.05695   0.04998   0.03445   0.01289  -0.08262  -0.02237  -0.02529  -0.03160  -0.04197  -0.06386  -0.08486  -0.11568  -0.10590  -0.09467
        0.98000   0.05678   0.05159   0.03603   0.01428  -0.09339  -0.01835  -0.02186  -0.02838  -0.03973  -0.06648  -0.09064  -0.12879  -0.10992  -0.07207
        1.01000   0.10860   0.09634   0.07981   0.06056   0.03611   0.02228   0.00681  -0.01066  -0.03078  -0.07995  -0.12160  -0.20101  -0.23793  -0.17616
      </tableData>

    </table>
  </function>

  <function name="aero/CDtot_elevator_-9.5">
    <table>
      <independentVar lookup="row">velocities/mach</independentVar>
      <independentVar lookup="column">aero/alpha-deg</independentVar>
      <independentVar lookup="table">aero/beta-deg</independentVar>
      <tableData breakPoint="0.00000">
                -10.00     -5.00      0.00      5.00     10.00     12.50     15.00     17.50     20.00     25.00     30.00     40.00     50.00     60.00
        0.20000   0.01982   0.01498   0.00677  -0.00490  -0.01106  -0.01514  -0.01848  -0.02144  -0.02391  -0.02691  -0.02509  -0.02331  -0.03135  -0.05754
        0.60000   0.02133   0.01698   0.00803  -0.00562  -0.01268  -0.01718  -0.02071  -0.02416  -0.02680  -0.02967  -0.02755  -0.02436  -0.03376  -0.06121
        0.88000   0.02488   0.02066   0.01129  -0.00720  -0.01638  -0.02086  -0.02502  -0.02840  -0.03374  -0.03696  -0.03433  -0.02516  -0.03499  -0.06244
        0.92000   0.02579   0.02164   0.01216  -0.00769  -0.01686  -0.02148  -0.02592  -0.02951  -0.03545  -0.04005  -0.03761  -0.02484  -0.03363  -0.05820
        0.96000   0.02707   0.02303   0.01326  -0.00866  -0.01700  -0.02177  -0.02681  -0.03083  -0.03778  -0.04620  -0.04433  -0.02278  -0.02911  -0.04858
        0.98000   0.02772   0.02404   0.01406  -0.00998  -0.01649  -0.02217  -0.02708  -0.03156  -0.03971  -0.05250  -0.05154  -0.01978  -0.02336  -0.03747
        1.01000   0.09104   0.04396   0.03055   0.01335  -0.00965  -0.02245  -0.03648  -0.05128  -0.06644  -0.09836  -0.10903  -0.06722  -0.05950  -0.09073
      </tableData>

    </table>
  </function>

  <function name="aero/CDtot_elevator_-3">
    <table>
      <independentVar lookup="row">velocities/mach</independentVar>
      <independentVar lookup="column">aero/alpha-deg</independentVar>
      <independentVar lookup="table">aero/beta-deg</independentVar>
      <tableData breakPoint="0.00000">
                -10.00     -5.00      0.00      5.00     10.00     12.50     15.00     17.50     20.00     25.00     30.00     40.00     50.00     60.00
        0.20000   0.00569   0.00321   0.00055  -0.00291  -0.00497  -0.00635  -0.00726  -0.00814  -0.00900  -0.00799  -0.00622  -0.00838  -0.01276  -0.02403
        0.60000   0.00662   0.00380   0.00069  -0.00455  -0.00580  -0.00721  -0.00827  -0.00930  -0.01022  -0.00812  -0.00652  -0.00873  -0.01335  -0.02644
        0.88000   0.00884   0.00505   0.00105  -0.00679  -0.00763  -0.00912  -0.01042  -0.01062  -0.01304  -0.00902  -0.00663  -0.00902  -0.01395  -0.02683
        0.92000   0.00942   0.00551   0.00117  -0.00763  -0.00805  -0.00961  -0.01097  -0.01106  -0.01372  -0.01015  -0.00657  -0.00867  -0.01334  -0.02447
        0.96000   0.01031   0.00608   0.00136  -0.00901  -0.00852  -0.01010  -0.01170  -0.01159  -0.01473  -0.01324  -0.00690  -0.00762  -0.01138  -0.02058
        0.98000   0.01083   0.00647   0.00151  -0.01032  -0.00874  -0.01103  -0.01214  -0.01366  -0.01542  -0.01646  -0.00739  -0.00581  -0.00931  -0.01529
        1.01000   0.02046   0.01213   0.00404  -0.00355  -0.01227  -0.01659  -0.02099  -0.02544  -0.03023  -0.03982  -0.02677  -0.01526  -0.02113  -0.03335
      </tableData>

    </table>
  </function>

  <function name="aero/CDtot_elevator_1.5">
    <table>
      <independentVar lookup="row">velocities/mach</independentVar>
      <independentVar lookup="column">aero/alpha-deg</independentVar>
      <independentVar lookup="table">aero/beta-deg</independentVar>
      <tableData breakPoint="0.00000">
                -10.00     -5.00      0.00      5.00     10.00     12.50     15.00     17.50     20.00     25.00     30.00     40.00     50.00     60.00
        0.20000  -0.00259  -0.00135   0.00000   0.00129   0.00268   0.00327   0.00378   0.00424   0.00404   0.00275   0.00293   0.00414   0.00644   0.01377
        0.60000  -0.00296  -0.00150   0.00000   0.00156   0.00317   0.00394   0.00433   0.00483   0.00390   0.00276   0.00311   0.00443   0.00725   0.01485
        0.88000  -0.00388  -0.00191   0.00000   0.00230   0.00423   0.00528   0.00561   0.00589   0.00426   0.00291   0.00319   0.00439   0.00735   0.01491
        0.92000  -0.00412  -0.00202   0.00011   0.00258   0.00450   0.00563   0.00592   0.00622   0.00456   0.00292   0.00306   0.00427   0.00700   0.01419
        0.96000  -0.00438  -0.00216   0.00016   0.00330   0.00494   0.00624   0.00639   0.00697   0.00586   0.00270   0.00551   0.00371   0.00612   0.01179
        0.98000  -0.00455  -0.00225   0.00019   0.00399   0.00507   0.00598   0.00651   0.00735   0.00731   0.00264   0.00414   0.00301   0.00477   0.00932
        1.01000  -0.00747  -0.00324   0.00075   0.01097   0.00889   0.01087   0.01299   0.01521   0.01730   0.01169   0.00610   0.00786   0.01129   0.01847
      </tableData>

    </table>
  </function>

  <function name="aero/CDtot_elevator">
    <interpolate1d>
      <property>fcs/surfaces/elevator-pos-deg</property>
      <value>-24</value> <property>aero/CDtot_elevator_-24</property>
      <value>-9.5</value> <property>aero/CDtot_elevator_-9.5</property>
      <value>-3</value> <property>aero/CDtot_elevator_-3</property>
      <value>0</value> <value>0</value>
      <value>1.5</value> <property>aero/CDtot_elevator_1.5</property>
    </interpolate1d>
  </function>

  <!-- flaps -->
  <function name="aero/CDtot_flaps_20">
    <table>
      <independentVar lookup="row">velocities/mach</independentVar>
      <independentVar lookup="column">aero/alpha-deg</independentVar>
      <independentVar lookup="table">aero/beta-deg</independentVar>
      <tableData breakPoint="0.00000">
                -10.00     -5.00      0.00      5.00     10.00     12.50     15.00     17.50     20.00     25.00     30.00     40.00     50.00     60.00
        0.20000  -0.02411  -0.00372   0.01634   0.03267   0.05568   0.06518   0.07499   0.08430   0.09201   0.11163   0.13925   0.21203   0.31664   0.37072
        0.60000  -0.02884  -0.00473   0.02073   0.04201   0.06821   0.07778   0.08716   0.09482   0.10238   0.12558   0.15749   0.24537   0.37951   0.51545
        0.88000  -0.03694  -0.00734   0.03691   0.08049   0.09339   0.10170   0.11024   0.11954   0.12667   0.15724   0.19970   0.32230   0.51476   0.83198
        0.92000  -0.03905  -0.00803   0.04468   0.07350   0.10029   0.10958   0.11732   0.12687   0.13462   0.16673   0.21164   0.34284   0.53867   0.89372
        0.96000  -0.04181  -0.00863   0.04614   0.15195   0.11297   0.12080   0.12800   0.13901   0.14760   0.17855   0.22490   0.36099   0.54544   0.89951
        0.98000  -0.04409  -0.00834   0.07323   0.66397   0.12308   0.12952   0.13725   0.14591   0.15766   0.18610   0.23007   0.36347   0.51972   0.82904
        1.01000   0.09529   0.06235   0.16114   0.17686   0.22128   0.23757   0.25583   0.27584   0.29773   0.34822   0.43124   0.69308   0.97498   1.39993
      </tableData>

    </table>
  </function>

  <function name="aero/CDtot_flaps_30">
    <table>
      <independentVar lookup="row">velocities/mach</independentVar>
      <independentVar lookup="column">aero/alpha-deg</independentVar>
      <independentVar lookup="table">aero/beta-deg</independentVar>
      <tableData breakPoint="0.00000">
                -10.00     -5.00      0.00      5.00     10.00     12.50     15.00     17.50     20.00     25.00     30.00     40.00     50.00     60.00
        0.20000  -0.02388   0.00399   0.03032   0.05166   0.07767   0.08319   0.08997   0.09660   0.10251   0.12133   0.14830   0.22083   0.32576   0.37930
        0.60000  -0.02859   0.00504   0.03876   0.06928   0.08823   0.09478   0.10020   0.10674   0.11362   0.13562   0.16743   0.25541   0.39024   0.52479
        0.88000  -0.03595   0.00984   0.06835   0.08783   0.11101   0.11827   0.12477   0.13364   0.14056   0.16987   0.21409   0.33775   0.53145   0.84554
        0.92000  -0.03733   0.01273   0.08170   0.09364   0.11926   0.12640   0.13300   0.14245   0.15039   0.18245   0.22772   0.36066   0.55792   0.90762
        0.96000  -0.03848   0.01915   0.08979   0.29758   0.13284   0.13920   0.14626   0.15795   0.16595   0.19737   0.24671   0.38296   0.56863   0.91832
        0.98000  -0.03781   0.02789   0.11346   0.48308   0.14448   0.14905   0.15941   0.16687   0.17862   0.20701   0.25218   0.38853   0.54774   0.85153
        1.01000   0.16424   0.16794   0.25734   0.24182   0.27697   0.28791   0.30139   0.31726   0.33531   0.37988   0.45895   0.72046   1.00293   1.42098
      </tableData>

    </table>
  </function>

  <function name="aero/CDtot_flaps">
    <interpolate1d>
      <property>fcs/surfaces/flaps-pos-deg</property>
      <value>0</value> <value>0</value>
      <value>20</value> <property>aero/CDtot_flaps_20</property>
      <value>30</value> <property>aero/CDtot_flaps_30</property>
    </interpolate1d>
  </function>

  <!-- left-flaperon -->
  <function name="aero/CDtot_left-flaperon_-51">
    <table>
      <independentVar lookup="row">velocities/mach</independentVar>
      <independentVar lookup="column">aero/alpha-deg</independentVar>
      <independentVar lookup="table">aero/beta-deg</independentVar>
      <tableData breakPoint="0.00000">
                -10.00     -5.00      0.00      5.00     10.00     12.50     15.00     17.50     20.00     25.00     30.00     40.00     50.00     60.00
        0.20000   0.00922   0.01221   0.00513  -0.00272  -0.01026  -0.01137  -0.00963  -0.00694  -0.00327  -0.00498  -0.01082  -0.00727  -0.00760  -0.00814
        0.60000   0.00862   0.01401   0.00635  -0.00407  -0.01209  -0.01151  -0.00857  -0.00781  -0.00504   0.01054  -0.00992  -0.00919  -0.00996  -0.01088
        0.88000   0.00906   0.01792   0.00864  -0.00305  -0.00708  -0.01116  -0.01015  -0.01322   0.08116   0.00632  -0.01260  -0.01593  -0.01982  -0.02414
        0.92000   0.00962   0.01943   0.01231   0.05720  -0.01086  -0.01169  -0.01055  -0.01634   0.12698   0.00515  -0.01444  -0.01912  -0.02386  -0.02848
        0.96000   0.01291   0.02688  -0.01022   0.07314  -0.01532  -0.01368  -0.01211   0.10462   0.32305   0.00477  -0.01575  -0.02542  -0.03210  -0.04253
        0.98000   0.02263   0.00551   0.02011  -0.00123  -0.01604  -0.01514  -0.00375  -0.01030   0.07839   0.00390  -0.01925  -0.03451  -0.04463  -0.06272
        1.01000   0.02954   0.04481   0.07256   0.01585   0.02888   0.06296   0.04279   0.00937  -0.04336  -0.02463   0.00042  -0.08163   0.05270   0.04100
      </tableData>

    </table>
  </function>

  <function name="aero/CDtot_left-flaperon">
    <interpolate1d>
      <property>fcs/surfaces/left-flaperon-pos-deg</property>
      <value>-51</value> <property>aero/CDtot_left-flaperon_-51</property>
      <value>0</value> <value>0</value>
    </interpolate1d>
  </function>

  <!-- right-flaperon -->
  <function name="aero/CDtot_right-flaperon_-51">
    <table>
      <independentVar lookup="row">velocities/mach</independentVar>
      <independentVar lookup="column">aero/alpha-deg</independentVar>
      <independentVar lookup="table">aero/beta-deg</independentVar>
      <tableData breakPoint="0.00000">
                -10.00     -5.00      0.00      5.00     10.00     12.50     15.00     17.50     20.00     25.00     30.00     40.00     50.00     60.00
        0.20000   0.00922   0.01218   0.00508  -0.00311  -0.01023  -0.01142  -0.00962  -0.00695  -0.00322  -0.00516  -0.01079  -0.00732  -0.00770  -0.00841
        0.60000   0.00862   0.01401   0.00625  -0.00518  -0.01204  -0.01154  -0.00857  -0.00782  -0.00548   0.00944  -0.01002  -0.00922  -0.01008  -0.01096
        0.88000   0.00903   0.01793   0.00856  -0.00365   0.00928  -0.01113  -0.01016  -0.01307   0.08087   0.00649  -0.01264  -0.01595  -0.01992  -0.02442
        0.92000   0.00961   0.01941   0.01255  -0.00569  -0.01045  -0.01169  -0.01049  -0.01633   0.13139   0.00518  -0.01430  -0.01911  -0.02399  -0.02802
        0.96000   0.01293   0.02678  -0.00928   0.00042  -0.01529  -0.01367  -0.01211   0.10017   0.31913   0.00490  -0.01588  -0.02542  -0.03212  -0.04270
        0.98000   0.02085   0.00726   0.02029  -0.00057  -0.01604  -0.01456  -0.00358  -0.01042   0.08032   0.00415  -0.01935  -0.03428  -0.04457  -0.06287
        1.01000   0.02954   0.04480   0.07258   0.01286   0.02901   0.06294   0.04259   0.00935  -0.04370  -0.02459   0.00129  -0.08145   0.05244   0.04085
      </tableData>

    </table>
  </function>

  <function name="aero/CDtot_right-flaperon">
    <interpolate1d>
      <property>fcs/surfaces/right-flaperon-pos-deg</property>
      <value>-51</value> <property>aero/CDtot_right-flaperon_-51</property>
      <value>0</value> <value>0</value>
    </interpolate1d>
  </function>

  <!-- rudder -->
  <function name="aero/CDtot_rudder_-35">
    <table>
      <independentVar lookup="row">velocities/mach</independentVar>
      <independentVar lookup="column">aero/alpha-deg</independentVar>
      <independentVar lookup="table">aero/beta-deg</independentVar>
      <tableData breakPoint="-10.00000">
                -10.00     -5.00      0.00      5.00     10.00     12.50     15.00     17.50     20.00     25.00     30.00     40.00     50.00     60.00
        0.20000  -0.00230  -0.00269  -0.00117   0.00051   0.00342   0.00218   0.00081  -0.00095  -0.00349   0.00778   0.01490  -0.00695  -0.00809  -0.00790
        0.60000  -0.00117  -0.00111   0.00074   0.00471   0.00686   0.00574   0.00226   0.00023  -0.00333   0.02262   0.01986  -0.00607  -0.00883  -0.00946
        0.88000   0.00857   0.01485   0.01958   0.03339   0.04114   0.02329   0.01489   0.01302  -0.05803   0.04207   0.00557  -0.00807  -0.01006  -0.01052
        0.92000   0.01895   0.03300   0.03801   0.03902   0.03849   0.01447   0.00587   0.01025   0.08203   0.03085   0.00591  -0.00932  -0.01100  -0.01163
        0.96000   0.03075   0.03792   0.02189  -0.02603   0.01639   0.01569   0.01311   0.01063  -0.00758   0.03673  -0.09264  -0.01475  -0.01446  -0.01510
        0.98000  -0.06602  -0.06968   0.04297  -0.01296   0.06243   0.01741   0.12105  -0.48552  -0.06830   0.05538   0.03601  -0.02203  -0.01883  -0.01763
        1.01000  -0.02094  -0.00737   0.00414   0.01842   0.02324   0.01217   0.02192   0.01076   0.01222  -0.03052  -0.05183  -0.05827  -0.10713  -0.09933
      </tableData>

      <tableData breakPoint="-5.00000">
                -10.00     -5.00      0.00      5.00     10.00     12.50     15.00     17.50     20.00     25.00     30.00     40.00     50.00     60.00
        0.20000   0.00233   0.00285   0.00187   0.00355   0.00177   0.00380   0.00537   0.00188   0.00067  -0.00185  -0.00085  -0.00662   0.00048   0.00022
        0.60000   0.00305   0.00368   0.00239   0.00660   0.00295   0.00651   0.00752   0.00181   0.00088  -0.00274  -0.00298   0.00000   0.00085   0.00028
        0.88000   0.00622   0.00676   0.00990   0.04760   0.00459   0.00941   0.01297  -0.00092  -0.02119  -0.00537  -0.00107   0.00201   0.00310   0.00082
        0.92000   0.00848   0.00831   0.02974   0.00493   0.00441   0.01704   0.01072   0.08853  -0.02981  -0.01380   0.00000   0.00224   0.00324   0.00057
        0.96000   0.02194  -0.00589   0.03852  -0.07610   0.00984   0.00115   0.01199   0.12319   0.16315   0.09296   0.00265   0.00164   0.00270   0.00068
        0.98000  -0.00246   0.03088   0.04643  -0.34121   0.02674   0.20197   0.16531   0.22040   0.18402   0.06558   0.00335  -0.00149   0.00243  -0.00079
        1.01000   0.00546   0.00841   0.01002   0.03193   0.04712   0.02356   0.01153   0.02773  -0.03877  -0.02772  -0.04714  -0.04817  -0.02567   0.00041
      </tableData>

      <tableData breakPoint="0.00000">
                -10.00     -5.00      0.00      5.00     10.00     12.50     15.00     17.50     20.00     25.00     30.00     40.00     50.00     60.00
        0.20000   0.00683   0.00747   0.00579   0.00264   0.00608   0.00587   0.00511   0.00280   0.01763   0.02273   0.00532   0.00403   0.00406   0.00285
        0.60000   0.00799   0.00869   0.00710   0.00331   0.00733   0.00731   0.00652   0.00346   0.01372   0.02815   0.00487   0.00439   0.00559   0.00333
        0.88000   0.01118   0.01230   0.01075   0.01135   0.01068   0.01085   0.01098   0.00713   0.12073   0.00520   0.00966   0.00855   0.00654   0.00480
        0.92000   0.01239   0.01371   0.01128   0.01341   0.01145   0.01223   0.01263   0.00920   0.06787   0.00791   0.01101   0.00962   0.00729   0.00473
        0.96000   0.01455   0.01643   0.00493   0.01784   0.01638   0.01484   0.01507   0.00790  -0.00782   0.01137   0.01298   0.01132   0.00874   0.00519
        0.98000   0.01888   0.01608   0.01544   0.03102   0.01673   0.01631   0.01667   0.01662   0.00394   0.01381   0.01509   0.01276   0.00982   0.00552
        1.01000   0.02973   0.03164   0.03282   0.03245   0.03338   0.03312   0.03276   0.03223   0.03126   0.02918   0.02631   0.02019   0.01380   0.00752
      </tableData>

      <tableData breakPoint="5.00000">
                -10.00     -5.00      0.00      5.00     10.00     12.50     15.00     17.50     20.00     25.00     30.00     40.00     50.00     60.00
        0.20000   0.01186   0.01221   0.05900   0.03658   0.00934   0.00854   0.00814   0.01173   0.01497   0.01522   0.01451   0.00488   0.00500   0.00302
        0.60000   0.01359   0.01253   0.01160   0.03302   0.00927   0.01072   0.01036   0.01161   0.01361   0.02190   0.01661   0.00690   0.00570   0.00306
        0.88000   0.01825   0.00979   0.03061  -0.03974   0.00830   0.01080   0.01081   0.02074   0.03417  -0.00290   0.00495   0.01035   0.00845   0.00486
        0.92000   0.02094   0.00372   0.04608   0.05388   0.00619   0.02904   0.03246   0.03385  -0.28964  -0.00273   0.00465   0.01113   0.00887   0.00479
        0.96000   0.03752  -0.00470   0.03276   0.11401   0.04540   0.01618   0.00709   0.22995   0.04027  -0.00251   0.00084   0.01152   0.00971   0.00558
        0.98000  -0.00522   0.02519   0.02696   0.02709   0.01375   0.00082   0.03879   0.01779   0.06667   0.00351  -0.00810   0.01012   0.00937   0.00401
        1.01000   0.02993   0.03561   0.04208   0.04623   0.03809   0.04294   0.00261   0.02919  -0.03790  -0.01795  -0.02613  -0.06225  -0.00989   0.01065
      </tableData>

      <tableData breakPoint="10.00000">
                -10.00     -5.00      0.00      5.00     10.00     12.50     15.00     17.50     20.00     25.00     30.00     40.00     50.00     60.00
        0.20000   0.02534   0.05111   0.02771   0.02583   0.01722   0.01114   0.01517   0.02366   0.03143   0.03771   0.00019   0.02484   0.01107   0.01042
        0.60000   0.02873   0.05982   0.03354   0.03360   0.02359   0.01595   0.01729   0.02992   0.03785   0.05446  -0.01231   0.06785   0.01173   0.00993
        0.88000   0.04343   0.10709   0.07158   0.06071   0.06233   0.03269   0.02962   0.00884   0.00627   0.14185  -0.00855   0.01495   0.01399   0.00814
        0.92000   0.05479   0.16090   0.05614   0.08028   0.05640   0.02792   0.02727   0.00659   0.00534   0.14200  -0.01418   0.01385   0.01326   0.00656
        0.96000   0.04462   0.04205   0.05450   0.03805   0.05673   0.02636   0.03151  -0.00396  -0.02318   0.08447  -0.02589   0.00930   0.00979   0.00129
        0.98000  -0.66116   0.03468   0.04042   0.02772   0.16103   0.01349   0.04739   0.14538   0.31568   0.01353  -0.03710   0.00197   0.00382  -0.00362
        1.01000   0.01384   0.02608   0.03411   0.04029   0.03956   0.03664   0.03492   0.01574   0.02910   0.02359  -0.02808  -0.05810  -0.08979  -0.07223
      </tableData>

    </table>
  </function>

  <function name="aero/CDtot_rudder_35">
    <table>
      <independentVar lookup="row">velocities/mach</independentVar>
      <independentVar lookup="column">aero/alpha-deg</independentVar>
      <independentVar lookup="table">aero/beta-deg</independentVar>
      <tableData breakPoint="-10.00000">
                -10.00     -5.00      0.00      5.00     10.00     12.50     15.00     17.50     20.00     25.00     30.00     40.00     50.00     60.00
        0.20000   0.02530   0.05078   0.02706   0.02639   0.01724   0.01130   0.01531   0.02402   0.03137   0.03754   0.00000   0.02475   0.01097   0.01127
        0.60000   0.02860   0.05945   0.03334   0.03249   0.02395   0.01622   0.01755   0.02987   0.03790   0.05365  -0.01232   0.06654   0.01180   0.00988
        0.88000   0.04336   0.10685   0.07156   0.06058   0.06228   0.03283   0.02840   0.00962   0.00640   0.13250  -0.00860   0.01487   0.01427   0.00817
        0.92000   0.05457   0.16034   0.05677   0.08024   0.05662   0.02617   0.02734   0.00646   0.00524   0.14252  -0.01453   0.01409   0.01312   0.00646
        0.96000   0.04455   0.04240   0.05479   0.03816   0.05688   0.02647   0.02916  -0.00428  -0.06126   0.08643  -0.02627   0.00923   0.00966   0.00159
        0.98000  -0.35989   0.03406   0.04033   0.02931   0.16702   0.01365   0.04670   0.14337   0.32071   0.01298  -0.03726   0.00190   0.00380  -0.00279
        1.01000   0.01390   0.02612   0.03418   0.04023   0.03951   0.03687   0.03544   0.01528   0.02922   0.02345  -0.02825  -0.05809  -0.08978  -0.07200
      </tableData>

      <tableData breakPoint="-5.00000">
                -10.00     -5.00      0.00      5.00     10.00     12.50     15.00     17.50     20.00     25.00     30.00     40.00     50.00     60.00
        0.20000   0.01183   0.01210   0.04924   0.03344   0.00927   0.00860   0.00821   0.01171   0.01505   0.01508   0.01488   0.00490   0.00513   0.00307
        0.60000   0.01354   0.01247   0.01241   0.03328   0.00929   0.01075   0.01086   0.01162   0.01314   0.02194   0.01385   0.00692   0.00575   0.00287
        0.88000   0.01821   0.00981   0.02003   48.98134   0.00854   0.01074   0.01086   0.02207   0.03321  -0.00281   0.00488   0.01043   0.00815   0.00465
        0.92000   0.02096   0.00370   0.04679   0.05571   0.00617   0.02887   0.03218   0.03413  -0.27265  -0.00281   0.00453   0.01114   0.00871   0.00480
        0.96000   0.03801  -0.00490   0.03278   0.11201   0.04474   0.01608   0.00688   0.19922   0.04456  -0.00257   0.00071   0.01174   0.00965   0.00555
        0.98000  -0.00778   0.02678   0.02658   0.02659   0.01382   0.00095   0.03903   0.01794   0.06700   0.00356  -0.00823   0.01000   0.00926   0.00554
        1.01000   0.02993   0.03557   0.04213   0.04630   0.03803   0.04077   0.00263   0.02938  -0.03751  -0.01752  -0.02600  -0.06223  -0.00977   0.01072
      </tableData>

      <tableData breakPoint="0.00000">
                -10.00     -5.00      0.00      5.00     10.00     12.50     15.00     17.50     20.00     25.00     30.00     40.00     50.00     60.00
        0.20000   0.00685   0.00748   0.00578   0.00660   0.00605   0.00601   0.00509   0.00275   0.01742   0.02305   0.00539   0.00405   0.00415   0.00282
        0.60000   0.00801   0.00869   0.00709   0.00965   0.00738   0.00746   0.00658   0.00379   0.02573   0.02859   0.00484   0.00430   0.00557   0.00332
        0.88000   0.01118   0.01230   0.01073  -0.00950   0.01082   0.01082   0.01089   0.00704   0.11256   0.00506   0.00963   0.00856   0.00661   0.00480
        0.92000   0.01233   0.01369   0.01122   0.00961   0.01166   0.01225   0.01263   0.00941   0.06696   0.00778   0.01096   0.00965   0.00736   0.00471
        0.96000   0.01449   0.01636   0.00492   0.02048   0.01603   0.01487   0.01505   0.00785  -0.00885   0.01102   0.01295   0.01095   0.00883   0.00516
        0.98000   0.02953   0.01627   0.01544   0.03039   0.01688   0.01467   0.01623   0.01665   0.00308   0.01336   0.01513   0.01245   0.01001   0.00528
        1.01000   0.02973   0.03163   0.03282   0.03395   0.03338   0.03311   0.03277   0.03226   0.03125   0.02844   0.02629   0.02019   0.01382   0.00754
      </tableData>

      <tableData breakPoint="5.00000">
                -10.00     -5.00      0.00      5.00     10.00     12.50     15.00     17.50     20.00     25.00     30.00     40.00     50.00     60.00
        0.20000   0.00231   0.00284   0.00186   0.00357   0.00175   0.00379   0.00535   0.00188   0.00061  -0.00153  -0.00065  -0.00667   0.00051   0.00024
        0.60000   0.00307   0.00367   0.00238   0.00686   0.00280   0.00646   0.00702   0.00190   0.00125  -0.00165  -0.00261   0.00000   0.00081   0.00030
        0.88000   0.00623   0.00676   0.00995   0.04678   0.00443   0.00947   0.01302  -0.00044  -0.02101  -0.00568  -0.00093   0.00199   0.00352   0.00092
        0.92000   0.00851   0.00828   0.02966   0.00842   0.00437   0.01684   0.00859   0.08942  -0.02966  -0.01323   0.00000   0.00225   0.00326   0.00067
        0.96000   0.02175  -0.00595   0.03874  -0.07148   0.01021   0.00107   0.01131   0.13300   0.16050   0.08770   0.00268   0.00155   0.00275   0.00087
        0.98000  -0.00361   0.03080   0.04625  -0.19632   0.02744   0.20696   0.16566   0.22316   0.18364   0.06517   0.00344  -0.00129   0.00254  -0.00106
        1.01000   0.00553   0.00845   0.00999   0.03197   0.04716   0.02820   0.01157   0.02738  -0.03921  -0.02815  -0.04710  -0.04810  -0.02579   0.00040
      </tableData>

      <tableData breakPoint="10.00000">
                -10.00     -5.00      0.00      5.00     10.00     12.50     15.00     17.50     20.00     25.00     30.00     40.00     50.00     60.00
        0.20000  -0.00228  -0.00269  -0.00107   0.00048   0.00340   0.00209   0.00077  -0.00099  -0.00371   0.00774   0.01498  -0.00691  -0.00815  -0.00847
        0.60000  -0.00114  -0.00108   0.00091   0.00454   0.00695   0.00571   0.00221   0.00024  -0.00336   0.02238   0.02011  -0.00602  -0.00878  -0.00945
        0.88000   0.00858   0.01496   0.01990   0.03341   0.04121   0.02339   0.01494   0.01281  -0.06035   0.04048   0.00568  -0.00794  -0.01013  -0.01052
        0.92000   0.01898   0.03299   0.03785   0.03914   0.03848   0.01471   0.00589   0.01385   0.08609   0.03036   0.00627  -0.00956  -0.01117  -0.01166
        0.96000   0.03155   0.03800   0.02185  -0.02714   0.01611   0.01539   0.01310   0.01003  -0.00775   0.03832  -0.04159  -0.01473  -0.01433  -0.01521
        0.98000  -0.06638  -0.09127   0.04275  -0.01291   0.06332   0.01746   0.12157  -0.65211  -0.06926   0.05407   0.03762  -0.02198  -0.01878  -0.01846
        1.01000  -0.02092  -0.00721   0.00409   0.01850   0.02329   0.01249   0.02187   0.01103   0.01214  -0.03053  -0.05173  -0.05825  -0.10717  -0.09949
      </tableData>

    </table>
  </function>

  <function name="aero/CDtot_rudder">
    <interpolate1d>
      <property>fcs/surfaces/rudder-pos-deg</property>
      <value>-35</value> <property>aero/CDtot_rudder_-35</property>
      <value>0</value> <value>0</value>
      <value>35</value> <property>aero/CDtot_rudder_35</property>
    </interpolate1d>
  </function>

  <!-- slats -->
  <function name="aero/CDtot_slats_27.5">
    <table>
      <independentVar lookup="row">velocities/mach</independentVar>
      <independentVar lookup="column">aero/alpha-deg</independentVar>
      <independentVar lookup="table">aero/beta-deg</independentVar>
      <tableData breakPoint="0.00000">
                -10.00     -5.00      0.00      5.00     10.00     12.50     15.00     17.50     20.00     25.00     30.00     40.00     50.00     60.00
        0.20000   0.00119   0.00054  -0.00015  -0.00081  -0.00143   0.00328   0.01323   0.02211   0.02926   0.04222   0.05699   0.08911   0.12694   0.11367
        0.60000   0.00334   0.00066  -0.00015  -0.00103   0.00000   0.00973   0.02033   0.02857   0.03456   0.04807   0.06535   0.10127   0.14816   0.17907
        0.88000   0.01666   0.00093  -0.00015  -0.00106   0.01132   0.02429   0.03286   0.03818   0.04283   0.05929   0.08101   0.12483   0.18581   0.28845
        0.92000   0.02173   0.00098  -0.00015  -0.00090   0.01579   0.02836   0.03564   0.04011   0.04486   0.06181   0.08488   0.13003   0.19160   0.29736
        0.96000   0.02906   0.00098  -0.00015   0.00000   0.02254   0.03382   0.03840   0.04269   0.04781   0.06378   0.08909   0.13399   0.19285   0.30125
        0.98000   0.03375   0.00089  -0.00015   0.02336   0.02814   0.03622   0.04013   0.04468   0.04982   0.06363   0.09016   0.13360   0.18974   0.30799
        1.01000   0.17155   0.11092   0.04118  -0.02004   0.00733   0.01720   0.02789   0.03949   0.05148   0.07694   0.12612   0.22352   0.30787   0.39627
      </tableData>

    </table>
  </function>

  <function name="aero/CDtot_slats">
    <interpolate1d>
      <property>fcs/surfaces/slats-pos-deg</property>
      <value>0</value> <value>0</value>
      <value>27.5</value> <property>aero/CDtot_slats_27.5</property>
    </interpolate1d>
  </function>

  <!-- CS -->
  <!-- base -->
  <function name="aero/CS_base">
    <table>
      <independentVar lookup="row">velocities/mach</independentVar>
      <independentVar lookup="column">aero/alpha-deg</independentVar>
      <independentVar lookup="table">aero/beta-deg</independentVar>
      <tableData breakPoint="-10.00000">
                -10.00     -5.00      0.00      5.00     10.00     12.50     15.00     17.50     20.00     25.00     30.00     40.00     50.00     60.00
        0.20000   0.02062   0.03978   0.04827   0.04564   0.02915   0.01745   0.01153   0.00987  -0.00508  -0.02133  -0.04239  -0.09906  -0.15522  -0.23691
        0.60000   0.01896   0.04007   0.04961   0.04658   0.02986   0.02901   0.01379   0.01456  -0.00173  -0.01514  -0.04309  -0.09661  -0.15421  -0.26412
        0.88000   0.01605   0.03966   0.05180   0.04684   0.03342   0.01650   0.02098   0.01660  -0.00293  -0.02057  -0.03684  -0.10576  -0.18828  -0.27168
        0.92000   0.01537   0.03943   0.05238   0.04480   0.03326   0.02889   0.02071   0.02184  -0.00559  -0.01719  -0.04652  -0.11449  -0.17341  -0.26110
        0.96000   0.01434   0.03840   0.05290   0.04495   0.03342   0.02822   0.01560   0.01715  -0.00927  -0.01640  -0.05502  -0.10922  -0.17374  -0.27219
        0.98000   0.01330   0.03649   0.05324   0.04265   0.02472   0.02533   0.00954   0.02090  -0.02102  -0.02131  -0.05449  -0.11429  -0.18558  -0.29249
        1.01000   0.01971   0.03867   0.05461   0.04447   0.03474   0.03994   0.02301   0.02165   0.01468   0.00074  -0.03014  -0.08979  -0.15330  -0.23107
      </tableData>

      <tableData breakPoint="-5.00000">
                -10.00     -5.00      0.00      5.00     10.00     12.50     15.00     17.50     20.00     25.00     30.00     40.00     50.00     60.00
        0.20000   0.01032   0.02041   0.02486   0.02302   0.01080   0.01429   0.00505   0.00356  -0.00757  -0.00313  -0.01830  -0.04828  -0.08017  -0.12371
        0.60000   0.00954   0.02056   0.02557   0.02349   0.01066   0.01643   0.01566   0.01093  -0.01478  -0.00658  -0.01099  -0.04747  -0.07916  -0.12689
        0.88000   0.00861   0.02063   0.02672   0.02264   0.01898   0.03359  -0.00192   0.00480  -0.04875  -0.00128  -0.02168  -0.04962  -0.09048  -0.14225
        0.92000   0.00831   0.02046   0.02696   0.02121   0.01857   0.05879  -0.01842   0.01346  -0.05722   0.00322  -0.02155  -0.05335  -0.08995  -0.13823
        0.96000   0.00786   0.02006   0.02726  -0.01004   0.03023   0.02629  -0.01657   0.00395  -0.08460   0.00301  -0.01814  -0.05419  -0.09068  -0.14301
        0.98000   0.00728   0.01960   0.02745   0.02050  -0.02658   0.04747  -0.03809  -0.02436  -0.06254  -0.00851  -0.03122  -0.05737  -0.09673  -0.15359
        1.01000   0.01036   0.01989   0.02817   0.02396   0.01391   0.03533  -0.00834  -0.00638   0.03499  -0.01113  -0.01190  -0.04346  -0.07833  -0.12068
      </tableData>

      <tableData breakPoint="0.00000">
                -10.00     -5.00      0.00      5.00     10.00     12.50     15.00     17.50     20.00     25.00     30.00     40.00     50.00     60.00
        0.20000   0.00000   0.00000   0.00000   0.00000   0.00000  -0.00011   0.00045  -0.00000   0.00000   0.00000   0.00016   0.00000  -0.00027   0.00035
        0.60000   0.00000   0.00000   0.00000  -0.00000   0.00000   0.00000   0.00000   0.00000   0.00000   0.00000   0.00000   0.00011   0.00032   0.00036
        0.88000   0.00000   0.00000  -0.00000   0.00000   0.00000   0.00012   0.00000   0.00000  -0.00012  -0.00027   0.00000   0.00000  -0.00013   0.00033
        0.92000   0.00000   0.00000  -0.00000   0.00000   0.00000   0.00000   0.00000  -0.00000   0.00000   0.00000   0.00000   0.00000  -0.00017  -0.00046
        0.96000   0.00000   0.00000  -0.00000   0.00000   0.00000  -0.00000   0.00000  -0.00020   0.00000  -0.00014   0.00000   0.00000  -0.00054  -0.00041
        0.98000  -0.00000  -0.00000   0.00000   0.00000   0.00000   0.00015  -0.00000  -0.00017   0.00000  -0.00056   0.00000   0.00000  -0.00023  -0.00012
        1.01000  -0.00000  -0.00000   0.00000   0.00000   0.00000   0.00000   0.00000   0.00000   0.00000   0.00000   0.00000   0.00000   0.00000   0.00000
      </tableData>

      <tableData breakPoint="5.00000">
                -10.00     -5.00      0.00      5.00     10.00     12.50     15.00     17.50     20.00     25.00     30.00     40.00     50.00     60.00
        0.20000  -0.01031  -0.02040  -0.02485  -0.02308  -0.01011  -0.01426  -0.00505  -0.00386   0.00935   0.00326   0.01851   0.04857   0.08040   0.12390
        0.60000  -0.00950  -0.02054  -0.02557  -0.02469  -0.01012  -0.01654  -0.01454  -0.01132   0.00842   0.00686   0.01131   0.04766   0.07932   0.12771
        0.88000  -0.00859  -0.02062  -0.02671  -0.02187  -0.01884  -0.03400   0.00233  -0.00527   0.04843   0.00092   0.02159   0.05008   0.09031   0.14223
        0.92000  -0.00835  -0.02045  -0.02696  -0.02436  -0.01855  -0.05656   0.01814  -0.01359   0.05711  -0.00312   0.02179   0.05364   0.08966   0.13824
        0.96000  -0.00790  -0.02005  -0.02726   0.01600  -0.03172  -0.02696   0.01627  -0.00397   0.08479  -0.00317   0.01848   0.05453   0.09055   0.14284
        0.98000  -0.00729  -0.01959  -0.02745  -0.02165   0.02754  -0.04761   0.03801   0.02452   0.06187   0.00849   0.03109   0.05710   0.09623   0.15324
        1.01000  -0.01036  -0.01990  -0.02817  -0.02393  -0.01395  -0.03546   0.00833   0.00634  -0.03536   0.01236   0.01181   0.04346   0.07828   0.12067
      </tableData>

      <tableData breakPoint="10.00000">
                -10.00     -5.00      0.00      5.00     10.00     12.50     15.00     17.50     20.00     25.00     30.00     40.00     50.00     60.00
        0.20000  -0.02061  -0.03973  -0.04826  -0.04567  -0.02915  -0.01732  -0.01149  -0.00961   0.00541   0.02158   0.04273   0.09945   0.15587   0.23857
        0.60000  -0.01892  -0.04006  -0.04960  -0.04677  -0.02983  -0.02895  -0.01371  -0.01443   0.00187   0.01509   0.04394   0.09688   0.15478   0.26629
        0.88000  -0.01608  -0.03990  -0.05179  -0.04684  -0.03344  -0.01629  -0.02094  -0.01738   0.00279   0.02065   0.03681   0.10598   0.18829   0.27169
        0.92000  -0.01540  -0.03943  -0.05238  -0.04489  -0.03328  -0.02897  -0.02133  -0.01580   0.00577   0.01750   0.04719   0.11696   0.17321   0.26113
        0.96000  -0.01436  -0.03838  -0.05291  -0.04496  -0.03344  -0.02853  -0.01594  -0.01708   0.00950   0.01627   0.05498   0.10915   0.17365   0.27212
        0.98000  -0.01331  -0.03647  -0.05324  -0.04251  -0.02466  -0.02564  -0.00976  -0.02085   0.02070   0.02162   0.05393   0.11404   0.18525   0.29216
        1.01000  -0.01972  -0.03867  -0.05461  -0.04444  -0.03476  -0.03981  -0.02305  -0.02167  -0.01461  -0.00055   0.03059   0.08978   0.15320   0.23101
      </tableData>

    </table>
  </function>

  <!-- elevator -->
  <function name="aero/CS_elevator_-24">
    <table>
      <independentVar lookup="row">velocities/mach</independentVar>
      <independentVar lookup="column">aero/alpha-deg</independentVar>
      <independentVar lookup="table">aero/beta-deg</independentVar>
      <tableData breakPoint="0.00000">
                -10.00     -5.00      0.00      5.00     10.00     12.50     15.00     17.50     20.00     25.00     30.00     40.00     50.00     60.00
        0.20000   0.00000   0.00068   0.00000   0.00000   0.00000   0.00011  -0.00045   0.00016   0.00000   0.00000   0.00101   0.00000   0.00058  -0.00023
        0.60000   0.00000  -0.00020  -0.00000   0.00000   0.00000   0.00000   0.00000   0.00000   0.00000   0.00000   0.00000   0.00000  -0.00032  -0.00036
        0.88000   0.00000  -0.00000   0.00000   0.00000   0.00000  -0.00012   0.00000   0.00000  -0.00029   0.00027  -0.00000   0.00000   0.00013  -0.00033
        0.92000   0.00000  -0.00000   0.00000   0.00000   0.00000   0.00000   0.00000   0.00000   0.00000  -0.00011   0.00000   0.00000   0.00000   0.00000
        0.96000   0.00000  -0.00000   0.00000   0.00000   0.00000   0.00000  -0.00034   0.00020   0.00000  -0.00031  -0.00058   0.00000   0.00022   0.00000
        0.98000   0.00000   0.00000   0.00000   0.00000   0.00000  -0.00015  -0.00034   0.00017   0.00000   0.00069  -0.00018   0.00000   0.00000   0.00012
        1.01000   0.00000   0.00000   0.00000   0.00000  -0.00000  -0.00000   0.00000   0.00000   0.00000   0.00000   0.00000   0.00000   0.00000   0.00000
      </tableData>

    </table>
  </function>

  <function name="aero/CS_elevator_-9.5">
    <table>
      <independentVar lookup="row">velocities/mach</independentVar>
      <independentVar lookup="column">aero/alpha-deg</independentVar>
      <independentVar lookup="table">aero/beta-deg</independentVar>
      <tableData breakPoint="0.00000">
                -10.00     -5.00      0.00      5.00     10.00     12.50     15.00     17.50     20.00     25.00     30.00     40.00     50.00     60.00
        0.20000  -0.00000   0.00000   0.00000   0.00000   0.00015   0.00046  -0.00045   0.00000   0.00000   0.00000  -0.00043   0.00148   0.00058   0.00026
        0.60000   0.00000   0.00010   0.00000   0.00000  -0.00012   0.00000   0.00000   0.00000  -0.00032   0.00000  -0.00013  -0.00011  -0.00019  -0.00036
        0.88000   0.00000  -0.00000   0.00000   0.00000   0.00000  -0.00012  -0.00012   0.00000  -0.00018   0.00027   0.00000  -0.00028   0.00000  -0.00076
        0.92000   0.00000  -0.00000   0.00000   0.00000   0.00000   0.00000   0.00000   0.00000  -0.00026   0.00000   0.00000   0.00000   0.00000   0.00000
        0.96000  -0.00000   0.00000   0.00000   0.00000   0.00000   0.00000   0.00000   0.00020   0.00000  -0.00034  -0.00000   0.00000   0.00017   0.00000
        0.98000   0.00000   0.00000   0.00000  -0.00044   0.00000  -0.00015   0.00000   0.00029  -0.00093   0.00056   0.00000   0.00000   0.00000   0.00012
        1.01000  -0.00010  -0.00116  -0.00000   0.00000   0.00018   0.00000   0.00000   0.00000   0.00000   0.00000   0.00000   0.00030   0.00000   0.00000
      </tableData>

    </table>
  </function>

  <function name="aero/CS_elevator_-3">
    <table>
      <independentVar lookup="row">velocities/mach</independentVar>
      <independentVar lookup="column">aero/alpha-deg</independentVar>
      <independentVar lookup="table">aero/beta-deg</independentVar>
      <tableData breakPoint="0.00000">
                -10.00     -5.00      0.00      5.00     10.00     12.50     15.00     17.50     20.00     25.00     30.00     40.00     50.00     60.00
        0.20000   0.00000   0.00000   0.00000   0.00309   0.00000   0.00011  -0.00045   0.00000   0.00000   0.00000  -0.00053   0.00012  -0.00016   0.00020
        0.60000   0.00000   0.00000   0.00000   0.00025   0.00000   0.00000   0.00000   0.00000   0.00000   0.00000   0.00031   0.00000   0.00108  -0.00036
        0.88000   0.00000  -0.00010   0.00000   0.00000   0.00000  -0.00029   0.00000   0.00000   0.00000  -0.00069   0.00000   0.00000   0.00000  -0.00033
        0.92000   0.00000  -0.00000   0.00000   0.00011   0.00000   0.00022  -0.00000   0.00000  -0.00018   0.00000   0.00000   0.00013   0.00000   0.00000
        0.96000  -0.00000  -0.00000   0.00000   0.00018  -0.00000   0.00000   0.00000   0.00020  -0.00024   0.00073   0.00000   0.00011   0.00000   0.00000
        0.98000   0.00000   0.00000   0.00000   0.00000   0.00000  -0.00033  -0.00015   0.00000  -0.00029  -0.00305  -0.00038   0.00034   0.00000   0.00012
        1.01000   0.00000   0.00000   0.00000   0.00000   0.00000   0.00000   0.00000  -0.00000   0.00000  -0.00022   0.00000  -0.00010   0.00000   0.00000
      </tableData>

    </table>
  </function>

  <function name="aero/CS_elevator_1.5">
    <table>
      <independentVar lookup="row">velocities/mach</independentVar>
      <independentVar lookup="column">aero/alpha-deg</independentVar>
      <independentVar lookup="table">aero/beta-deg</independentVar>
      <tableData breakPoint="0.00000">
                -10.00     -5.00      0.00      5.00     10.00     12.50     15.00     17.50     20.00     25.00     30.00     40.00     50.00     60.00
        0.20000   0.00000  -0.00000   0.00000   0.00014   0.00014   0.00011  -0.00045   0.00000   0.00000  -0.00024   0.00000   0.00000   0.00027   0.00015
        0.60000   0.00000  -0.00000   0.00000   0.00038   0.00000  -0.00011   0.00000   0.00000   0.00000   0.00012   0.00011  -0.00011   0.00000   0.00000
        0.88000  -0.00000   0.00000   0.00000   0.00055  -0.00022  -0.00012   0.00000   0.00000   0.00012   0.00027  -0.00015   0.00033   0.00000   0.00010
        0.92000   0.00000   0.00000   0.00000   0.00071  -0.00078   0.00000   0.00000  -0.00014  -0.00010   0.00000  -0.00134  -0.00027   0.00000   0.00000
        0.96000   0.00000   0.00000   0.00000  -0.00199   0.00000   0.00000   0.00000   0.00020   0.00000   0.00029   0.01694   0.00026   0.00000   0.00000
        0.98000   0.00000   0.00000   0.00000  -0.00840  -0.00076  -0.00015  -0.00060   0.00017  -0.00018   0.00056   0.01395   0.00000   0.00000   0.00012
        1.01000   0.00000   0.00000  -0.00000  -0.00239  -0.00012   0.00000   0.00016   0.00000   0.00043   0.00169   0.00000   0.00030   0.00000   0.00000
      </tableData>

    </table>
  </function>

  <function name="aero/CS_elevator">
    <interpolate1d>
      <property>fcs/surfaces/elevator-pos-deg</property>
      <value>-24</value> <property>aero/CS_elevator_-24</property>
      <value>-9.5</value> <property>aero/CS_elevator_-9.5</property>
      <value>-3</value> <property>aero/CS_elevator_-3</property>
      <value>0</value> <value>0</value>
      <value>1.5</value> <property>aero/CS_elevator_1.5</property>
    </interpolate1d>
  </function>

  <!-- flaps -->
  <function name="aero/CS_flaps_20">
    <table>
      <independentVar lookup="row">velocities/mach</independentVar>
      <independentVar lookup="column">aero/alpha-deg</independentVar>
      <independentVar lookup="table">aero/beta-deg</independentVar>
      <tableData breakPoint="0.00000">
                -10.00     -5.00      0.00      5.00     10.00     12.50     15.00     17.50     20.00     25.00     30.00     40.00     50.00     60.00
        0.20000   0.00000   0.00000   0.00156  -0.00020   0.00099   0.00021   0.00105   0.00025   0.00000   0.00016   0.00000   0.00045   0.00048   0.00000
        0.60000   0.00000   0.00000  -0.00024   0.00127   0.00047  -0.00302  -0.00113   0.00116   0.00000   0.00013   0.00019   0.00000  -0.00061   0.00000
        0.88000   0.00000   0.00000   0.00706  -0.01936  -0.00233   0.00055   0.00000   0.00000   0.00012   0.00027   0.00051   0.00024   0.00013  -0.00087
        0.92000   0.00000   0.00000   0.02596  -0.00076   0.00820   0.00160  -0.00042   0.00000   0.00000   0.00000  -0.00076   0.00000  -0.00029   0.00000
        0.96000  -0.00013   0.00011   0.13118  -0.01534  -0.00153  -0.00046   0.00000   0.00020  -0.00016  -0.00041   0.00128   0.00000  -0.00020  -0.00018
        0.98000  -0.00010   0.00015  -0.00579   0.18094   0.00171  -0.00043   0.00000   0.00017   0.00027   0.00056  -0.00210   0.00000  -0.00041   0.00012
        1.01000   0.00000   0.00000   0.00000   0.00168   0.00033   0.00000  -0.00011   0.00000   0.00000  -0.00043   0.00000   0.00000   0.00010   0.00000
      </tableData>

    </table>
  </function>

  <function name="aero/CS_flaps_30">
    <table>
      <independentVar lookup="row">velocities/mach</independentVar>
      <independentVar lookup="column">aero/alpha-deg</independentVar>
      <independentVar lookup="table">aero/beta-deg</independentVar>
      <tableData breakPoint="0.00000">
                -10.00     -5.00      0.00      5.00     10.00     12.50     15.00     17.50     20.00     25.00     30.00     40.00     50.00     60.00
        0.20000   0.00000   0.00000   0.00042   0.00184   0.00026  -0.00058  -0.00035   0.00047   0.00011   0.00013   0.00000   0.00041   0.00043   0.00000
        0.60000   0.00000   0.00000  -0.00034   0.03909   0.00019  -0.00147  -0.00125   0.00072   0.00019   0.00000   0.00018   0.00015  -0.00051   0.00000
        0.88000   0.00000   0.00000   0.00430  -0.00419  -0.00122   0.00250   0.00034  -0.00014   0.00012   0.00037   0.00117   0.00000   0.00000  -0.00089
        0.92000   0.00000   0.00000   0.00548  -0.00143  -0.00113   0.00101   0.00000   0.00000   0.00023   0.00000  -0.00018   0.00000  -0.00038   0.00000
        0.96000   0.00000   0.00115   0.10683   0.11943   0.00137   0.00019   0.00000   0.00000  -0.00025  -0.00083  -0.01498  -0.00024  -0.00079  -0.00018
        0.98000  -0.00011   0.00331  -0.00542  -0.11089   0.00558  -0.00044  -0.00042   0.00017  -0.00036   0.00067  -0.00114   0.00000  -0.00059   0.00012
        1.01000   0.00000   0.00000   0.00000   0.00026   0.00000   0.00000   0.00000   0.00000   0.00000  -0.00045  -0.00045   0.00000   0.00000  -0.00021
      </tableData>

    </table>
  </function>

  <function name="aero/CS_flaps">
    <interpolate1d>
      <property>fcs/surfaces/flaps-pos-deg</property>
      <value>0</value> <value>0</value>
      <value>20</value> <property>aero/CS_flaps_20</property>
      <value>30</value> <property>aero/CS_flaps_30</property>
    </interpolate1d>
  </function>

  <!-- left-flaperon -->
  <function name="aero/CS_left-flaperon_-51">
    <table>
      <independentVar lookup="row">velocities/mach</independentVar>
      <independentVar lookup="column">aero/alpha-deg</independentVar>
      <independentVar lookup="table">aero/beta-deg</independentVar>
      <tableData breakPoint="0.00000">
                -10.00     -5.00      0.00      5.00     10.00     12.50     15.00     17.50     20.00     25.00     30.00     40.00     50.00     60.00
        0.20000   0.00814   0.01221   0.01811   0.00932   0.00201   0.00179  -0.00491  -0.01003  -0.00802  -0.02262  -0.01871  -0.00500  -0.00796  -0.00726
        0.60000   0.00895   0.01410   0.02325   0.00981  -0.00391   0.00164  -0.00623  -0.01076  -0.00857  -0.04838   0.00846  -0.00706  -0.00687  -0.00637
        0.88000   0.01426   0.02531   0.04608   0.00171  -0.04468  -0.00363  -0.03100  -0.01489  -0.04071   0.01999  -0.01074  -0.03227  -0.00603  -0.00732
        0.92000   0.01927   0.03764   0.03404   0.01145  -0.05426  -0.02730  -0.05139  -0.05540  -0.00796   0.02843  -0.01100  -0.04853  -0.00671  -0.01483
        0.96000   0.03980   0.11936   0.10322   0.07284   0.00240  -0.03131  -0.05540  -0.09282  -0.03377   0.03465  -0.02461  -0.05846  -0.00899   0.00430
        0.98000  -0.08886   0.04539  -0.10536   0.05268   0.01514  -0.02631  -0.07983  -0.05035  -0.00792   0.03919  -0.03044  -0.03188  -0.00620  -0.01347
        1.01000  -0.00883  -0.04116  -0.10492   0.00204  -0.01054  -0.00055   0.01038   0.03770   0.08863   0.09752   0.06992  -0.05700  -0.01328  -0.01268
      </tableData>

    </table>
  </function>

  <function name="aero/CS_left-flaperon">
    <interpolate1d>
      <property>fcs/surfaces/left-flaperon-pos-deg</property>
      <value>-51</value> <property>aero/CS_left-flaperon_-51</property>
      <value>0</value> <value>0</value>
    </interpolate1d>
  </function>

  <!-- right-flaperon -->
  <function name="aero/CS_right-flaperon_-51">
    <table>
      <independentVar lookup="row">velocities/mach</independentVar>
      <independentVar lookup="column">aero/alpha-deg</independentVar>
      <independentVar lookup="table">aero/beta-deg</independentVar>
      <tableData breakPoint="0.00000">
                -10.00     -5.00      0.00      5.00     10.00     12.50     15.00     17.50     20.00     25.00     30.00     40.00     50.00     60.00
        0.20000  -0.00813  -0.01218  -0.01807  -0.00876  -0.00036  -0.00143   0.00473   0.01028   0.00797   0.02279   0.01628   0.00543   0.00894   0.00718
        0.60000  -0.00894  -0.01426  -0.02375  -0.00483   0.00418  -0.00143   0.00597   0.01083   0.00858   0.04782  -0.00936   0.00705   0.00676   0.00635
        0.88000  -0.01432  -0.02554  -0.04694  -0.00312   0.04070   0.00156   0.03037   0.01386   0.04096  -0.01783   0.01069   0.03161   0.00648   0.00641
        0.92000  -0.01925  -0.03781  -0.03248  -0.04206   0.05573   0.02761   0.05692   0.05562   0.00824  -0.02814   0.01130   0.05127   0.00685   0.01642
        0.96000  -0.03994  -0.11942  -0.07609  -0.02154  -0.00115   0.03098   0.05552   0.08993   0.03418  -0.03471   0.02415   0.05951   0.00996  -0.00432
        0.98000   0.08719  -0.04742   0.10547  -0.03542  -0.01492   0.02294   0.08094   0.05023   0.00801  -0.03829   0.03011   0.03256   0.00641   0.01320
        1.01000   0.00891   0.04113   0.10493  -0.00305   0.01042   0.00052  -0.01058  -0.03773  -0.08879  -0.09747  -0.06919   0.05738   0.01358   0.01274
      </tableData>

    </table>
  </function>

  <function name="aero/CS_right-flaperon">
    <interpolate1d>
      <property>fcs/surfaces/right-flaperon-pos-deg</property>
      <value>-51</value> <property>aero/CS_right-flaperon_-51</property>
      <value>0</value> <value>0</value>
    </interpolate1d>
  </function>
  <!-- rudder -->
  <function name="aero/CS_rudder_-35">
    <table>
      <independentVar lookup="row">velocities/mach</independentVar>
      <independentVar lookup="column">aero/alpha-deg</independentVar>
      <independentVar lookup="table">aero/beta-deg</independentVar>
      <tableData breakPoint="-10.00000">
                -10.00     -5.00      0.00      5.00     10.00     12.50     15.00     17.50     20.00     25.00     30.00     40.00     50.00     60.00
        0.20000  -0.04652  -0.04663  -0.04598  -0.04293  -0.03338  -0.00102   0.00099  -0.00458  -0.00930   0.00546  -0.00042  -0.04766  -0.02279  -0.02060
        0.60000  -0.04773  -0.04715  -0.04615  -0.03807  -0.01189   0.00014   0.01332   0.00481   0.00956  -0.01144  -0.02978  -0.02769  -0.02805  -0.01838
        0.88000  -0.04467  -0.04044  -0.02931  -0.00865   0.02166   0.03105   0.01113  -0.07835  -0.08718  -0.04228  -0.01392  -0.01326  -0.03317  -0.03405
        0.92000  -0.03738  -0.03011  -0.00765  -0.00739   0.02535   0.00305  -0.06989  -0.14031  -0.05193  -0.08234  -0.03613  -0.00935  -0.03558  -0.02987
        0.96000  -0.00054   0.00157  -0.06204  -0.10462  -0.02804   0.02343   0.00467   0.00774  -0.05100  -0.10439  -0.45531   0.00402  -0.02154  -0.02133
        0.98000  -0.07022  -0.07121  -0.04576  -0.00876  -0.01470  -0.01282  -0.08221  -0.56080  -0.00721  -0.25098  -0.08045   0.01059  -0.01383  -0.01898
        1.01000  -0.10444  -0.10160  -0.09740  -0.09911  -0.10708  -0.12350  -0.11478  -0.12334  -0.12678  -0.12055  -0.04420  -0.01753  -0.04650  -0.12648
      </tableData>

      <tableData breakPoint="-5.00000">
                -10.00     -5.00      0.00      5.00     10.00     12.50     15.00     17.50     20.00     25.00     30.00     40.00     50.00     60.00
        0.20000  -0.05282  -0.05355  -0.05125  -0.03993  -0.05139  -0.05389  -0.03728  -0.04104  -0.04214  -0.03813  -0.04410   0.03485  -0.04035  -0.02753
        0.60000  -0.05514  -0.05458  -0.05024  -0.03447  -0.04846  -0.04858  -0.03902  -0.04445  -0.03202  -0.05334  -0.10346  -0.04992  -0.04752  -0.03373
        0.88000  -0.05638  -0.04969  -0.03681   0.07044   0.00455  -0.03866  -0.06381   0.00667   0.03157  -0.02718  -0.11837  -0.05259  -0.05843  -0.04405
        0.92000  -0.05265  -0.04139  -0.01276  -0.03451   0.00876  -0.08736  -0.06684   0.04707   0.00685  -0.03262  -0.12815  -0.04834  -0.06231  -0.04545
        0.96000  -0.02791   0.00508  -0.00281   0.10419  -0.00958  -0.04205  -0.07607   0.10099   0.16434   0.00026  -0.14446  -0.03147  -0.06568  -0.05071
        0.98000   0.04256  -0.10344  -0.02511   0.34540  -0.00032  -0.02915   0.02105   0.04082   0.03951  -0.03526  -0.12924  -0.01936  -0.07108  -0.04752
        1.01000  -0.12056  -0.12934  -0.13439  -0.07637  -0.05393  -0.06356  -0.06156  -0.05957  -0.11434  -0.07343  -0.01757  -0.02377  -0.08490  -0.12042
      </tableData>

      <tableData breakPoint="0.00000">
                -10.00     -5.00      0.00      5.00     10.00     12.50     15.00     17.50     20.00     25.00     30.00     40.00     50.00     60.00
        0.20000  -0.05996  -0.06595  -0.07044  -0.02092  -0.04912  -0.05033  -0.05402  -0.05373  -0.05650  -0.07680  -0.02819  -0.04585  -0.06504  -0.03269
        0.60000  -0.06459  -0.07065  -0.07743  -0.01722  -0.05418  -0.05853  -0.05693  -0.05724  -0.05872  -0.05284  -0.05353  -0.05319  -0.04776  -0.03769
        0.88000  -0.07620  -0.08357  -0.09630  -0.06035  -0.07117  -0.06674  -0.06531  -0.06504  -0.04282  -0.06085  -0.07081  -0.06721  -0.05951  -0.05256
        0.92000  -0.08035  -0.08877  -0.10335  -0.07977  -0.06265  -0.07132  -0.07173  -0.06038  -0.07136  -0.06901  -0.07546  -0.07215  -0.06467  -0.05856
        0.96000  -0.08819  -0.10158  -0.01551  -0.10031  -0.08827  -0.07738  -0.06964  -0.06930  -0.07852  -0.07861  -0.08253  -0.08064  -0.07291  -0.06144
        0.98000  -0.03365  -0.08573  -0.08098  -0.10695  -0.08672  -0.05193   0.02409  -0.08510  -0.08586  -0.08423  -0.08901  -0.08709  -0.08063  -0.07081
        1.01000  -0.09639  -0.09754  -0.09840  -0.09894  -0.09944  -0.09936  -0.09922  -0.09900  -0.09883  -0.09909  -0.09827  -0.09585  -0.09222  -0.08889
      </tableData>

      <tableData breakPoint="5.00000">
                -10.00     -5.00      0.00      5.00     10.00     12.50     15.00     17.50     20.00     25.00     30.00     40.00     50.00     60.00
        0.20000  -0.06698  -0.08244  -0.05903  -0.02123  -0.07508  -0.07021  -0.01515  -0.03146  -0.05513  -0.05109  -0.07093  -0.02587  -0.05725  -0.03597
        0.60000  -0.07275  -0.08577  -0.05204   0.00922  -0.06885  -0.04523   0.00544  -0.02752  -0.05933  -0.06357  -0.05018  -0.03429  -0.05433  -0.03997
        0.88000  -0.08447  -0.09266  -0.05901  -0.28544  -0.05855   0.06546  -0.07615  -0.00732  -0.05708   0.02939  -0.03575  -0.07629  -0.06366  -0.05593
        0.92000  -0.08899  -0.09192  -0.08822  -0.05407  -0.04738  -0.03206  -0.00794   0.00000   0.12794   0.01060  -0.03556  -0.07922  -0.06891  -0.06331
        0.96000  -0.09242  -0.08315  -0.00184  -0.01237  -0.05304   0.07157  -0.09770   0.15047  -0.05067   0.02233  -0.00972  -0.08049  -0.07810  -0.07136
        0.98000   0.04848   0.12322  -0.04092  -0.06941  -0.07170  -0.03842  -0.11205  -0.06698  -0.10480   0.03146   0.00900  -0.07790  -0.08255  -0.08355
        1.01000  -0.06340  -0.04699  -0.02469  -0.01874  -0.08397  -0.06429  -0.02882   0.00093   0.04377   0.00882  -0.07601  -0.09630  -0.08735  -0.04969
      </tableData>

      <tableData breakPoint="10.00000">
                -10.00     -5.00      0.00      5.00     10.00     12.50     15.00     17.50     20.00     25.00     30.00     40.00     50.00     60.00
        0.20000  -0.06047  -0.06206  -0.04934  -0.05228  -0.06434  -0.06682  -0.05437  -0.00162   0.00162   0.00807   0.04595  -0.02290  -0.06132  -0.04894
        0.60000  -0.06283  -0.06271  -0.06092  -0.05904  -0.06182  -0.05370  -0.05176   0.01678   0.00803   0.02021   0.02462  -0.03799  -0.06744  -0.05980
        0.88000  -0.06923  -0.06726  -0.05084  -0.04976  -0.05200  -0.01663   0.01460  -0.05099  -0.05951   0.02788   0.05432  -0.06428  -0.07296  -0.06223
        0.92000  -0.07131  -0.06553   0.02331  -0.02484  -0.02530   0.03199  -0.03922  -0.03225  -0.05052   0.05542   0.06393  -0.06575  -0.07137  -0.06913
        0.96000  -0.05643   0.03279   0.12359   0.01466  -0.04137   0.02448   0.05877   0.04221   0.00000   0.06587   0.05679  -0.06380  -0.06843  -0.07227
        0.98000   0.71523  -0.07011   0.07426   0.00799   0.05617  -0.00222   0.25191   0.04870  -0.10461  -0.00386   0.05742  -0.05858  -0.06588  -0.07518
        1.01000  -0.05151  -0.03526  -0.01436  -0.01513   0.01077   0.03286   0.03115   0.04129   0.04940  -0.02188  -0.05303  -0.07785  -0.08620  -0.04657
      </tableData>

    </table>
  </function>

  <function name="aero/CS_rudder_35">
    <table>
      <independentVar lookup="row">velocities/mach</independentVar>
      <independentVar lookup="column">aero/alpha-deg</independentVar>
      <independentVar lookup="table">aero/beta-deg</independentVar>
      <tableData breakPoint="-10.00000">
                -10.00     -5.00      0.00      5.00     10.00     12.50     15.00     17.50     20.00     25.00     30.00     40.00     50.00     60.00
        0.20000   0.06063   0.06212   0.04844   0.05415   0.06432   0.06646   0.05349   0.00196  -0.00164  -0.00835  -0.04636   0.02278   0.06139   0.04857
        0.60000   0.06283   0.06285   0.06070   0.06038   0.06164   0.05363   0.05199  -0.01685  -0.00848  -0.01902  -0.02527   0.03764   0.06730   0.06032
        0.88000   0.06926   0.06754   0.05105   0.04999   0.05202   0.01467  -0.01019   0.05162   0.06067  -0.03421  -0.05376   0.06400   0.07203   0.06203
        0.92000   0.07134   0.06552  -0.02311   0.02571   0.02488  -0.02151   0.03998   0.02572   0.05066  -0.03963  -0.06481   0.06281   0.07143   0.06900
        0.96000   0.05553  -0.03247  -0.12341  -0.01768   0.04124  -0.02803  -0.05565  -0.03909  -0.05232  -0.06487  -0.05372   0.06349   0.06810   0.07217
        0.98000  -0.43998   0.06974  -0.07401  -0.00828  -0.08069   0.00193  -0.49562  -0.04998   0.10692   0.00490  -0.05723   0.05859   0.06592   0.07522
        1.01000   0.05146   0.03524   0.01439   0.01500  -0.01086  -0.03335  -0.03149  -0.04133  -0.04980   0.02239   0.05261   0.07787   0.08624   0.04663
      </tableData>

      <tableData breakPoint="-5.00000">
                -10.00     -5.00      0.00      5.00     10.00     12.50     15.00     17.50     20.00     25.00     30.00     40.00     50.00     60.00
        0.20000   0.06709   0.08222   0.05303   0.02613   0.07291   0.06995   0.01514   0.03241   0.05353   0.05014   0.07155   0.02591   0.05656   0.03660
        0.60000   0.07273   0.08577   0.05409  -0.00411   0.06820   0.04423  -0.00518   0.02766   0.06565   0.06613   0.05744   0.03442   0.05392   0.04038
        0.88000   0.08445   0.09267   0.05394   346.80824   0.05927  -0.06535   0.07576   0.00789   0.05806  -0.03122   0.03556   0.07596   0.06400   0.05612
        0.92000   0.08906   0.09187   0.08811   0.05784   0.04698   0.03011   0.01811   0.00072  -0.12380  -0.01135   0.03451   0.07886   0.06892   0.06291
        0.96000   0.09238   0.08311   0.00164   0.00724   0.05498  -0.07014   0.09752  -0.14007   0.05413  -0.02257   0.00840   0.07959   0.07806   0.07134
        0.98000  -0.04322  -0.12474   0.03875   0.07043   0.06922   0.03974   0.11269   0.06637   0.10574  -0.03157  -0.00982   0.07785   0.08302   0.08378
        1.01000   0.06331   0.04696   0.02483   0.01864   0.08411   0.06494   0.02890  -0.00104  -0.04336  -0.01016   0.07607   0.09630   0.08735   0.04969
      </tableData>

      <tableData breakPoint="0.00000">
                -10.00     -5.00      0.00      5.00     10.00     12.50     15.00     17.50     20.00     25.00     30.00     40.00     50.00     60.00
        0.20000   0.06005   0.06598   0.07039   0.05260   0.04915   0.05229   0.05281   0.05378   0.05688   0.07769   0.02690   0.04641   0.06350   0.03266
        0.60000   0.06466   0.07068   0.07735   0.07499   0.05475   0.05999   0.05712   0.05856   0.07810   0.05194   0.05389   0.05359   0.04752   0.03736
        0.88000   0.07615   0.08352   0.09636   0.04935   0.07122   0.06725   0.06661   0.06507   0.05098   0.06086   0.07090   0.06720   0.06003   0.05196
        0.92000   0.08007   0.08859   0.10337   0.07508   0.06731   0.07190   0.07245   0.06171   0.07096   0.06881   0.07503   0.07221   0.06507   0.05833
        0.96000   0.08774   0.10087   0.01550   0.10136   0.08741   0.07825   0.06898   0.06776   0.07800   0.07818   0.08225   0.08098   0.07283   0.06088
        0.98000  -0.00947   0.08806   0.08106   0.10584   0.08707   0.01913  -0.02072   0.08546   0.08519   0.08477   0.08894   0.08739   0.08144   0.07086
        1.01000   0.09639   0.09754   0.09840   0.09914   0.09945   0.09937   0.09919   0.09901   0.09876   0.09726   0.09828   0.09582   0.09221   0.08861
      </tableData>

      <tableData breakPoint="5.00000">
                -10.00     -5.00      0.00      5.00     10.00     12.50     15.00     17.50     20.00     25.00     30.00     40.00     50.00     60.00
        0.20000   0.05282   0.05351   0.05106   0.03752   0.05037   0.05430   0.03599   0.04148   0.04114   0.03666   0.04554  -0.03530   0.04043   0.02831
        0.60000   0.05516   0.05456   0.04995   0.03497   0.04768   0.04919   0.03742   0.04550   0.04164   0.05888   0.10452   0.05014   0.04652   0.03393
        0.88000   0.05626   0.04955   0.03618  -0.07128  -0.00481   0.03734   0.06327  -0.01459  -0.03145   0.02726   0.11857   0.05294   0.05866   0.04394
        0.92000   0.05258   0.04119   0.01194   0.04484  -0.00906   0.08524   0.09335  -0.04170  -0.00851   0.03306   0.12779   0.04899   0.06260   0.04499
        0.96000   0.02817  -0.00507   0.00295  -0.09276   0.00736   0.04233   0.08407  -0.11957  -0.15730   0.00652   0.14381   0.03133   0.06644   0.05072
        0.98000  -0.03583   0.10286   0.02508  -0.23167  -0.00080   0.02994  -0.02138  -0.04160  -0.03951   0.03530   0.12866   0.02048   0.07151   0.04775
        1.01000   0.12050   0.12933   0.13443   0.07631   0.05419   0.06217   0.06155   0.05970   0.11471   0.07216   0.01767   0.02376   0.08472   0.12028
      </tableData>

      <tableData breakPoint="10.00000">
                -10.00     -5.00      0.00      5.00     10.00     12.50     15.00     17.50     20.00     25.00     30.00     40.00     50.00     60.00
        0.20000   0.04662   0.04676   0.04559   0.04257   0.03358   0.00109  -0.00065   0.00480   0.00933  -0.00562  -0.00046   0.04739   0.02244   0.02048
        0.60000   0.04771   0.04724   0.04567   0.03882   0.01139   0.00000  -0.01326  -0.00413  -0.01048   0.01274   0.03084   0.02801   0.02812   0.01902
        0.88000   0.04463   0.04061   0.02871   0.00864  -0.02157  -0.03090  -0.01134   0.07876   0.08886   0.04575   0.01460   0.01468   0.03237   0.03430
        0.92000   0.03738   0.02992   0.00757   0.00827  -0.02553  -0.00354   0.06652   0.11729   0.04900   0.08262   0.03581   0.00704   0.03575   0.02986
        0.96000  -0.00015  -0.00151   0.06143   0.10161   0.02708  -0.02284  -0.00386  -0.02115   0.05099   0.11018   0.36530  -0.00419   0.02211   0.02130
        0.98000   0.07044   0.08925   0.04346   0.00825   0.01580   0.01237   0.08069   0.67773   0.00814   0.25208   0.08126  -0.01056   0.01410   0.01833
        1.01000   0.10440   0.10157   0.09739   0.09906   0.10709   0.12308   0.11466   0.12334   0.12665   0.12047   0.04378   0.01755   0.04677   0.12646
      </tableData>

    </table>
  </function>

  <function name="aero/CS_rudder">
    <interpolate1d>
      <property>fcs/surfaces/rudder-pos-deg</property>
      <value>-35</value> <property>aero/CS_rudder_-35</property>
      <value>0</value> <value>0</value>
      <value>35</value> <property>aero/CS_rudder_35</property>
    </interpolate1d>
  </function>

  <!-- slats -->
  <function name="aero/CS_slats_27.5">
    <table>
      <independentVar lookup="row">velocities/mach</independentVar>
      <independentVar lookup="column">aero/alpha-deg</independentVar>
      <independentVar lookup="table">aero/beta-deg</independentVar>
      <tableData breakPoint="0.00000">
                -10.00     -5.00      0.00      5.00     10.00     12.50     15.00     17.50     20.00     25.00     30.00     40.00     50.00     60.00
        0.20000   0.00000  -0.00000   0.00000  -0.00023   0.00000   0.00011  -0.00045   0.00000   0.00000   0.00022   0.00000  -0.00016   0.00047  -0.00025
        0.60000   0.00000   0.00000  -0.00000   0.00032   0.00000   0.00052   0.00000   0.00000   0.00015   0.00015   0.00022  -0.00011  -0.00048  -0.00012
        0.88000   0.00000   0.00000   0.00000  -0.00452   0.00030  -0.00012   0.00000   0.00000   0.00012   0.00049   0.00013  -0.00058   0.00013  -0.00064
        0.92000   0.00000   0.00000   0.00015  -0.00367   0.00000   0.00000   0.00000   0.00000  -0.00030   0.00000   0.00018  -0.00050   0.00000   0.00000
        0.96000   0.00000  -0.00011  -0.00028   0.01598  -0.00019  -0.00011   0.00037   0.00020   0.00000   0.00000   0.00128   0.00095   0.00208  -0.00017
        0.98000  -0.00205  -0.00055   0.00000  -0.06110  -0.00000  -0.00026   0.00000   0.00017   0.00000   0.00056  -0.00333   0.00023   0.00023   0.00012
        1.01000   0.00000   0.00000  -0.00000   0.00040   0.00000   0.00000   0.00000   0.00000   0.00000  -0.00218   0.00011  -0.00010   0.00018  -0.00012
      </tableData>

    </table>
  </function>

  <function name="aero/CS_slats">
    <interpolate1d>
      <property>fcs/surfaces/slats-pos-deg</property>
      <value>0</value> <value>0</value>
      <value>27.5</value> <property>aero/CS_slats_27.5</property>
    </interpolate1d>
  </function>

  <!-- CMX -->
  <!-- base -->
  <function name="aero/CMx_base">
    <table>
      <independentVar lookup="row">velocities/mach</independentVar>
      <independentVar lookup="column">aero/alpha-deg</independentVar>
      <independentVar lookup="table">aero/beta-deg</independentVar>
      <tableData breakPoint="-10.00000">
                -10.00     -5.00      0.00      5.00     10.00     12.50     15.00     17.50     20.00     25.00     30.00     40.00     50.00     60.00
        0.20000   0.00883   0.00556  -0.00178  -0.00871  -0.01366  -0.00563  -0.00528  -0.00649  -0.00609  -0.00698  -0.00740  -0.00511  -0.00198   0.00676
        0.60000   0.00290   0.00690  -0.00170  -0.00978  -0.00881  -0.00593  -0.00551  -0.00694  -0.00627  -0.00784  -0.00750  -0.00521  -0.00172   0.00939
        0.88000  -0.00297   0.01042  -0.00144  -0.01299  -0.00486  -0.00423  -0.00556  -0.00694  -0.00681  -0.00890  -0.00918  -0.00571  -0.00355   0.00453
        0.92000  -0.00304   0.01155  -0.00133  -0.01415  -0.00462  -0.00527  -0.00547  -0.00788  -0.00688  -0.00964  -0.00869  -0.00730  -0.00361   0.00512
        0.96000  -0.00307   0.01320  -0.00115  -0.01574  -0.00410  -0.00556  -0.00541  -0.00795  -0.00617  -0.01202  -0.01106  -0.00749  -0.00395   0.00426
        0.98000  -0.00308   0.01237  -0.00101  -0.01617  -0.00346  -0.00568  -0.00415  -0.00829  -0.00522  -0.01297  -0.01160  -0.00778  -0.00480   0.00283
        1.01000  -0.00310  -0.00088  -0.00047  -0.00502  -0.00363  -0.00518  -0.00403  -0.00500  -0.00545  -0.00816  -0.00975  -0.00710  -0.00487  -0.00377
      </tableData>

      <tableData breakPoint="-5.00000">
                -10.00     -5.00      0.00      5.00     10.00     12.50     15.00     17.50     20.00     25.00     30.00     40.00     50.00     60.00
        0.20000   0.00397   0.00278  -0.00097  -0.00515  -0.00654  -0.00325  -0.00214  -0.00312  -0.00297  -0.00499  -0.00397  -0.00255  -0.00112   0.00321
        0.60000   0.00000   0.00345  -0.00094  -0.00649  -0.00349  -0.00330  -0.00310  -0.00387  -0.00227  -0.00484  -0.00540  -0.00264  -0.00108   0.00346
        0.88000  -0.00170   0.00518  -0.00083  -0.00750  -0.00242  -0.00441  -0.00197  -0.00391   0.00397  -0.00544  -0.00350  -0.00315  -0.00147   0.00253
        0.92000  -0.00178   0.00577  -0.00078  -0.00468  -0.00231  -0.00572  -0.00037  -0.00398   0.00532  -0.00646  -0.00402  -0.00367  -0.00186   0.00258
        0.96000  -0.00182   0.00664  -0.00070  -0.00707  -0.00259  -0.00470   0.00159  -0.00378   0.00903  -0.00703  -0.00593  -0.00418  -0.00195   0.00234
        0.98000  -0.00188   0.00668  -0.00062  -0.00722  -0.00041  -0.00637   0.00464  -0.00342   0.00629  -0.00510  -0.00432  -0.00420  -0.00225   0.00165
        1.01000  -0.00175  -0.00093  -0.00028  -0.00260  -0.00077  -0.00476   0.00177  -0.00074  -0.00574  -0.00179  -0.00465  -0.00321  -0.00168  -0.00096
      </tableData>

      <tableData breakPoint="0.00000">
                -10.00     -5.00      0.00      5.00     10.00     12.50     15.00     17.50     20.00     25.00     30.00     40.00     50.00     60.00
        0.20000   0.00000   0.00000   0.00000   0.00000   0.00000   0.00000   0.00000   0.00000  -0.00000   0.00000  -0.00000   0.00000   0.00000   0.00000
        0.60000   0.00000   0.00000   0.00000   0.00000   0.00000   0.00000  -0.00000  -0.00000   0.00000   0.00000   0.00000  -0.00000   0.00000   0.00000
        0.88000  -0.00000   0.00000   0.00000   0.00000   0.00000   0.00000  -0.00000  -0.00000   0.00000   0.00000   0.00000   0.00000   0.00000   0.00000
        0.92000  -0.00000   0.00000   0.00000  -0.00000   0.00000   0.00000  -0.00000   0.00000  -0.00000   0.00000   0.00000   0.00000   0.00000   0.00000
        0.96000  -0.00000   0.00000   0.00000   0.00000   0.00000   0.00000   0.00000   0.00000   0.00000   0.00000   0.00000   0.00000   0.00000   0.00000
        0.98000  -0.00000   0.00000   0.00000   0.00000  -0.00000   0.00000   0.00000   0.00000   0.00000   0.00000   0.00000   0.00000   0.00000   0.00000
        1.01000  -0.00019  -0.00016   0.00000   0.00000   0.00018   0.00027   0.00036   0.00044   0.00053   0.00058   0.00091   0.00129   0.00163   0.00139
      </tableData>

      <tableData breakPoint="5.00000">
                -10.00     -5.00      0.00      5.00     10.00     12.50     15.00     17.50     20.00     25.00     30.00     40.00     50.00     60.00
        0.20000  -0.00390  -0.00272   0.00097   0.00432   0.00593   0.00325   0.00214   0.00317   0.00276   0.00498   0.00398   0.00254   0.00112  -0.00322
        0.60000   0.00000  -0.00341   0.00094   0.00522   0.00338   0.00331   0.00283   0.00389   0.00321   0.00481   0.00538   0.00263   0.00107  -0.00345
        0.88000   0.00170  -0.00513   0.00083   0.00690   0.00246   0.00440   0.00194   0.00390  -0.00394   0.00547   0.00346   0.00310   0.00143  -0.00255
        0.92000   0.00178  -0.00573   0.00078   0.00676   0.00231   0.00557   0.00035   0.00399  -0.00531   0.00642   0.00394   0.00362   0.00183  -0.00260
        0.96000   0.00182  -0.00660   0.00070   0.00699   0.00269   0.00473  -0.00155   0.00376  -0.00907   0.00702   0.00582   0.00411   0.00193  -0.00238
        0.98000   0.00188  -0.00665   0.00063   0.00721   0.00036   0.00636  -0.00465   0.00348  -0.00620   0.00508   0.00424   0.00418   0.00223  -0.00172
        1.01000   0.00149   0.00085   0.00027   0.00267   0.00100   0.00509  -0.00134   0.00137   0.00664   0.00295   0.00654   0.00579   0.00495   0.00399
      </tableData>

      <tableData breakPoint="10.00000">
                -10.00     -5.00      0.00      5.00     10.00     12.50     15.00     17.50     20.00     25.00     30.00     40.00     50.00     60.00
        0.20000  -0.00877  -0.00550   0.00178   0.00819   0.01349   0.00559   0.00528   0.00646   0.00607   0.00696   0.00738   0.00509   0.00199  -0.00676
        0.60000  -0.00286  -0.00685   0.00171   0.00955   0.00871   0.00593   0.00552   0.00694   0.00628   0.00786   0.00743   0.00520   0.00171  -0.00946
        0.88000   0.00297  -0.01034   0.00144   0.01286   0.00485   0.00421   0.00555   0.00702   0.00682   0.00890   0.00917   0.00563   0.00352  -0.00452
        0.92000   0.00304  -0.01150   0.00133   0.01407   0.00462   0.00526   0.00549   0.00705   0.00690   0.00966   0.00855   0.00726   0.00359  -0.00512
        0.96000   0.00306  -0.01318   0.00115   0.01566   0.00409   0.00559   0.00543   0.00793   0.00612   0.01204   0.01101   0.00746   0.00394  -0.00427
        0.98000   0.00308  -0.01236   0.00102   0.01609   0.00348   0.00570   0.00415   0.00824   0.00526   0.01301   0.01154   0.00775   0.00478  -0.00287
        1.01000   0.00302   0.00088   0.00047   0.00510   0.00388   0.00568   0.00487   0.00603   0.00639   0.00952   0.01154   0.00965   0.00789   0.00685
      </tableData>

    </table>
  </function>

  <!-- elevator -->
  <function name="aero/CMx_elevator_-24">
    <table>
      <independentVar lookup="row">velocities/mach</independentVar>
      <independentVar lookup="column">aero/alpha-deg</independentVar>
      <independentVar lookup="table">aero/beta-deg</independentVar>
      <tableData breakPoint="0.00000">
                -10.00     -5.00      0.00      5.00     10.00     12.50     15.00     17.50     20.00     25.00     30.00     40.00     50.00     60.00
        0.20000   0.00000   0.00000   0.00000   0.00000  -0.00017  -0.00000  -0.00000   0.00000   0.00000  -0.00000   0.00000  -0.00000   0.00000  -0.00000
        0.60000   0.00000   0.00000   0.00000   0.00000   0.00000   0.00000   0.00000   0.00000  -0.00000   0.00000  -0.00000   0.00000   0.00000   0.00000
        0.88000   0.00000   0.00000   0.00000   0.00000   0.00000   0.00000   0.00000   0.00000   0.00000   0.00000   0.00000  -0.00000   0.00000   0.00000
        0.92000   0.00000   0.00000   0.00000   0.00000   0.00000   0.00000   0.00000   0.00000   0.00000  -0.00000  -0.00000   0.00000   0.00000   0.00000
        0.96000   0.00000   0.00000   0.00000   0.00000   0.00000   0.00000   0.00000  -0.00000  -0.00000   0.00000   0.00000   0.00000   0.00000   0.00000
        0.98000   0.00000   0.00000   0.00000   0.00000   0.00000   0.00000   0.00000  -0.00000   0.00000   0.00000   0.00000   0.00000   0.00000   0.00000
        1.01000   0.00000   0.00000   0.00000   0.00000   0.00000   0.00000   0.00000   0.00000   0.00000   0.00000   0.00000   0.00000   0.00000   0.00047
      </tableData>

    </table>
  </function>

  <function name="aero/CMx_elevator_-9.5">
    <table>
      <independentVar lookup="row">velocities/mach</independentVar>
      <independentVar lookup="column">aero/alpha-deg</independentVar>
      <independentVar lookup="table">aero/beta-deg</independentVar>
      <tableData breakPoint="0.00000">
                -10.00     -5.00      0.00      5.00     10.00     12.50     15.00     17.50     20.00     25.00     30.00     40.00     50.00     60.00
        0.20000   0.00000   0.00000   0.00000   0.00000   0.00000   0.00000   0.00000   0.00000   0.00000   0.00000   0.00000  -0.00013   0.00000   0.00000
        0.60000   0.00000   0.00000   0.00000   0.00000   0.00000  -0.00000   0.00000   0.00000   0.00000  -0.00000   0.00000   0.00000   0.00000  -0.00000
        0.88000   0.00000   0.00000   0.00000   0.00000   0.00000  -0.00000   0.00000   0.00000   0.00000   0.00000  -0.00000   0.00000   0.00000   0.00000
        0.92000   0.00000   0.00000   0.00000   0.00000   0.00000   0.00000   0.00000  -0.00000   0.00000  -0.00000  -0.00000   0.00000   0.00000  -0.00000
        0.96000   0.00000   0.00000   0.00000   0.00000  -0.00000   0.00000  -0.00000  -0.00000  -0.00000   0.00000   0.00000   0.00000  -0.00000   0.00000
        0.98000   0.00000   0.00000   0.00000   0.00000   0.00000   0.00000  -0.00000   0.00000   0.00000   0.00000   0.00000   0.00000   0.00000   0.00000
        1.01000   0.00041   0.00000   0.00000   0.00000   0.00000   0.00000   0.00000   0.00000   0.00000   0.00000  -0.00011   0.00000   0.00000   0.00021
      </tableData>

    </table>
  </function>

  <function name="aero/CMx_elevator_-3">
    <table>
      <independentVar lookup="row">velocities/mach</independentVar>
      <independentVar lookup="column">aero/alpha-deg</independentVar>
      <independentVar lookup="table">aero/beta-deg</independentVar>
      <tableData breakPoint="0.00000">
                -10.00     -5.00      0.00      5.00     10.00     12.50     15.00     17.50     20.00     25.00     30.00     40.00     50.00     60.00
        0.20000   0.00000   0.00000   0.00000  -0.00036   0.00000   0.00000   0.00000  -0.00000   0.00000   0.00000   0.00000   0.00000   0.00000   0.00000
        0.60000   0.00000   0.00000   0.00000   0.00000   0.00000  -0.00000   0.00000   0.00000  -0.00000  -0.00000   0.00000   0.00000  -0.00014  -0.00000
        0.88000   0.00000   0.00016   0.00000   0.00000   0.00000   0.00000   0.00000   0.00000   0.00000   0.00000   0.00000   0.00000   0.00000   0.00000
        0.92000   0.00000   0.00000   0.00000   0.00000   0.00000   0.00000   0.00000  -0.00000   0.00000   0.00000   0.00000   0.00000   0.00000   0.00000
        0.96000   0.00000   0.00000   0.00000   0.00000   0.00000  -0.00000   0.00000   0.00000   0.00000   0.00000   0.00000   0.00000   0.00000   0.00000
        0.98000   0.00000   0.00000  -0.00000   0.00016   0.00000   0.00000   0.00000   0.00000   0.00000   0.00024   0.00000   0.00000   0.00000   0.00000
        1.01000   0.00000   0.00000   0.00000   0.00000   0.00000   0.00000   0.00000   0.00000   0.00000   0.00032  -0.00027   0.00000   0.00000   0.00000
      </tableData>

    </table>
  </function>

  <function name="aero/CMx_elevator_1.5">
    <table>
      <independentVar lookup="row">velocities/mach</independentVar>
      <independentVar lookup="column">aero/alpha-deg</independentVar>
      <independentVar lookup="table">aero/beta-deg</independentVar>
      <tableData breakPoint="0.00000">
                -10.00     -5.00      0.00      5.00     10.00     12.50     15.00     17.50     20.00     25.00     30.00     40.00     50.00     60.00
        0.20000   0.00000   0.00000   0.00000   0.00000   0.00000   0.00000   0.00000  -0.00000   0.00000   0.00000   0.00000   0.00000   0.00000  -0.00000
        0.60000   0.00000   0.00000  -0.00000   0.00000   0.00000   0.00000   0.00000   0.00000  -0.00000  -0.00000  -0.00000   0.00000   0.00000   0.00000
        0.88000   0.00000   0.00000   0.00000   0.00000   0.00000   0.00000   0.00000   0.00000   0.00000   0.00000   0.00000   0.00000   0.00000   0.00000
        0.92000   0.00000   0.00000   0.00000   0.00000   0.00000  -0.00000   0.00000   0.00000   0.00000  -0.00000   0.00000   0.00000   0.00000   0.00000
        0.96000   0.00000   0.00000   0.00000   0.00000   0.00000  -0.00000   0.00000  -0.00000   0.00000   0.00000  -0.00113   0.00000   0.00000   0.00000
        0.98000   0.00000   0.00000   0.00000   0.00014   0.00014  -0.00000   0.00019   0.00000   0.00000   0.00000  -0.00095   0.00000   0.00000   0.00000
        1.01000   0.00000   0.00000   0.00000   0.00038   0.00000   0.00000   0.00000   0.00000   0.00042   0.00000   0.00000   0.00000   0.00000   0.00049
      </tableData>

    </table>
  </function>

  <function name="aero/CMx_elevator">
    <interpolate1d>
      <property>fcs/surfaces/elevator-pos-deg</property>
      <value>-24</value> <property>aero/CMx_elevator_-24</property>
      <value>-9.5</value> <property>aero/CMx_elevator_-9.5</property>
      <value>-3</value> <property>aero/CMx_elevator_-3</property>
      <value>0</value> <value>0</value>
      <value>1.5</value> <property>aero/CMx_elevator_1.5</property>
    </interpolate1d>
  </function>

  <!-- flaps -->
  <function name="aero/CMx_flaps_20">
    <table>
      <independentVar lookup="row">velocities/mach</independentVar>
      <independentVar lookup="column">aero/alpha-deg</independentVar>
      <independentVar lookup="table">aero/beta-deg</independentVar>
      <tableData breakPoint="0.00000">
                -10.00     -5.00      0.00      5.00     10.00     12.50     15.00     17.50     20.00     25.00     30.00     40.00     50.00     60.00
        0.20000   0.00000   0.00000   0.00000   0.00048  -0.00043   0.00000   0.00000   0.00000   0.00000   0.00000   0.00000  -0.00000  -0.00000   0.00010
        0.60000   0.00000   0.00000  -0.00032   0.00277   0.00000   0.00000   0.00000   0.00000   0.00000  -0.00000   0.00000   0.00000   0.00000   0.00000
        0.88000   0.00000  -0.00000   0.00000   0.00662   0.00000   0.00000   0.00000   0.00000   0.00000   0.00000   0.00000   0.00000   0.00000   0.00000
        0.92000   0.00000   0.00000  -0.00102   0.00051  -0.00014   0.00000   0.00000   0.00000   0.00000   0.00000   0.00000   0.00000   0.00000   0.00000
        0.96000   0.00000   0.00000  -0.00428   0.00561   0.00036   0.00000   0.00000   0.00000   0.00000   0.00000  -0.00014   0.00000   0.00000   0.00000
        0.98000   0.00000   0.00000   0.00000  -0.01021  -0.00023   0.00000   0.00000   0.00000   0.00000   0.00000   0.00000   0.00000   0.00000   0.00000
        1.01000   0.00000   0.00000   0.00000   0.00000   0.00000   0.00000   0.00000   0.00000   0.00000   0.00000   0.00000   0.00000   0.00000   0.00016
      </tableData>

    </table>
  </function>

  <function name="aero/CMx_flaps_30">
    <table>
      <independentVar lookup="row">velocities/mach</independentVar>
      <independentVar lookup="column">aero/alpha-deg</independentVar>
      <independentVar lookup="table">aero/beta-deg</independentVar>
      <tableData breakPoint="0.00000">
                -10.00     -5.00      0.00      5.00     10.00     12.50     15.00     17.50     20.00     25.00     30.00     40.00     50.00     60.00
        0.20000   0.00000   0.00000  -0.00059   0.00063   0.00000   0.00000   0.00000   0.00000   0.00000   0.00000   0.00000   0.00000  -0.00000   0.00010
        0.60000   0.00000   0.00000  -0.00058   0.00368   0.00000   0.00000   0.00000   0.00000  -0.00000   0.00000   0.00000   0.00000   0.00000   0.00000
        0.88000   0.00000   0.00000  -0.00021   0.00013   0.00000   0.00000   0.00000   0.00000   0.00000   0.00000  -0.00010   0.00000   0.00000  -0.00000
        0.92000   0.00000  -0.00000  -0.00019   0.00025   0.00000   0.00000  -0.00020   0.00000   0.00000   0.00000   0.00000   0.00000   0.00000   0.00000
        0.96000   0.00000  -0.00022  -0.00330  -0.00534  -0.00010   0.00000  -0.00000   0.00000   0.00000   0.00000   0.00094   0.00000   0.00000   0.00000
        0.98000   0.00000   0.00000   0.00000  -0.01375  -0.00064   0.00000   0.00000  -0.00000   0.00013   0.00000   0.00000   0.00000   0.00000  -0.00010
        1.01000   0.00000   0.00000   0.00000   0.00000   0.00000   0.00000   0.00000   0.00000   0.00000  -0.00014   0.00000   0.00000   0.00000   0.00016
      </tableData>

    </table>
  </function>

  <function name="aero/CMx_flaps">
    <interpolate1d>
      <property>fcs/surfaces/flaps-pos-deg</property>
      <value>0</value> <value>0</value>
      <value>20</value> <property>aero/CMx_flaps_20</property>
      <value>30</value> <property>aero/CMx_flaps_30</property>
    </interpolate1d>
  </function>

  <!-- left-flaperon -->
  <function name="aero/CMx_left-flaperon_-51">
    <table>
      <independentVar lookup="row">velocities/mach</independentVar>
      <independentVar lookup="column">aero/alpha-deg</independentVar>
      <independentVar lookup="table">aero/beta-deg</independentVar>
      <tableData breakPoint="0.00000">
                -10.00     -5.00      0.00      5.00     10.00     12.50     15.00     17.50     20.00     25.00     30.00     40.00     50.00     60.00
        0.20000   0.00260   0.03071   0.03524   0.03499   0.03577   0.02548   0.01014   0.00000   0.00021   0.00231   0.00318   0.00175   0.00242   0.00309
        0.60000  -0.00023   0.02802   0.03954   0.03952   0.03785   0.01984   0.00322  -0.00057   0.00055   0.00432   0.00032   0.00209   0.00258   0.00331
        0.88000  -0.00113   0.01741   0.05210   0.05154   0.02816   0.00717  -0.00053  -0.00258   0.00012  -0.00193   0.00194   0.00338   0.00285   0.00393
        0.92000  -0.00116   0.01254   0.05723   0.05258   0.02681   0.00570  -0.00074  -0.00117  -0.00100  -0.00163   0.00191   0.00397   0.00291   0.00467
        0.96000  -0.00144   0.00427   0.05417   0.05325   0.02949   0.00329  -0.00369   0.00200   0.00429  -0.00176   0.00264   0.00406   0.00299   0.00294
        0.98000   0.00776  -0.00448   0.06364   0.06953   0.02680   0.00100   0.00865   0.00667   0.00267  -0.00172   0.00254   0.00208   0.00233   0.00339
        1.01000  -0.00115  -0.00054   0.07400   0.08310   0.01006  -0.00441  -0.00261  -0.00328  -0.01086  -0.01244  -0.00968   0.00049  -0.00638  -0.00840
      </tableData>

    </table>
  </function>

  <function name="aero/CMx_left-flaperon">
    <interpolate1d>
      <property>fcs/surfaces/left-flaperon-pos-deg</property>
      <value>-51</value> <property>aero/CMx_left-flaperon_-51</property>
      <value>0</value> <value>0</value>
    </interpolate1d>
  </function>

  <!-- right-flaperon -->
  <function name="aero/CMx_right-flaperon_-51">
    <table>
      <independentVar lookup="row">velocities/mach</independentVar>
      <independentVar lookup="column">aero/alpha-deg</independentVar>
      <independentVar lookup="table">aero/beta-deg</independentVar>
      <tableData breakPoint="0.00000">
                -10.00     -5.00      0.00      5.00     10.00     12.50     15.00     17.50     20.00     25.00     30.00     40.00     50.00     60.00
        0.20000  -0.00257  -0.03062  -0.03494  -0.03505  -0.03602  -0.02544  -0.01023   0.00000  -0.00021  -0.00229  -0.00307  -0.00178  -0.00245  -0.00311
        0.60000   0.00023  -0.02795  -0.03927  -0.03934  -0.03815  -0.01994  -0.00324   0.00052  -0.00056  -0.00427  -0.00024  -0.00207  -0.00259  -0.00331
        0.88000   0.00109  -0.01737  -0.05217  -0.05157  -0.03584  -0.00716   0.00054   0.00270  -0.00012   0.00189  -0.00195  -0.00338  -0.00290  -0.00396
        0.92000   0.00116  -0.01254  -0.05732  -0.05665  -0.02652  -0.00568   0.00077   0.00117   0.00108   0.00162  -0.00197  -0.00410  -0.00295  -0.00479
        0.96000   0.00143  -0.00432  -0.05213  -0.06310  -0.02980  -0.00324   0.00367  -0.00188  -0.00439   0.00177  -0.00265  -0.00411  -0.00303  -0.00299
        0.98000  -0.00811   0.00444  -0.06342  -0.06995  -0.02682  -0.00053  -0.00865  -0.00665  -0.00271   0.00171  -0.00254  -0.00214  -0.00237  -0.00343
        1.01000   0.00102   0.00067  -0.07403  -0.08304  -0.01014   0.00443   0.00242   0.00317   0.01079   0.01276   0.00961  -0.00054   0.00630   0.00942
      </tableData>

    </table>
  </function>

  <function name="aero/CMx_right-flaperon">
    <interpolate1d>
      <property>fcs/surfaces/right-flaperon-pos-deg</property>
      <value>-51</value> <property>aero/CMx_right-flaperon_-51</property>
      <value>0</value> <value>0</value>
    </interpolate1d>
  </function>

  <!-- rudder -->
  <function name="aero/CMx_rudder_-35">
    <table>
      <independentVar lookup="row">velocities/mach</independentVar>
      <independentVar lookup="column">aero/alpha-deg</independentVar>
      <independentVar lookup="table">aero/beta-deg</independentVar>
      <tableData breakPoint="-10.00000">
                -10.00     -5.00      0.00      5.00     10.00     12.50     15.00     17.50     20.00     25.00     30.00     40.00     50.00     60.00
        0.20000   0.00549   0.00572   0.00557   0.00624   0.00598   0.00505   0.00504   0.00542   0.00499   0.00151   0.00137   0.00463   0.00375   0.00266
        0.60000   0.00596   0.00623   0.00625   0.00688   0.00623   0.00640   0.00518   0.00556   0.00377  -0.00636   0.00280   0.00476   0.00435   0.00289
        0.88000   0.00736   0.00791   0.00833   0.00817   0.00634   0.00495   0.00472   0.00716  -0.00013   0.01075   0.00364   0.00504   0.00535   0.00442
        0.92000   0.00813   0.00854   0.00747   0.00688   0.00360   0.00725   0.00736  -0.00212   0.00857   0.01014   0.00353   0.00468   0.00554   0.00425
        0.96000   0.00705   0.00600  -0.00335   0.00949   0.00906   0.00159   0.00089   0.00526   0.00661   0.00982   0.00347   0.00368   0.00544   0.00372
        0.98000  -0.00350  -0.00482   0.01149  -0.00251  -0.00827   0.00213   0.00492   0.00204  -0.00511   0.02211   0.01210   0.00256   0.00501   0.00346
        1.01000   0.00435   0.00481   0.00506   0.00444   0.00674   0.01016   0.00871   0.01085   0.01169   0.01512   0.01280   0.00950   0.01083   0.01530
      </tableData>

      <tableData breakPoint="-5.00000">
                -10.00     -5.00      0.00      5.00     10.00     12.50     15.00     17.50     20.00     25.00     30.00     40.00     50.00     60.00
        0.20000   0.00498   0.00503   0.00498   0.00556   0.00563   0.00598   0.00474   0.00531   0.00557   0.00445   0.00441  -0.00119   0.00406   0.00285
        0.60000   0.00544   0.00543   0.00539   0.00816   0.00629   0.00695   0.00572   0.00648   0.00518   0.00561   0.01064   0.00517   0.00479   0.00343
        0.88000   0.00653   0.00666   0.00724   0.00129   0.00765   0.00974   0.00471   0.00658  -0.00159   0.00455   0.01079   0.00621   0.00588   0.00449
        0.92000   0.00705   0.00721   0.00568   0.01026   0.00873   0.01417   0.00733   0.00651   0.00302   0.00759   0.01155   0.00634   0.00630   0.00460
        0.96000   0.00818   0.00631   0.00911   0.00841   0.00887   0.01378   0.01037   0.00258  -0.00831   0.00839   0.01331   0.00610   0.00678   0.00502
        0.98000   0.00836   0.01020   0.01211   0.00825  -0.00302   0.00369  -0.00264  -0.00017  -0.01123  -0.00194   0.01120   0.00542   0.00740   0.00466
        1.01000   0.00546   0.00498   0.00370   0.00437   0.00023   0.00520   0.00277   0.00725   0.01424   0.00516   0.00852   0.00690   0.01033   0.01098
      </tableData>

      <tableData breakPoint="0.00000">
                -10.00     -5.00      0.00      5.00     10.00     12.50     15.00     17.50     20.00     25.00     30.00     40.00     50.00     60.00
        0.20000   0.00477   0.00490   0.00491   0.00274   0.00362   0.00397   0.00395   0.00379   0.00394   0.00621   0.00397   0.00380   0.00442   0.00264
        0.60000   0.00504   0.00532   0.00543   0.00383   0.00417   0.00454   0.00425   0.00389   0.00385   0.00583   0.00449   0.00435   0.00403   0.00313
        0.88000   0.00607   0.00638   0.00673   0.00421   0.00512   0.00535   0.00486   0.00422   0.00351   0.00541   0.00603   0.00586   0.00516   0.00454
        0.92000   0.00644   0.00678   0.00701   0.00732   0.00430   0.00578   0.00554   0.00408   0.01100   0.00603   0.00646   0.00633   0.00563   0.00517
        0.96000   0.00705   0.00719   0.00507   0.01319   0.00852   0.00644   0.00574   0.01283   0.00809   0.00685   0.00713   0.00705   0.00640   0.00537
        0.98000   0.00767   0.00780   0.00763   0.01274   0.00734   0.00433  -0.00224   0.00816   0.00814   0.00743   0.00777   0.00768   0.00711   0.00618
        1.01000   0.00832   0.00837   0.00838   0.00851   0.00837   0.00846   0.00842   0.00837   0.00829   0.00808   0.00837   0.00825   0.00801   0.00776
      </tableData>

      <tableData breakPoint="5.00000">
                -10.00     -5.00      0.00      5.00     10.00     12.50     15.00     17.50     20.00     25.00     30.00     40.00     50.00     60.00
        0.20000   0.00433   0.00498  -0.00108  -0.00243   0.00374   0.00285   0.00133   0.00127   0.00339   0.00210   0.00513   0.00193   0.00334   0.00233
        0.60000   0.00444   0.00481  -0.00266  -0.00461   0.00346   0.00135   0.00042   0.00062   0.00353   0.00319   0.00926   0.00257   0.00346   0.00266
        0.88000   0.00409   0.00307  -0.00309  -0.07460   0.00142  -0.00603   0.00585  -0.00101   0.00526  -0.00264   0.00343   0.00510   0.00469   0.00417
        0.92000   0.00348   0.00138  -0.00040  -0.00224   0.00229  -0.00290  -0.00194  -0.00283   0.00962  -0.00123   0.00341   0.00541   0.00512   0.00485
        0.96000  -0.00027  -0.00143  -0.00100   0.00705  -0.00064  -0.00884   0.00524   0.00204   0.01057  -0.00143   0.00129   0.00551   0.00584   0.00569
        0.98000  -0.01007  -0.00775   0.00073   0.01075   0.00930   0.00596   0.01586   0.00488   0.01754   0.00074   0.00152   0.00562   0.00610   0.00687
        1.01000   0.01056   0.01051   0.01089   0.00780   0.01430   0.00799   0.00849   0.00000  -0.00530   0.00332   0.00323   0.00615   0.00473   0.00458
      </tableData>

      <tableData breakPoint="10.00000">
                -10.00     -5.00      0.00      5.00     10.00     12.50     15.00     17.50     20.00     25.00     30.00     40.00     50.00     60.00
        0.20000   0.00256   0.00235   0.00280  -0.00086   0.00075   0.00097   0.00052  -0.00147  -0.00056   0.00000  -0.00816  -0.01416   0.00313   0.00259
        0.60000   0.00220   0.00167   0.00017  -0.00117  -0.00053  -0.00107   0.00000  -0.00274  -0.00145  -0.00288  -0.00366   0.00346   0.00359   0.00340
        0.88000   0.00000  -0.00136  -0.00237  -0.00432  -0.00304  -0.00375  -0.00325   0.00026   0.00095  -0.00704  -0.00479   0.00339   0.00428   0.00391
        0.92000  -0.00119  -0.00268  -0.00265  -0.00343  -0.00340  -0.00460  -0.00176  -0.00261  -0.00100  -0.01079  -0.00422   0.00357   0.00437   0.00454
        0.96000  -0.00384  -0.00272  -0.01230  -0.00430  -0.00086   0.00079   0.00270  -0.00206  -0.00143  -0.01328  -0.00826   0.00367   0.00399   0.00516
        0.98000   0.00455  -0.00302  -0.01175   0.00198   0.00994  -0.00189   0.00365  -0.00524   0.00440  -0.00749  -0.00445   0.00339   0.00386   0.00574
        1.01000   0.01053   0.00939   0.00811   0.00916   0.00568   0.00151   0.00180  -0.00086  -0.00178   0.00000  -0.00043   0.00266   0.00329   0.00054
      </tableData>

    </table>
  </function>

  <function name="aero/CMx_rudder_35">
    <table>
      <independentVar lookup="row">velocities/mach</independentVar>
      <independentVar lookup="column">aero/alpha-deg</independentVar>
      <independentVar lookup="table">aero/beta-deg</independentVar>
      <tableData breakPoint="-10.00000">
                -10.00     -5.00      0.00      5.00     10.00     12.50     15.00     17.50     20.00     25.00     30.00     40.00     50.00     60.00
        0.20000  -0.00227  -0.00159  -0.00242   0.00131  -0.00095  -0.00092  -0.00047   0.00151   0.00056   0.00000   0.00819   0.01427  -0.00311  -0.00267
        0.60000  -0.00196  -0.00093  -0.00021   0.00106   0.00055   0.00111   0.00000   0.00275   0.00148   0.00285   0.00371  -0.00350  -0.00360  -0.00341
        0.88000   0.00000   0.00140   0.00239   0.00443   0.00306   0.00386   0.00317  -0.00026  -0.00092   0.00785   0.00477  -0.00331  -0.00423  -0.00393
        0.92000   0.00119   0.00268   0.00254   0.00357   0.00340   0.00416   0.00172   0.00349   0.00094   0.00866   0.00435  -0.00357  -0.00435  -0.00454
        0.96000   0.00384   0.00271   0.01241   0.00482   0.00082  -0.00073  -0.00260   0.00200   0.00130   0.01303   0.00804  -0.00370  -0.00399  -0.00516
        0.98000   0.00026   0.00313   0.01171  -0.00183  -0.00971   0.00188  -0.00299   0.00553  -0.00422   0.00751   0.00452  -0.00337  -0.00385  -0.00572
        1.01000  -0.01097  -0.00984  -0.00848  -0.00917  -0.00573  -0.00159  -0.00203   0.00056   0.00178   0.00000   0.00047  -0.00260  -0.00307   0.00013
      </tableData>

      <tableData breakPoint="-5.00000">
                -10.00     -5.00      0.00      5.00     10.00     12.50     15.00     17.50     20.00     25.00     30.00     40.00     50.00     60.00
        0.20000  -0.00397  -0.00418   0.00188   0.00297  -0.00331  -0.00284  -0.00133  -0.00133  -0.00320  -0.00208  -0.00513  -0.00193  -0.00332  -0.00232
        0.60000  -0.00433  -0.00408   0.00245   0.00537  -0.00337  -0.00133  -0.00020  -0.00068  -0.00447  -0.00331  -0.00413  -0.00258  -0.00345  -0.00268
        0.88000  -0.00409  -0.00300   0.00245  -25.78356  -0.00147   0.00603  -0.00582   0.00108  -0.00528   0.00275  -0.00338  -0.00510  -0.00468  -0.00417
        0.92000  -0.00349  -0.00131   0.00053   0.00000  -0.00229   0.00300   0.00158   0.00281  -0.00933   0.00129  -0.00332  -0.00540  -0.00510  -0.00485
        0.96000   0.00033   0.00142   0.00105  -0.00713   0.00080   0.00899  -0.00524  -0.00154  -0.00903   0.00144  -0.00115  -0.00545  -0.00585  -0.00568
        0.98000   0.00990   0.00715  -0.00124  -0.01121  -0.00923  -0.00608  -0.01585  -0.00491  -0.01766  -0.00078  -0.00141  -0.00561  -0.00611  -0.00684
        1.01000  -0.01081  -0.01081  -0.01112  -0.00780  -0.01433  -0.00800  -0.00840   0.00015   0.00530  -0.00305  -0.00325  -0.00617  -0.00475  -0.00381
      </tableData>

      <tableData breakPoint="0.00000">
                -10.00     -5.00      0.00      5.00     10.00     12.50     15.00     17.50     20.00     25.00     30.00     40.00     50.00     60.00
        0.20000  -0.00453  -0.00472  -0.00487  -0.00358  -0.00396  -0.00405  -0.00393  -0.00378  -0.00396  -0.00623  -0.00394  -0.00384  -0.00434  -0.00264
        0.60000  -0.00501  -0.00521  -0.00540  -0.00311  -0.00424  -0.00461  -0.00426  -0.00403  -0.00513  -0.00577  -0.00448  -0.00441  -0.00405  -0.00313
        0.88000  -0.00607  -0.00636  -0.00673  -0.00495  -0.00522  -0.00541  -0.00500  -0.00420  -0.00386  -0.00539  -0.00604  -0.00588  -0.00521  -0.00456
        0.92000  -0.00644  -0.00676  -0.00701  -0.00724  -0.00483  -0.00583  -0.00561  -0.00416  -0.01102  -0.00603  -0.00648  -0.00636  -0.00568  -0.00520
        0.96000  -0.00705  -0.00724  -0.00503  -0.01074  -0.00824  -0.00654  -0.00568  -0.01278  -0.00813  -0.00682  -0.00716  -0.00708  -0.00639  -0.00539
        0.98000  -0.00721  -0.00774  -0.00761  -0.01133  -0.00737  -0.00103   0.00060  -0.00816  -0.00815  -0.00741  -0.00780  -0.00770  -0.00720  -0.00626
        1.01000  -0.00832  -0.00839  -0.00852  -0.00842  -0.00858  -0.00848  -0.00845  -0.00843  -0.00854  -0.00847  -0.00838  -0.00823  -0.00804  -0.00777
      </tableData>

      <tableData breakPoint="5.00000">
                -10.00     -5.00      0.00      5.00     10.00     12.50     15.00     17.50     20.00     25.00     30.00     40.00     50.00     60.00
        0.20000  -0.00497  -0.00500  -0.00498  -0.00572  -0.00531  -0.00598  -0.00473  -0.00535  -0.00542  -0.00437  -0.00456   0.00115  -0.00408  -0.00283
        0.60000  -0.00541  -0.00532  -0.00537  -0.00767  -0.00619  -0.00692  -0.00546  -0.00651  -0.00626  -0.00613  -0.01059  -0.00518  -0.00476  -0.00344
        0.88000  -0.00653  -0.00657  -0.00719  -0.00079  -0.00770  -0.00952  -0.00468  -0.00704   0.00166  -0.00293  -0.01074  -0.00622  -0.00586  -0.00448
        0.92000  -0.00705  -0.00718  -0.00563  -0.01238  -0.00875  -0.01400  -0.01002  -0.00655  -0.00287  -0.00778  -0.01148  -0.00638  -0.00630  -0.00459
        0.96000  -0.00820  -0.00631  -0.00912  -0.00838  -0.00856  -0.01380  -0.01090  -0.00159   0.00811  -0.00840  -0.01321  -0.00608  -0.00682  -0.00501
        0.98000  -0.00854  -0.01054  -0.01206  -0.00574   0.00308  -0.00368   0.00272   0.00012   0.01121   0.00191  -0.01111  -0.00548  -0.00742  -0.00463
        1.01000  -0.00569  -0.00528  -0.00392  -0.00437  -0.00026  -0.00486  -0.00266  -0.00715  -0.01423  -0.00491  -0.00853  -0.00692  -0.01033  -0.01019
      </tableData>

      <tableData breakPoint="10.00000">
                -10.00     -5.00      0.00      5.00     10.00     12.50     15.00     17.50     20.00     25.00     30.00     40.00     50.00     60.00
        0.20000  -0.00523  -0.00508  -0.00558  -0.00607  -0.00630  -0.00504  -0.00504  -0.00541  -0.00497  -0.00151  -0.00131  -0.00461  -0.00375  -0.00274
        0.60000  -0.00572  -0.00559  -0.00626  -0.00700  -0.00635  -0.00640  -0.00519  -0.00560  -0.00373   0.00329  -0.00273  -0.00477  -0.00437  -0.00295
        0.88000  -0.00735  -0.00780  -0.00830  -0.00807  -0.00632  -0.00497  -0.00465  -0.00736   0.00015  -0.01059  -0.00370  -0.00502  -0.00535  -0.00441
        0.92000  -0.00813  -0.00846  -0.00744  -0.00682  -0.00364  -0.00720  -0.00729   0.00063  -0.00872  -0.01016  -0.00341  -0.00473  -0.00556  -0.00425
        0.96000  -0.00703  -0.00602   0.00349  -0.01025  -0.00901  -0.00165  -0.00085  -0.00413  -0.00663  -0.01086  -0.00636  -0.00368  -0.00547  -0.00373
        0.98000   0.00349   0.00534  -0.01153   0.00257   0.00840  -0.00191  -0.00503  -0.00171   0.00518  -0.02237  -0.01203  -0.00254  -0.00502  -0.00341
        1.01000  -0.00479  -0.00525  -0.00543  -0.00448  -0.00679  -0.01024  -0.00895  -0.01115  -0.01172  -0.01504  -0.01276  -0.00943  -0.01064  -0.01462
      </tableData>

    </table>
  </function>

  <function name="aero/CMx_rudder">
    <interpolate1d>
      <property>fcs/surfaces/rudder-pos-deg</property>
      <value>-35</value> <property>aero/CMx_rudder_-35</property>
      <value>0</value> <value>0</value>
      <value>35</value> <property>aero/CMx_rudder_35</property>
    </interpolate1d>
  </function>

  <!-- slats -->
  <function name="aero/CMx_slats_27.5">
    <table>
      <independentVar lookup="row">velocities/mach</independentVar>
      <independentVar lookup="column">aero/alpha-deg</independentVar>
      <independentVar lookup="table">aero/beta-deg</independentVar>
      <tableData breakPoint="0.00000">
                -10.00     -5.00      0.00      5.00     10.00     12.50     15.00     17.50     20.00     25.00     30.00     40.00     50.00     60.00
        0.20000   0.00000   0.00000   0.00000   0.00000  -0.00011   0.00000   0.00000  -0.00000   0.00000   0.00000   0.00000  -0.00000   0.00000   0.00000
        0.60000   0.00000   0.00000   0.00000   0.00042  -0.00032   0.00000   0.00000   0.00000   0.00000  -0.00000   0.00000   0.00000   0.00000   0.00000
        0.88000   0.00000   0.00000  -0.00000   0.00035   0.00016   0.00000   0.00000   0.00000   0.00000   0.00000   0.00000   0.00000   0.00000  -0.00000
        0.92000   0.00000   0.00000   0.00000   0.00049   0.00000  -0.00000   0.00000   0.00000   0.00000  -0.00000   0.00000   0.00000   0.00000   0.00000
        0.96000   0.00000   0.00000   0.00000  -0.00187   0.00000   0.00000  -0.00016   0.00000  -0.00000  -0.00000  -0.00012  -0.00012  -0.00010   0.00000
        0.98000   0.00000   0.00000   0.00000   0.01074   0.00000   0.00000  -0.00000   0.00000   0.00000   0.00000   0.00019   0.00000   0.00000   0.00000
        1.01000   0.00000   0.00000   0.00000   0.00000  -0.00018   0.00000   0.00000   0.00000  -0.00014  -0.00011   0.00000   0.00000   0.00000   0.00013
      </tableData>

    </table>
  </function>

  <function name="aero/CMx_slats">
    <interpolate1d>
      <property>fcs/surfaces/slats-pos-deg</property>
      <value>0</value> <value>0</value>
      <value>27.5</value> <property>aero/CMx_slats_27.5</property>
    </interpolate1d>
  </function>

  <!-- CMY -->
  <!-- base -->
  <function name="aero/CMy_base">
    <table>
      <independentVar lookup="row">velocities/mach</independentVar>
      <independentVar lookup="column">aero/alpha-deg</independentVar>
      <independentVar lookup="table">aero/beta-deg</independentVar>
      <tableData breakPoint="-10.00000">
                -10.00     -5.00      0.00      5.00     10.00     12.50     15.00     17.50     20.00     25.00     30.00     40.00     50.00     60.00
        0.20000   0.12418   0.05525  -0.00940  -0.08565  -0.12587  -0.14036  -0.15562  -0.17557  -0.20136  -0.21768  -0.21866  -0.22173  -0.26118  -0.36621
        0.60000   0.13001   0.06156  -0.00852  -0.08767  -0.12881  -0.13962  -0.15705  -0.18229  -0.21145  -0.21754  -0.21933  -0.23195  -0.28013  -0.39275
        0.88000   0.13008   0.07257  -0.00659  -0.05861  -0.11873  -0.13158  -0.15225  -0.18413  -0.21602  -0.23953  -0.22835  -0.27053  -0.35072  -0.49176
        0.92000   0.12953   0.07519  -0.00613  -0.05640  -0.11110  -0.12585  -0.14730  -0.15808  -0.21691  -0.23841  -0.24210  -0.30189  -0.37556  -0.50525
        0.96000   0.12968   0.07793  -0.00545  -0.02947  -0.09964  -0.12032  -0.15159  -0.17390  -0.20693  -0.23664  -0.27358  -0.34166  -0.42020  -0.56537
        0.98000   0.13001   0.07824  -0.00461  -0.00630  -0.09366  -0.11340  -0.14601  -0.14406  -0.19328  -0.25941  -0.31020  -0.38899  -0.48917  -0.64521
        1.01000   0.16331   0.12249   0.00204  -0.08933  -0.11397  -0.12401  -0.16148  -0.18558  -0.22219  -0.30353  -0.38616  -0.43429  -0.53423  -0.74540
      </tableData>

      <tableData breakPoint="-5.00000">
                -10.00     -5.00      0.00      5.00     10.00     12.50     15.00     17.50     20.00     25.00     30.00     40.00     50.00     60.00
        0.20000   0.13382   0.06195  -0.00648  -0.06776  -0.12791  -0.14542  -0.15883  -0.17606  -0.20326  -0.22787  -0.21639  -0.21539  -0.26429  -0.38029
        0.60000   0.13805   0.06803  -0.00542  -0.08596  -0.12609  -0.14437  -0.15685  -0.18109  -0.21366  -0.23334  -0.21054  -0.22685  -0.28291  -0.40870
        0.88000   0.13627   0.07878  -0.00299  -0.05979  -0.12429  -0.13364  -0.15783  -0.19633  -0.23345  -0.23021  -0.21957  -0.26959  -0.34696  -0.49870
        0.92000   0.13575   0.08145  -0.00220   0.01339  -0.12220  -0.11887  -0.17131  -0.18888  -0.23007  -0.22771  -0.23940  -0.29388  -0.37829  -0.52806
        0.96000   0.13502   0.08571  -0.00086  -0.06024  -0.10108  -0.13596  -0.16793  -0.16389  -0.22549  -0.22898  -0.23139  -0.34257  -0.43112  -0.59090
        0.98000   0.13451   0.08885   0.00045   0.00987  -0.11880  -0.11425  -0.16486  -0.17377  -0.21963  -0.23723  -0.30645  -0.39767  -0.50606  -0.67160
        1.01000   0.16947   0.12814   0.00361  -0.09447  -0.12995  -0.13325  -0.17162  -0.19221  -0.22264  -0.32887  -0.37925  -0.42932  -0.54282  -0.77546
      </tableData>

      <tableData breakPoint="0.00000">
                -10.00     -5.00      0.00      5.00     10.00     12.50     15.00     17.50     20.00     25.00     30.00     40.00     50.00     60.00
        0.20000   0.13657   0.06386  -0.00502  -0.06377  -0.13390  -0.15080  -0.16577  -0.18787  -0.20988  -0.22536  -0.21294  -0.21357  -0.26402  -0.38401
        0.60000   0.13899   0.06987  -0.00400  -0.06620  -0.12955  -0.15247  -0.17241  -0.19849  -0.22253  -0.22927  -0.21747  -0.22440  -0.28218  -0.41189
        0.88000   0.13573   0.08103  -0.00147  -0.06494  -0.12735  -0.15124  -0.18170  -0.20176  -0.23686  -0.24417  -0.24076  -0.26818  -0.34864  -0.50148
        0.92000   0.13498   0.08328  -0.00056  -0.06170  -0.12705  -0.15022  -0.18103  -0.20002  -0.23853  -0.25393  -0.25476  -0.29255  -0.38012  -0.53716
        0.96000   0.13306   0.08740   0.00099  -0.05334  -0.12138  -0.14589  -0.17902  -0.19432  -0.23247  -0.27816  -0.28991  -0.34334  -0.43836  -0.60077
        0.98000   0.13117   0.09175   0.00250  -0.03924  -0.11776  -0.15314  -0.17667  -0.18769  -0.22895  -0.30917  -0.33502  -0.40192  -0.51259  -0.68289
        1.01000   0.17266   0.13173   0.00412  -0.09227  -0.12843  -0.14619  -0.16990  -0.20014  -0.23833  -0.34077  -0.37675  -0.42736  -0.54717  -0.78768
      </tableData>

      <tableData breakPoint="5.00000">
                -10.00     -5.00      0.00      5.00     10.00     12.50     15.00     17.50     20.00     25.00     30.00     40.00     50.00     60.00
        0.20000   0.13393   0.06201  -0.00653  -0.06636  -0.12728  -0.14551  -0.15892  -0.17542  -0.20348  -0.22806  -0.21634  -0.21533  -0.26439  -0.38174
        0.60000   0.13812   0.06807  -0.00545  -0.07308  -0.12597  -0.14435  -0.15453  -0.18074  -0.21102  -0.23333  -0.21009  -0.22683  -0.28289  -0.40862
        0.88000   0.13633   0.07883  -0.00301  -0.06974  -0.12737  -0.13333  -0.15804  -0.19646  -0.23351  -0.22992  -0.21943  -0.26961  -0.34622  -0.49850
        0.92000   0.13575   0.08161  -0.00221  -0.04753  -0.12147  -0.11858  -0.17166  -0.18881  -0.23023  -0.22794  -0.23926  -0.29401  -0.37802  -0.52805
        0.96000   0.13504   0.08574  -0.00086  -0.06078  -0.10175  -0.13638  -0.16812  -0.16463  -0.22611  -0.22922  -0.23467  -0.34389  -0.43103  -0.59085
        0.98000   0.13454   0.08887   0.00045   0.01175  -0.11815  -0.11430  -0.16499  -0.17442  -0.21991  -0.23837  -0.30689  -0.39749  -0.50613  -0.67187
        1.01000   0.17041   0.12839   0.00364  -0.09445  -0.12939  -0.13377  -0.17175  -0.19209  -0.22188  -0.33369  -0.38005  -0.43054  -0.54593  -0.77770
      </tableData>

      <tableData breakPoint="10.00000">
                -10.00     -5.00      0.00      5.00     10.00     12.50     15.00     17.50     20.00     25.00     30.00     40.00     50.00     60.00
        0.20000   0.12433   0.05541  -0.00954  -0.08671  -0.12603  -0.14078  -0.15635  -0.17648  -0.20167  -0.21685  -0.21901  -0.22176  -0.26166  -0.36692
        0.60000   0.13014   0.06165  -0.00856  -0.08606  -0.12884  -0.14003  -0.15768  -0.18286  -0.21169  -0.21739  -0.21988  -0.23198  -0.28044  -0.39259
        0.88000   0.13023   0.07260  -0.00659  -0.05868  -0.11800  -0.13165  -0.15238  -0.18423  -0.21638  -0.23962  -0.22819  -0.27072  -0.35054  -0.49152
        0.92000   0.12961   0.07526  -0.00615  -0.05570  -0.11112  -0.12563  -0.14664  -0.15360  -0.21714  -0.23816  -0.24116  -0.30422  -0.37533  -0.50508
        0.96000   0.12973   0.07796  -0.00544  -0.02994  -0.09968  -0.12029  -0.15158  -0.17327  -0.20648  -0.23727  -0.27375  -0.34154  -0.42009  -0.56529
        0.98000   0.13007   0.07824  -0.00462  -0.00602  -0.09417  -0.11286  -0.14570  -0.14375  -0.19386  -0.26064  -0.30945  -0.38879  -0.48921  -0.64502
        1.01000   0.16407   0.12251   0.00207  -0.08947  -0.11387  -0.12460  -0.16273  -0.18768  -0.22402  -0.30472  -0.38802  -0.43764  -0.53942  -0.74855
      </tableData>

    </table>
  </function>

  <!-- elevator -->
  <function name="aero/CMy_elevator_-24">
    <table>
      <independentVar lookup="row">velocities/mach</independentVar>
      <independentVar lookup="column">aero/alpha-deg</independentVar>
      <independentVar lookup="table">aero/beta-deg</independentVar>
      <tableData breakPoint="0.00000">
                -10.00     -5.00      0.00      5.00     10.00     12.50     15.00     17.50     20.00     25.00     30.00     40.00     50.00     60.00
        0.20000   0.20704   0.30229   0.39679   0.48605   0.58572   0.62660   0.66168   0.69150   0.70696   0.64583   0.53358   0.30176   0.13117   0.14040
        0.60000   0.20025   0.29980   0.39797   0.48973   0.58889   0.64358   0.68513   0.72180   0.74564   0.70296   0.58945   0.34414   0.15157   0.14592
        0.88000   0.19864   0.29866   0.39938   0.48861   0.60299   0.65521   0.70624   0.74240   0.79048   0.80752   0.76859   0.49909   0.23532   0.15862
        0.92000   0.20176   0.30071   0.39966   0.48471   0.60485   0.65464   0.70505   0.73906   0.79013   0.82328   0.81345   0.56645   0.27715   0.16392
        0.96000   0.20990   0.30494   0.40011   0.47642   0.60038   0.64735   0.69691   0.72573   0.77508   0.83465   0.84494   0.68362   0.35620   0.16610
        0.98000   0.21931   0.30966   0.40062   0.46495   0.59363   0.64633   0.68357   0.70576   0.75489   0.84124   0.85913   0.78692   0.43405   0.17132
        1.01000   0.30951   0.36741   0.41516   0.44122   0.51168   0.54493   0.58347   0.62812   0.68033   0.80776   0.86479   0.93715   0.73995   0.31311
      </tableData>

    </table>
  </function>

  <function name="aero/CMy_elevator_-9.5">
    <table>
      <independentVar lookup="row">velocities/mach</independentVar>
      <independentVar lookup="column">aero/alpha-deg</independentVar>
      <independentVar lookup="table">aero/beta-deg</independentVar>
      <tableData breakPoint="0.00000">
                -10.00     -5.00      0.00      5.00     10.00     12.50     15.00     17.50     20.00     25.00     30.00     40.00     50.00     60.00
        0.20000   0.20418   0.27323   0.28430   0.29193   0.29261   0.29378   0.28766   0.28090   0.26827   0.21301   0.11721   0.02318   0.02893   0.08006
        0.60000   0.19749   0.28714   0.31100   0.31997   0.32038   0.32288   0.31871   0.31304   0.29792   0.23039   0.12684   0.02038   0.02879   0.07543
        0.88000   0.19548   0.29700   0.36955   0.38497   0.39136   0.39388   0.39166   0.37920   0.38422   0.29675   0.17868   0.01898   0.03281   0.08422
        0.92000   0.19864   0.29935   0.38043   0.40460   0.41519   0.42090   0.41548   0.40198   0.41140   0.33003   0.20788   0.01964   0.03313   0.08992
        0.96000   0.20732   0.30420   0.39042   0.42593   0.44763   0.45641   0.45169   0.43775   0.45146   0.39498   0.26629   0.02291   0.03552   0.09348
        0.98000   0.21722   0.30955   0.39648   0.43192   0.47620   0.49720   0.48275   0.46792   0.48654   0.45596   0.32500   0.02726   0.03703   0.09472
        1.01000   0.28509   0.35059   0.40988   0.44544   0.50511   0.53114   0.55954   0.57844   0.58662   0.60259   0.51012   0.15493   0.09114   0.16556
      </tableData>

    </table>
  </function>

  <function name="aero/CMy_elevator_-3">
    <table>
      <independentVar lookup="row">velocities/mach</independentVar>
      <independentVar lookup="column">aero/alpha-deg</independentVar>
      <independentVar lookup="table">aero/beta-deg</independentVar>
      <tableData breakPoint="0.00000">
                -10.00     -5.00      0.00      5.00     10.00     12.50     15.00     17.50     20.00     25.00     30.00     40.00     50.00     60.00
        0.20000   0.08478   0.09003   0.09246   0.07232   0.09180   0.09193   0.08761   0.08464   0.08126   0.03478   0.00260   0.00583   0.01441   0.03472
        0.60000   0.09352   0.09928   0.10167   0.10556   0.10064   0.10066   0.09799   0.09481   0.09089   0.02957   0.00217   0.00602   0.01462   0.03639
        0.88000   0.11491   0.11882   0.12235   0.12928   0.12447   0.12427   0.12194   0.10760   0.11509   0.03397   0.00231   0.00600   0.01555   0.03904
        0.92000   0.12120   0.12508   0.12863   0.13667   0.13227   0.13265   0.12973   0.11344   0.12346   0.04611   0.00227   0.00579   0.01561   0.04144
        0.96000   0.13191   0.13388   0.13778   0.14847   0.14318   0.14354   0.14213   0.12116   0.13362   0.07778   0.00635   0.00632   0.01595   0.04154
        0.98000   0.13976   0.14043   0.14493   0.16566   0.15250   0.16209   0.15248   0.15193   0.14440   0.11044   0.01394   0.00484   0.01830   0.04209
        1.01000   0.17338   0.17227   0.17241   0.17856   0.17996   0.18108   0.18252   0.18347   0.18556   0.18976   0.08252   0.01838   0.03312   0.06184
      </tableData>

    </table>
  </function>

  <function name="aero/CMy_elevator_1.5">
    <table>
      <independentVar lookup="row">velocities/mach</independentVar>
      <independentVar lookup="column">aero/alpha-deg</independentVar>
      <independentVar lookup="table">aero/beta-deg</independentVar>
      <tableData breakPoint="0.00000">
                -10.00     -5.00      0.00      5.00     10.00     12.50     15.00     17.50     20.00     25.00     30.00     40.00     50.00     60.00
        0.20000  -0.04274  -0.04424  -0.04586  -0.04520  -0.04401  -0.04317  -0.04195  -0.03997  -0.02904  -0.00258  -0.00109  -0.00331  -0.00722  -0.01991
        0.60000  -0.04701  -0.04755  -0.05038  -0.05002  -0.04860  -0.04886  -0.04603  -0.04357  -0.02207  -0.00064  -0.00128  -0.00371  -0.00779  -0.02146
        0.88000  -0.05881  -0.05681  -0.06051  -0.06140  -0.05918  -0.06211  -0.05750  -0.05210  -0.02075  -0.00059  -0.00109  -0.00340  -0.00845  -0.02255
        0.92000  -0.06236  -0.05924  -0.06356  -0.06574  -0.06170  -0.06580  -0.06087  -0.05554  -0.02381  -0.00068  -0.00074  -0.00370  -0.00862  -0.02365
        0.96000  -0.06685  -0.06253  -0.06798  -0.07056  -0.06863  -0.07441  -0.06667  -0.06493  -0.04000  -0.00029  -0.00022  -0.00343  -0.00931  -0.02434
        0.98000  -0.07068  -0.06491  -0.07141  -0.07884  -0.06947  -0.07260  -0.07271  -0.07050  -0.05811  -0.00192  -0.00103  -0.00440  -0.00926  -0.02449
        1.01000  -0.08587  -0.08525  -0.08434  -0.08617  -0.08740  -0.08729  -0.08763  -0.08819  -0.08594  -0.03614  -0.00568  -0.01042  -0.01806  -0.03074
      </tableData>

    </table>
  </function>

  <function name="aero/CMy_elevator">
    <interpolate1d>
      <property>fcs/surfaces/elevator-pos-deg</property>
      <value>-24</value> <property>aero/CMy_elevator_-24</property>
      <value>-9.5</value> <property>aero/CMy_elevator_-9.5</property>
      <value>-3</value> <property>aero/CMy_elevator_-3</property>
      <value>0</value> <value>0</value>
      <value>1.5</value> <property>aero/CMy_elevator_1.5</property>
    </interpolate1d>
  </function>

  <!-- flaps -->
  <function name="aero/CMy_flaps_20">
    <table>
      <independentVar lookup="row">velocities/mach</independentVar>
      <independentVar lookup="column">aero/alpha-deg</independentVar>
      <independentVar lookup="table">aero/beta-deg</independentVar>
      <tableData breakPoint="0.00000">
                -10.00     -5.00      0.00      5.00     10.00     12.50     15.00     17.50     20.00     25.00     30.00     40.00     50.00     60.00
        0.20000  -0.08248  -0.08646  -0.08737  -0.05016  -0.07742  -0.06422  -0.08221  -0.06645  -0.04507  -0.05940  -0.11262  -0.18814  -0.20532  -0.15891
        0.60000  -0.09327  -0.10785  -0.10920  -0.05657  -0.10660  -0.07086  -0.05313  -0.06559  -0.03679  -0.06375  -0.12976  -0.22596  -0.25627  -0.22490
        0.88000  -0.13794  -0.18083  -0.18451  -0.18003  -0.11570  -0.06499  -0.09837  -0.07297  -0.02953  -0.08457  -0.17223  -0.32303  -0.38376  -0.41078
        0.92000  -0.16279  -0.21230  -0.21868  -0.02893  -0.09702  -0.11933  -0.09875  -0.07411  -0.03161  -0.08870  -0.17981  -0.35434  -0.41827  -0.47559
        0.96000  -0.21028  -0.27207  -0.34035  -0.44992  -0.20028  -0.15585  -0.10755  -0.09295  -0.04729  -0.07855  -0.17732  -0.39262  -0.45983  -0.54140
        0.98000  -0.26267  -0.33334  -0.33678   0.13390  -0.24265  -0.17070  -0.12408  -0.06753  -0.05523  -0.06756  -0.17145  -0.42564  -0.49043  -0.55979
        1.01000  -0.49244  -0.65619  -0.64187  -0.21218  -0.41574  -0.33535  -0.27431  -0.22623  -0.18942  -0.14318  -0.22728  -0.57810  -0.69438  -0.84694
      </tableData>

    </table>
  </function>

  <function name="aero/CMy_flaps_30">
    <table>
      <independentVar lookup="row">velocities/mach</independentVar>
      <independentVar lookup="column">aero/alpha-deg</independentVar>
      <independentVar lookup="table">aero/beta-deg</independentVar>
      <tableData breakPoint="0.00000">
                -10.00     -5.00      0.00      5.00     10.00     12.50     15.00     17.50     20.00     25.00     30.00     40.00     50.00     60.00
        0.20000  -0.11477  -0.11825  -0.11084  -0.08237  -0.09741  -0.06690  -0.06008  -0.06993  -0.04416  -0.05629  -0.11050  -0.18914  -0.20798  -0.16134
        0.60000  -0.13314  -0.14720  -0.13948  -0.09989  -0.11759  -0.06922  -0.04555  -0.05131  -0.03726  -0.06025  -0.12660  -0.22642  -0.25973  -0.22771
        0.88000  -0.20349  -0.24564  -0.24295  -0.00890  -0.13374  -0.05422  -0.03369  -0.08854  -0.03116  -0.06952  -0.17102  -0.32990  -0.39323  -0.41597
        0.92000  -0.23953  -0.28817  -0.28607   0.00547  -0.11507  -0.06935  -0.12072  -0.08216  -0.03123  -0.08659  -0.17951  -0.36045  -0.43050  -0.48075
        0.96000  -0.31273  -0.36791  -0.38243   0.17125  -0.19406  -0.18864  -0.12496  -0.10306  -0.04795  -0.07808  -0.18109  -0.40538  -0.47771  -0.54995
        0.98000  -0.38412  -0.44780  -0.36161  -0.69474  -0.29152  -0.20413  -0.14920  -0.06879  -0.05554  -0.06521  -0.17389  -0.43977  -0.51084  -0.56973
        1.01000  -0.72373  -0.87858  -0.71529  -0.17456  -0.52011  -0.41150  -0.33068  -0.26865  -0.21933  -0.15878  -0.23676  -0.59703  -0.71580  -0.85836
      </tableData>

    </table>
  </function>

  <function name="aero/CMy_flaps">
    <interpolate1d>
      <property>fcs/surfaces/flaps-pos-deg</property>
      <value>0</value> <value>0</value>
      <value>20</value> <property>aero/CMy_flaps_20</property>
      <value>30</value> <property>aero/CMy_flaps_30</property>
    </interpolate1d>
  </function>

  <!-- left-flaperon -->
  <function name="aero/CMy_left-flaperon_-51">
    <table>
      <independentVar lookup="row">velocities/mach</independentVar>
      <independentVar lookup="column">aero/alpha-deg</independentVar>
      <independentVar lookup="table">aero/beta-deg</independentVar>
      <tableData breakPoint="0.00000">
                -10.00     -5.00      0.00      5.00     10.00     12.50     15.00     17.50     20.00     25.00     30.00     40.00     50.00     60.00
        0.20000   0.02005   0.05634   0.06712   0.05034   0.09158   0.05528   0.04557   0.03225   0.02571   0.02520   0.01000   0.02087   0.01640   0.01723
        0.60000   0.02241   0.06197   0.08243   0.07019   0.07340   0.06575   0.05919   0.02966   0.03919  -0.01541   0.03221   0.02623   0.01949   0.02065
        0.88000   0.03542   0.07864   0.12213   0.07180   0.18481   0.12665   0.07138   0.08370  -0.02211   0.02007   0.03884   0.06899   0.03131   0.03134
        0.92000   0.03836   0.08073   0.14066  -0.03751   0.14910   0.20907   0.00451   0.01997   0.17222   0.01231   0.04960   0.03203   0.03468   0.04052
        0.96000   0.02872  -0.06966  -0.21479   0.22366   0.20275   0.28481   0.09929  -0.02956   0.05358   0.01132   0.07153   0.06974   0.04202   0.06966
        0.98000  -0.10093  -0.22948  -0.01305   0.27984   0.25134   0.32159   0.01589  -0.02342  -0.01688   0.01870   0.10369   0.17655   0.05254   0.06424
        1.01000   0.07293   0.07756   0.08262   0.08182   0.13445   0.20534   0.15844   0.16982   0.17916   0.27926   0.24300   0.25684   0.03696   0.02895
      </tableData>

    </table>
  </function>

  <function name="aero/CMy_left-flaperon">
    <interpolate1d>
      <property>fcs/surfaces/left-flaperon-pos-deg</property>
      <value>-51</value> <property>aero/CMy_left-flaperon_-51</property>
      <value>0</value> <value>0</value>
    </interpolate1d>
  </function>

  <!-- right-flaperon -->
  <function name="aero/CMy_right-flaperon_-51">
    <table>
      <independentVar lookup="row">velocities/mach</independentVar>
      <independentVar lookup="column">aero/alpha-deg</independentVar>
      <independentVar lookup="table">aero/beta-deg</independentVar>
      <tableData breakPoint="0.00000">
                -10.00     -5.00      0.00      5.00     10.00     12.50     15.00     17.50     20.00     25.00     30.00     40.00     50.00     60.00
        0.20000   0.02015   0.05635   0.06703   0.05529   0.08967   0.05537   0.04681   0.03120   0.02566   0.02557   0.00862   0.02120   0.01655   0.01744
        0.60000   0.02251   0.06190   0.08223   0.10786   0.07385   0.06752   0.05928   0.03101   0.03836  -0.01478   0.03389   0.02652   0.01945   0.02110
        0.88000   0.03499   0.07841   0.12175   0.07528   0.10112   0.12403   0.07118   0.08323  -0.02196   0.01825   0.03853   0.06873   0.03134   0.03164
        0.92000   0.03831   0.08071   0.14109  -0.03444   0.13342   0.20896   0.03454   0.02099   0.17014   0.01145   0.04698   0.02369   0.03500   0.03907
        0.96000   0.02842  -0.06889  -0.16805   0.28014   0.21198   0.28526   0.09900  -0.03198   0.05352   0.01029   0.07198   0.07238   0.04210   0.06982
        0.98000  -0.09542  -0.23620  -0.01067   0.12091   0.25319   0.33300   0.01507  -0.02788  -0.01681   0.01781   0.10416   0.17562   0.05197   0.06445
        1.01000   0.07295   0.07745   0.08268   0.07704   0.13439   0.20551   0.15964   0.16973   0.17933   0.27937   0.24357   0.25713   0.03802   0.02903
      </tableData>

    </table>
  </function>

  <function name="aero/CMy_right-flaperon">
    <interpolate1d>
      <property>fcs/surfaces/right-flaperon-pos-deg</property>
      <value>-51</value> <property>aero/CMy_right-flaperon_-51</property>
      <value>0</value> <value>0</value>
    </interpolate1d>
  </function>

  <!-- rudder -->
  <function name="aero/CMy_rudder_-35">
    <table>
      <independentVar lookup="row">velocities/mach</independentVar>
      <independentVar lookup="column">aero/alpha-deg</independentVar>
      <independentVar lookup="table">aero/beta-deg</independentVar>
      <tableData breakPoint="-10.00000">
                -10.00     -5.00      0.00      5.00     10.00     12.50     15.00     17.50     20.00     25.00     30.00     40.00     50.00     60.00
        0.20000   0.00018  -0.00137  -0.00432  -0.01969  -0.01073  -0.01397  -0.01983  -0.03334  -0.04663  -0.04314   0.15278  -0.07899   0.01144  -0.00692
        0.60000  -0.00282  -0.00634  -0.01327  -0.03798  -0.02026  -0.01151  -0.03129  -0.05386  -0.07232   0.07624   0.15368   0.01966   0.00083  -0.00564
        0.88000  -0.03137  -0.05850  -0.08355  -0.13209  -0.07435  -0.08585  -0.16318  -0.10084  -0.02786   0.09929  -0.09653   0.03572  -0.00227   0.00230
        0.92000  -0.06792  -0.08693  -0.13052  -0.20078  -0.13635  -0.09821  -0.30006  -0.24787   0.07236   0.11452  -0.14314   0.03623   0.00299   0.00355
        0.96000  -0.03419  -0.13422  -0.45562  -0.15669  -0.11399  -0.21875  -0.18607  -0.02393  -0.04522   0.01544  -1.47656   0.04541   0.01009   0.00930
        0.98000  -0.47634  -0.46862  -0.31192  -0.40673  -0.38005  -0.24438  -0.15295  -0.75934  -0.26380   0.15854  -0.08857   0.05113   0.01331   0.02490
        1.01000  -0.39177  -0.37495  -0.33080  -0.31682  -0.28946  -0.27850  -0.24959  -0.22319  -0.17360   0.11362   0.24387   0.27087   0.33927   0.29766
      </tableData>

      <tableData breakPoint="-5.00000">
                -10.00     -5.00      0.00      5.00     10.00     12.50     15.00     17.50     20.00     25.00     30.00     40.00     50.00     60.00
        0.20000  -0.00059  -0.00022  -0.00123  -0.03501   0.00471   0.00995   0.01344  -0.01119  -0.01951   0.00021  -0.02993  -0.15503   0.00441  -0.00102
        0.60000  -0.00199  -0.00213  -0.00586  -0.03252   0.00020   0.02574   0.00478  -0.05110  -0.05594   0.00696   0.07413   0.00959   0.00319   0.00141
        0.88000  -0.01018  -0.01864  -0.08514  -0.23937   0.05684   0.10615  -0.03980  -0.11496   0.10219   0.06233  -0.00141   0.02276   0.00608   0.00515
        0.92000  -0.02020  -0.04432  -0.32147  -0.28997   0.05630  -0.04296   0.00342  -0.05044  -0.08774  -0.07121  -0.03547   0.02904   0.00786   0.00609
        0.96000  -0.09893  -0.18019  -0.15244  -0.30319  -0.19596   0.00054  -0.11637  -0.14953  -0.05768   0.00662  -0.18722   0.05763   0.01080   0.00948
        0.98000  -0.44588  -0.25936  -0.14437  -1.10574  -0.02017  -0.19496  -0.17136  -0.18927  -0.00017  -0.03428  -0.30785   0.08365   0.01373   0.01450
        1.01000  -0.13412  -0.14865  -0.16630  -0.33537  -0.17453  -0.07056   0.05013   0.01582   0.05120   0.11030   0.25783   0.26880   0.12074   0.01389
      </tableData>

      <tableData breakPoint="0.00000">
                -10.00     -5.00      0.00      5.00     10.00     12.50     15.00     17.50     20.00     25.00     30.00     40.00     50.00     60.00
        0.20000  -0.00356  -0.00044   0.00000   0.18746   0.01677  -0.00106  -0.01056  -0.00370   0.00069   0.00752   0.22931   0.00452   0.00046   0.00314
        0.60000  -0.00486  -0.00232  -0.00073   0.16829   0.00437  -0.00161  -0.00293  -0.00613   0.01271   0.09572  -0.00600  -0.01098   0.00310   0.00295
        0.88000  -0.00823  -0.00542  -0.00268  -0.02087  -0.00597   0.00415  -0.00191  -0.00814   0.02912   0.00960   0.01113   0.01352   0.01101   0.00616
        0.92000  -0.00931  -0.00633  -0.00494   0.00180  -0.02069   0.00600  -0.00029  -0.00571   0.11450   0.01150   0.01293   0.01405   0.01222   0.00953
        0.96000  -0.01189  -0.00994  -0.04482  -0.02824   0.01030   0.00420   0.00097  -0.15136   0.00782   0.01448   0.01678   0.01637   0.01405   0.01067
        0.98000  -0.07342  -0.01131  -0.00885   0.02340   0.00052   0.07160   0.04154   0.00623   0.00897   0.01495   0.01746   0.01893   0.01682   0.01118
        1.01000   0.00207   0.00145   0.00190   0.00219   0.00148   0.00171   0.00171   0.00162   0.00145   0.00091   0.00159   0.00137   0.00119   0.00084
      </tableData>

      <tableData breakPoint="5.00000">
                -10.00     -5.00      0.00      5.00     10.00     12.50     15.00     17.50     20.00     25.00     30.00     40.00     50.00     60.00
        0.20000  -0.00881  -0.00932   0.04381   0.01914   0.01902  -0.06244  -0.05822  -0.02533   0.00184   0.02296  -0.10474   0.03144   0.04188  -0.00815
        0.60000  -0.01242  -0.01536  -0.02886  -0.23075   0.01638  -0.13638  -0.07208   0.00022   0.00956  -0.09607  -0.19478   0.02275  -0.01640  -0.00303
        0.88000  -0.02872  -0.05153  -0.09180  -7.81790   0.10822  -0.09455  -0.04834  -0.05940  -0.08653   0.12938  -0.00166   0.08187   0.00178   0.00445
        0.92000  -0.04550  -0.09569  -0.12738  -0.17931   0.13447  -0.04449  -0.10845  -0.07321  -0.22769   0.07614   0.00683   0.07469   0.00511   0.00651
        0.96000  -0.15458  -0.28332  -0.36510  -0.29854  -0.18536  -0.07436   0.00000  -0.18867   0.02227  -0.00551  -0.04793   0.07234   0.00844   0.01069
        0.98000  -0.35946  -0.30976  -0.34730  -0.17090  -0.11107  -0.11215  -0.13303  -0.04349   0.00479  -0.10680  -0.06091   0.07884   0.01308   0.01841
        1.01000  -0.15218  -0.17020  -0.18242  -0.31652  -0.14852  -0.04360   0.07855  -0.00090   0.04556   0.10706   0.25879   0.28073   0.12410   0.01182
      </tableData>

      <tableData breakPoint="10.00000">
                -10.00     -5.00      0.00      5.00     10.00     12.50     15.00     17.50     20.00     25.00     30.00     40.00     50.00     60.00
        0.20000  -0.01819  -0.03205  -0.08433  -0.14460  -0.03845  -0.01850  -0.07722  -0.08654  -0.01604   0.01222   0.23556   0.35797   0.04938  -0.01332
        0.60000  -0.02489  -0.03945  -0.11225  -0.07971  -0.03896  -0.02325  -0.07692  -0.04272   0.04272   0.08862   0.14711  -0.01203   0.01171  -0.01152
        0.88000  -0.06992  -0.09973  -0.19576  -0.18424  -0.03124  -0.19825  -0.02723   0.02776   0.06054   0.14756   0.07624   0.05625  -0.00387   0.00317
        0.92000  -0.10247  -0.15787  -0.26561  -0.25266   0.05274  -0.04709  -0.01393  -0.02423   0.03948   0.10741   0.05477   0.05150   0.00441   0.00496
        0.96000  -0.19154  -0.27382  -0.26074  -0.15119  -0.20990  -0.33135  -0.35857  -0.25546  -0.16901   0.03048  -0.33660   0.05484   0.00982   0.01101
        0.98000  -3.24581  -0.18358  -0.30486  -0.42013  -0.30197  -0.23481  -0.25049  -0.20267  -0.35399  -0.01646  -0.07402   0.06010   0.01632   0.02646
        1.01000  -0.40799  -0.38732  -0.33736  -0.31653  -0.28157  -0.27048  -0.24703  -0.23055  -0.17516   0.12225   0.24893   0.27510   0.34539   0.29172
      </tableData>

    </table>
  </function>

  <function name="aero/CMy_rudder_35">
    <table>
      <independentVar lookup="row">velocities/mach</independentVar>
      <independentVar lookup="column">aero/alpha-deg</independentVar>
      <independentVar lookup="table">aero/beta-deg</independentVar>
      <tableData breakPoint="-10.00000">
                -10.00     -5.00      0.00      5.00     10.00     12.50     15.00     17.50     20.00     25.00     30.00     40.00     50.00     60.00
        0.20000  -0.01870  -0.03177  -0.08936  -0.13471  -0.03938  -0.01941  -0.08026  -0.08844  -0.02027   0.01525   0.23523   0.36026   0.04950  -0.01359
        0.60000  -0.02503  -0.03951  -0.10803  -0.06187  -0.03942  -0.02556  -0.07575  -0.04294   0.04517   0.09267   0.14635  -0.01507   0.01199  -0.01107
        0.88000  -0.07023  -0.09970  -0.19595  -0.18299  -0.03138  -0.19878  -0.00979   0.03038   0.06272   0.16496   0.07699   0.05654  -0.00388   0.00302
        0.92000  -0.10178  -0.15756  -0.26250  -0.25064   0.05421  -0.02695  -0.01364  -0.02271   0.04080   0.14215   0.05526   0.04979   0.00522   0.00475
        0.96000  -0.19199  -0.26960  -0.26281  -0.15811  -0.21171  -0.33227  -0.35647  -0.25330  -0.23636   0.03128  -0.32859   0.05290   0.00964   0.01084
        0.98000  -1.16289  -0.18535  -0.30483  -0.41954  -0.26743  -0.23362  -0.34339  -0.20154  -0.39210  -0.01320  -0.07397   0.06038   0.01640   0.02472
        1.01000  -0.40925  -0.38879  -0.33824  -0.31719  -0.28086  -0.27000  -0.24819  -0.23296  -0.17635   0.12286   0.24921   0.27602   0.34541   0.29329
      </tableData>

      <tableData breakPoint="-5.00000">
                -10.00     -5.00      0.00      5.00     10.00     12.50     15.00     17.50     20.00     25.00     30.00     40.00     50.00     60.00
        0.20000  -0.00910  -0.00939   0.02645   0.04398   0.01694  -0.06582  -0.05888  -0.02431   0.00226   0.02256  -0.10952   0.03176   0.04339  -0.00879
        0.60000  -0.01257  -0.01516  -0.02155  -0.22400   0.01261  -0.13817  -0.06522  -0.00085   0.01274  -0.09188  -0.18469   0.02197  -0.01534  -0.00298
        0.88000  -0.02868  -0.05116  -0.11270  -2389.02607   0.10245  -0.09385  -0.04940  -0.05977  -0.09471   0.13035  -0.00159   0.08032   0.00290   0.00506
        0.92000  -0.04544  -0.09581  -0.13041  -0.22499   0.13572  -0.04581  -0.11551  -0.06991  -0.18982   0.07664   0.00708   0.07429   0.00608   0.00640
        0.96000  -0.15698  -0.28495  -0.36193  -0.30078  -0.18244  -0.06978   0.00062  -0.16099   0.03941  -0.00516  -0.05064   0.07177   0.00830   0.01062
        0.98000  -0.36962  -0.30733  -0.35130  -0.17094  -0.11130  -0.11511  -0.13578  -0.04274   0.00163  -0.10807  -0.06209   0.07943   0.01275   0.01734
        1.01000  -0.15218  -0.17039  -0.18262  -0.31685  -0.14670  -0.04455   0.07831  -0.00107   0.04657   0.10280   0.26033   0.28086   0.12316   0.01215
      </tableData>

      <tableData breakPoint="0.00000">
                -10.00     -5.00      0.00      5.00     10.00     12.50     15.00     17.50     20.00     25.00     30.00     40.00     50.00     60.00
        0.20000  -0.00340  -0.00047  -0.00010   0.00308   0.01985  -0.00082  -0.01102  -0.00374   0.00078   0.00786   0.22728   0.00398   0.00585   0.00239
        0.60000  -0.00480  -0.00224  -0.00074  -0.09180   0.00432  -0.00206  -0.00263  -0.00495   0.03180   0.10033  -0.00651  -0.01125   0.00325   0.00277
        0.88000  -0.00825  -0.00541  -0.00273  -0.05116  -0.00538   0.00335  -0.00131  -0.00907   0.02570   0.00928   0.01099   0.01368   0.01097   0.00613
        0.92000  -0.00960  -0.00630  -0.00500   0.01759  -0.01240   0.00541   0.00016  -0.00584   0.11599   0.01144   0.01282   0.01414   0.01217   0.00975
        0.96000  -0.01175  -0.00959  -0.04490   0.02052   0.00664   0.00329   0.00076  -0.15158   0.00749   0.01462   0.01687   0.01816   0.01401   0.01119
        0.98000  -0.14421  -0.01090  -0.00885   0.05689   0.00070   0.13175   0.03591   0.00608   0.00838   0.01534   0.01749   0.02073   0.01726   0.01171
        1.01000   0.00207   0.00152   0.00192   0.00262   0.00153   0.00170   0.00173   0.00150   0.00133   0.00201   0.00159   0.00137   0.00118   0.00083
      </tableData>

      <tableData breakPoint="5.00000">
                -10.00     -5.00      0.00      5.00     10.00     12.50     15.00     17.50     20.00     25.00     30.00     40.00     50.00     60.00
        0.20000  -0.00054  -0.00014  -0.00171  -0.03530   0.00415   0.01047   0.01558  -0.01192  -0.01894   0.00085  -0.02951  -0.14153   0.00450   0.00000
        0.60000  -0.00190  -0.00214  -0.00670  -0.04802  -0.00165   0.02505   0.00439  -0.05316  -0.05618   0.01514   0.06825   0.00958   0.00227   0.00124
        0.88000  -0.01020  -0.01884  -0.08652  -0.23240   0.06097   0.09787  -0.03881  -0.07848   0.09943   0.05948  -0.00217   0.02210   0.00444   0.00508
        0.92000  -0.02029  -0.04464  -0.32308  -0.22485   0.05397  -0.04380  -0.03524  -0.03974  -0.08840  -0.07503  -0.03531   0.02866   0.00773   0.00630
        0.96000  -0.09820  -0.18077  -0.15172  -0.29103  -0.19758   0.00236  -0.10301  -0.19718  -0.05432   0.00898  -0.18232   0.05649   0.01097   0.00946
        0.98000  -0.44101  -0.25851  -0.14419  -0.61509  -0.02035  -0.19526  -0.17084  -0.18846   0.00198  -0.03324  -0.31007   0.08370   0.01431   0.01555
        1.01000  -0.13407  -0.14849  -0.16603  -0.33498  -0.17632  -0.06864   0.05050   0.01599   0.05014   0.11458   0.25643   0.26860   0.12166   0.01356
      </tableData>

      <tableData breakPoint="10.00000">
                -10.00     -5.00      0.00      5.00     10.00     12.50     15.00     17.50     20.00     25.00     30.00     40.00     50.00     60.00
        0.20000   0.00046  -0.00123  -0.00610  -0.01755  -0.00969  -0.01381  -0.01883  -0.03306  -0.04689  -0.04459   0.15266  -0.08090   0.01141  -0.00649
        0.60000  -0.00302  -0.00628  -0.01561  -0.03957  -0.02000  -0.01155  -0.03263  -0.05641  -0.07096   0.10163   0.15313   0.01943   0.00065  -0.00587
        0.88000  -0.03147  -0.05890  -0.08463  -0.13248  -0.07516  -0.08971  -0.16465  -0.10043  -0.02932   0.10445  -0.08803   0.03541  -0.00171   0.00198
        0.92000  -0.06790  -0.08707  -0.13072  -0.20371  -0.13341  -0.09656  -0.30269  -0.17225   0.06920   0.11575  -0.14114   0.03849   0.00407   0.00474
        0.96000  -0.03284  -0.13406  -0.45781  -0.16971  -0.10659  -0.21832  -0.19018  -0.03710  -0.04173   0.03284  -0.83110   0.04540   0.01023   0.00943
        0.98000  -0.48246  -0.45552  -0.31093  -0.40650  -0.38171  -0.25175  -0.14640  -0.99385  -0.26630   0.17143  -0.09466   0.05062   0.01352   0.02620
        1.01000  -0.39047  -0.37352  -0.32990  -0.31668  -0.29017  -0.27864  -0.24812  -0.22093  -0.17233   0.11299   0.24353   0.26995   0.33915   0.29608
      </tableData>

    </table>
  </function>

  <function name="aero/CMy_rudder">
    <interpolate1d>
      <property>fcs/surfaces/rudder-pos-deg</property>
      <value>-35</value> <property>aero/CMy_rudder_-35</property>
      <value>0</value> <value>0</value>
      <value>35</value> <property>aero/CMy_rudder_35</property>
    </interpolate1d>
  </function>

  <!-- slats -->
  <function name="aero/CMy_slats_27.5">
    <table>
      <independentVar lookup="row">velocities/mach</independentVar>
      <independentVar lookup="column">aero/alpha-deg</independentVar>
      <independentVar lookup="table">aero/beta-deg</independentVar>
      <tableData breakPoint="0.00000">
                -10.00     -5.00      0.00      5.00     10.00     12.50     15.00     17.50     20.00     25.00     30.00     40.00     50.00     60.00
        0.20000  -0.01145  -0.01313  -0.01328  -0.01511  -0.01003  -0.03182  -0.04048  -0.03169  -0.01998  -0.04194  -0.09546  -0.14492  -0.14748  -0.08735
        0.60000  -0.00537  -0.01636  -0.01665  -0.01824  -0.02302  -0.04603  -0.03842  -0.02392  -0.01269  -0.05387  -0.11771  -0.15668  -0.16401  -0.14575
        0.88000   0.00869  -0.02606  -0.02695  -0.02275  -0.05133  -0.04518  -0.02661  -0.01613  -0.01062  -0.07624  -0.14791  -0.17873  -0.18898  -0.22809
        0.92000   0.00566  -0.02980  -0.03084  -0.00842  -0.06117  -0.04205  -0.02642  -0.01719  -0.01233  -0.07633  -0.15255  -0.18442  -0.19724  -0.23779
        0.96000  -0.00114  -0.03563  -0.03700   0.08136  -0.06111  -0.04858  -0.03075  -0.02193  -0.01854  -0.06519  -0.15548  -0.19325  -0.20842  -0.24983
        0.98000  -0.00456  -0.04051  -0.04212   0.20887  -0.06333  -0.04545  -0.03390  -0.02784  -0.02419  -0.04976  -0.15234  -0.19999  -0.21484  -0.25794
        1.01000  -0.00652  -0.05398  -0.07481  -0.08526  -0.09780  -0.08665  -0.07930  -0.07369  -0.06943  -0.06226  -0.16154  -0.28040  -0.31673  -0.37536
      </tableData>

    </table>
  </function>

  <function name="aero/CMy_slats">
    <interpolate1d>
      <property>fcs/surfaces/slats-pos-deg</property>
      <value>0</value> <value>0</value>
      <value>27.5</value> <property>aero/CMy_slats_27.5</property>
    </interpolate1d>
  </function>

  <!-- CMZ -->
  <!-- base -->
  <function name="aero/CMz_base">
    <table>
      <independentVar lookup="row">velocities/mach</independentVar>
      <independentVar lookup="column">aero/alpha-deg</independentVar>
      <independentVar lookup="table">aero/beta-deg</independentVar>
      <tableData breakPoint="-10.00000">
                -10.00     -5.00      0.00      5.00     10.00     12.50     15.00     17.50     20.00     25.00     30.00     40.00     50.00     60.00
        0.20000   0.00475   0.00707   0.00903   0.01003   0.00875   0.00842   0.00974   0.01356   0.00910   0.00976   0.00919   0.00312   0.00014  -0.00548
        0.60000   0.00585   0.00733   0.00961   0.01069   0.01054   0.01637   0.01107   0.01633   0.01051   0.01206   0.00928   0.00423   0.00150  -0.00539
        0.88000   0.00685   0.00742   0.01060   0.01104   0.01378   0.00924   0.01439   0.01852   0.01239   0.01390   0.01377   0.00473   0.00079  -0.00370
        0.92000   0.00677   0.00745   0.01086   0.01046   0.01388   0.01632   0.01485   0.02206   0.01260   0.01603   0.01069   0.00494   0.00296  -0.00228
        0.96000   0.00650   0.00712   0.01107   0.01051   0.01352   0.01845   0.01507   0.02399   0.01184   0.02184   0.01191   0.00663   0.00579  -0.00139
        0.98000   0.00622   0.00657   0.01118   0.00939   0.00976   0.02088   0.01251   0.02610   0.00952   0.02278   0.01247   0.00761   0.00729  -0.00102
        1.01000   0.00546   0.00670   0.00942   0.01197   0.01387   0.01684   0.01225   0.01513   0.01760   0.02210   0.01302   0.00157  -0.00177   0.00359
      </tableData>

      <tableData breakPoint="-5.00000">
                -10.00     -5.00      0.00      5.00     10.00     12.50     15.00     17.50     20.00     25.00     30.00     40.00     50.00     60.00
        0.20000   0.00246   0.00364   0.00472   0.00491   0.00329   0.00818   0.00202   0.00622   0.00425   0.01005   0.00580   0.00216   0.00036  -0.00311
        0.60000   0.00322   0.00378   0.00504   0.00530   0.00420   0.01017   0.00691   0.00996   0.00118   0.00948   0.00981   0.00278   0.00121  -0.00242
        0.88000   0.00368   0.00400   0.00558   0.00531   0.00654   0.01743   0.00154   0.01310  -0.02140   0.01236   0.00441   0.00364   0.00049  -0.00256
        0.92000   0.00367   0.00396   0.00569   0.00301   0.00656   0.02408  -0.00265   0.01504  -0.02670   0.01620   0.00504   0.00381   0.00116  -0.00173
        0.96000   0.00357   0.00382   0.00582  -0.00350   0.00719   0.02368  -0.00695   0.01207  -0.04147   0.01889   0.00873   0.00472   0.00225  -0.00137
        0.98000   0.00340   0.00370   0.00588   0.00474  -0.00393   0.03366  -0.01934  -0.00127  -0.02329   0.01406   0.00327   0.00472   0.00331  -0.00133
        1.01000   0.00349   0.00397   0.00491   0.00643   0.00408   0.02225  -0.00539  -0.00134   0.02948   0.00192   0.00472  -0.00155  -0.00585  -0.00261
      </tableData>

      <tableData breakPoint="0.00000">
                -10.00     -5.00      0.00      5.00     10.00     12.50     15.00     17.50     20.00     25.00     30.00     40.00     50.00     60.00
        0.20000  -0.00000   0.00000  -0.00000  -0.00000   0.00000   0.00000   0.00024   0.00000   0.00000   0.00000   0.00000   0.00000  -0.00021   0.00000
        0.60000   0.00000  -0.00000   0.00000  -0.00000  -0.00000  -0.00000   0.00000   0.00000   0.00000   0.00000   0.00000   0.00000   0.00000   0.00015
        0.88000   0.00000  -0.00000  -0.00000  -0.00000  -0.00000   0.00000  -0.00000   0.00000   0.00000  -0.00017   0.00000   0.00000   0.00000   0.00000
        0.92000   0.00000  -0.00000  -0.00000   0.00000   0.00000   0.00000   0.00000   0.00000   0.00000   0.00000   0.00000  -0.00000   0.00000   0.00000
        0.96000  -0.00000  -0.00000  -0.00000   0.00000   0.00000   0.00000   0.00000   0.00000   0.00000   0.00000   0.00000   0.00000  -0.00012   0.00000
        0.98000  -0.00000  -0.00000  -0.00000   0.00000   0.00000   0.00000   0.00000   0.00000   0.00000  -0.00033   0.00000   0.00000   0.00000   0.00000
        1.01000   0.00099   0.00083   0.00042   0.00000  -0.00098  -0.00144  -0.00188  -0.00233  -0.00290  -0.00312  -0.00481  -0.00704  -0.00885  -0.00733
      </tableData>

      <tableData breakPoint="5.00000">
                -10.00     -5.00      0.00      5.00     10.00     12.50     15.00     17.50     20.00     25.00     30.00     40.00     50.00     60.00
        0.20000  -0.00246  -0.00364  -0.00472  -0.00498  -0.00327  -0.00819  -0.00209  -0.00636  -0.00315  -0.01001  -0.00581  -0.00213  -0.00032   0.00307
        0.60000  -0.00321  -0.00378  -0.00504  -0.00599  -0.00410  -0.01025  -0.00621  -0.01005  -0.00497  -0.00931  -0.00979  -0.00275  -0.00119   0.00252
        0.88000  -0.00368  -0.00400  -0.00558  -0.00500  -0.00646  -0.01756  -0.00144  -0.01320   0.02125  -0.01252  -0.00427  -0.00357  -0.00053   0.00251
        0.92000  -0.00369  -0.00396  -0.00569  -0.00597  -0.00657  -0.02361   0.00265  -0.01510   0.02668  -0.01607  -0.00488  -0.00374  -0.00120   0.00169
        0.96000  -0.00359  -0.00383  -0.00582   0.00514  -0.00785  -0.02393   0.00678  -0.01192   0.04172  -0.01884  -0.00850  -0.00449  -0.00227   0.00130
        0.98000  -0.00341  -0.00371  -0.00588  -0.00508   0.00413  -0.03371   0.01934   0.00139   0.02295  -0.01395  -0.00312  -0.00473  -0.00335   0.00131
        1.01000  -0.00214  -0.00354  -0.00487  -0.00666  -0.00457  -0.02312   0.00424  -0.00045  -0.03223  -0.00688  -0.01481  -0.01221  -0.01182  -0.01328
      </tableData>

      <tableData breakPoint="10.00000">
                -10.00     -5.00      0.00      5.00     10.00     12.50     15.00     17.50     20.00     25.00     30.00     40.00     50.00     60.00
        0.20000  -0.00476  -0.00705  -0.00903  -0.01007  -0.00879  -0.00837  -0.00972  -0.01342  -0.00900  -0.00964  -0.00907  -0.00308   0.00000   0.00561
        0.60000  -0.00585  -0.00733  -0.00960  -0.01079  -0.01055  -0.01634  -0.01104  -0.01625  -0.01047  -0.01206  -0.00895  -0.00420  -0.00142   0.00563
        0.88000  -0.00687  -0.00758  -0.01059  -0.01105  -0.01380  -0.00909  -0.01436  -0.01885  -0.01237  -0.01391  -0.01378  -0.00454  -0.00079   0.00363
        0.92000  -0.00679  -0.00745  -0.01086  -0.01050  -0.01390  -0.01641  -0.01529  -0.01872  -0.01259  -0.01602  -0.01031  -0.00448  -0.00300   0.00222
        0.96000  -0.00651  -0.00711  -0.01107  -0.01050  -0.01351  -0.01860  -0.01514  -0.02403  -0.01165  -0.02178  -0.01178  -0.00659  -0.00583   0.00133
        0.98000  -0.00623  -0.00656  -0.01118  -0.00932  -0.00979  -0.02105  -0.01259  -0.02598  -0.00963  -0.02267  -0.01246  -0.00760  -0.00731   0.00098
        1.01000  -0.00502  -0.00671  -0.00940  -0.01229  -0.01455  -0.01901  -0.01634  -0.02050  -0.02141  -0.02777  -0.02278  -0.01519  -0.01435  -0.01979
      </tableData>

    </table>
  </function>

  <!-- elevator -->
  <function name="aero/CMz_elevator_-24">
    <table>
      <independentVar lookup="row">velocities/mach</independentVar>
      <independentVar lookup="column">aero/alpha-deg</independentVar>
      <independentVar lookup="table">aero/beta-deg</independentVar>
      <tableData breakPoint="0.00000">
                -10.00     -5.00      0.00      5.00     10.00     12.50     15.00     17.50     20.00     25.00     30.00     40.00     50.00     60.00
        0.20000   0.00000   0.00041   0.00000   0.00000   0.00000   0.00000  -0.00024   0.00000   0.00000   0.00000   0.00052   0.00000   0.00021   0.00000
        0.60000  -0.00000  -0.00010  -0.00000   0.00000   0.00000   0.00000   0.00000   0.00000   0.00000   0.00000   0.00000   0.00000   0.00000  -0.00029
        0.88000   0.00000   0.00000   0.00000   0.00000   0.00000   0.00000   0.00000   0.00000  -0.00021   0.00017   0.00000   0.00000   0.00000   0.00000
        0.92000   0.00000   0.00000   0.00000  -0.00000   0.00000   0.00000   0.00000   0.00000   0.00000   0.00000   0.00000   0.00000   0.00000   0.00000
        0.96000   0.00000   0.00000   0.00000   0.00000   0.00000   0.00000  -0.00019   0.00000   0.00000  -0.00026  -0.00031   0.00000   0.00012   0.00000
        0.98000   0.00000   0.00000   0.00000   0.00000   0.00000   0.00000  -0.00023   0.00000   0.00000   0.00044   0.00000   0.00000   0.00000   0.00000
        1.01000   0.00016   0.00000   0.00000   0.00000   0.00000   0.00000   0.00000   0.00000   0.00000  -0.00019   0.00000   0.00000   0.00000  -0.00277
      </tableData>

    </table>
  </function>

  <function name="aero/CMz_elevator_-9.5">
    <table>
      <independentVar lookup="row">velocities/mach</independentVar>
      <independentVar lookup="column">aero/alpha-deg</independentVar>
      <independentVar lookup="table">aero/beta-deg</independentVar>
      <tableData breakPoint="0.00000">
                -10.00     -5.00      0.00      5.00     10.00     12.50     15.00     17.50     20.00     25.00     30.00     40.00     50.00     60.00
        0.20000   0.00000   0.00000   0.00000   0.00000   0.00000   0.00020  -0.00024   0.00000   0.00000   0.00000  -0.00014   0.00081   0.00021   0.00000
        0.60000   0.00000   0.00010   0.00000   0.00000   0.00000   0.00000   0.00000   0.00000  -0.00017   0.00000   0.00000   0.00000   0.00000  -0.00015
        0.88000   0.00000   0.00000   0.00000   0.00000   0.00000   0.00000   0.00000   0.00000  -0.00017   0.00017   0.00000   0.00000   0.00000   0.00000
        0.92000  -0.00000   0.00000   0.00000   0.00000   0.00000   0.00000   0.00000   0.00000  -0.00011   0.00000   0.00000   0.00000   0.00000   0.00000
        0.96000   0.00000   0.00000   0.00000   0.00000   0.00000   0.00000   0.00000   0.00000   0.00000  -0.00024   0.00000   0.00000   0.00012   0.00000
        0.98000   0.00000   0.00000   0.00000  -0.00014   0.00000   0.00000   0.00000   0.00010  -0.00056   0.00033   0.00000   0.00000   0.00000   0.00000
        1.01000   0.00093  -0.00071   0.00000  -0.00013   0.00000   0.00000   0.00000   0.00000   0.00010   0.00028   0.00048   0.00021   0.00000  -0.00106
      </tableData>

    </table>
  </function>
  <function name="aero/CMz_elevator_-3">
    <table>
      <independentVar lookup="row">velocities/mach</independentVar>
      <independentVar lookup="column">aero/alpha-deg</independentVar>
      <independentVar lookup="table">aero/beta-deg</independentVar>
      <tableData breakPoint="0.00000">
                -10.00     -5.00      0.00      5.00     10.00     12.50     15.00     17.50     20.00     25.00     30.00     40.00     50.00     60.00
        0.20000   0.00000   0.00000   0.00000   0.00394   0.00000   0.00000  -0.00024  -0.00000   0.00000   0.00000  -0.00033   0.00000  -0.00025   0.00000
        0.60000   0.00000   0.00000   0.00000   0.00017   0.00000   0.00000  -0.00000   0.00000   0.00000   0.00000   0.00014   0.00000   0.00090  -0.00015
        0.88000   0.00000   0.00000   0.00000   0.00000   0.00000   0.00000   0.00000   0.00000   0.00000  -0.00043   0.00000   0.00000   0.00000   0.00000
        0.92000   0.00000   0.00000   0.00000   0.00000  -0.00000   0.00010   0.00000   0.00000   0.00000   0.00000   0.00000   0.00000   0.00000   0.00000
        0.96000   0.00000   0.00000   0.00000   0.00000  -0.00000   0.00000   0.00000   0.00000  -0.00013   0.00041   0.00000   0.00000   0.00000  -0.00013
        0.98000   0.00000   0.00000   0.00000   0.00037   0.00000  -0.00013  -0.00012  -0.00012  -0.00018  -0.00200  -0.00015   0.00000   0.00019   0.00000
        1.01000   0.00000   0.00000  -0.00010   0.00000   0.00000   0.00000   0.00000   0.00000   0.00000  -0.00172   0.00133   0.00011   0.00000   0.00000
      </tableData>

    </table>
  </function>

  <function name="aero/CMz_elevator_1.5">
    <table>
      <independentVar lookup="row">velocities/mach</independentVar>
      <independentVar lookup="column">aero/alpha-deg</independentVar>
      <independentVar lookup="table">aero/beta-deg</independentVar>
      <tableData breakPoint="0.00000">
                -10.00     -5.00      0.00      5.00     10.00     12.50     15.00     17.50     20.00     25.00     30.00     40.00     50.00     60.00
        0.20000   0.00000   0.00000   0.00000   0.00014   0.00000   0.00000  -0.00024  -0.00000   0.00000  -0.00010   0.00000   0.00000   0.00021   0.00000
        0.60000  -0.00000   0.00000   0.00000   0.00033   0.00000   0.00000   0.00000   0.00000   0.00000   0.00000   0.00000   0.00000   0.00017  -0.00015
        0.88000  -0.00000   0.00000   0.00000   0.00047  -0.00010   0.00000   0.00000   0.00000   0.00000   0.00017  -0.00015   0.00000   0.00000   0.00000
        0.92000  -0.00000   0.00000   0.00000   0.00036  -0.00030   0.00000   0.00000   0.00000   0.00000   0.00000  -0.00091   0.00000   0.00000   0.00000
        0.96000   0.00000   0.00000   0.00000  -0.00156  -0.00022   0.00000   0.00011  -0.00000   0.00000   0.00011   0.01071   0.00000   0.00000   0.00000
        0.98000   0.00000   0.00000   0.00000  -0.00510  -0.00077   0.00000  -0.00059   0.00000   0.00000   0.00033   0.00860   0.00000   0.00000   0.00000
        1.01000   0.00000   0.00000   0.00000  -0.00115  -0.00023   0.00000  -0.00011  -0.00012  -0.00185   0.00012  -0.00015   0.00040  -0.00010  -0.00294
      </tableData>

    </table>
  </function>

  <function name="aero/CMz_elevator">
    <interpolate1d>
      <property>fcs/surfaces/elevator-pos-deg</property>
      <value>-24</value> <property>aero/CMz_elevator_-24</property>
      <value>-9.5</value> <property>aero/CMz_elevator_-9.5</property>
      <value>-3</value> <property>aero/CMz_elevator_-3</property>
      <value>0</value> <value>0</value>
      <value>1.5</value> <property>aero/CMz_elevator_1.5</property>
    </interpolate1d>
  </function>

  <!-- flaps -->
  <function name="aero/CMz_flaps_20">
    <table>
      <independentVar lookup="row">velocities/mach</independentVar>
      <independentVar lookup="column">aero/alpha-deg</independentVar>
      <independentVar lookup="table">aero/beta-deg</independentVar>
      <tableData breakPoint="0.00000">
                -10.00     -5.00      0.00      5.00     10.00     12.50     15.00     17.50     20.00     25.00     30.00     40.00     50.00     60.00
        0.20000   0.00000   0.00000   0.00119  -0.00068   0.00016   0.00000   0.00010   0.00000  -0.00000   0.00000   0.00000   0.00000   0.00021   0.00000
        0.60000  -0.00000   0.00000  -0.00021  -0.00252   0.00011  -0.00061  -0.00028   0.00000   0.00000   0.00000   0.00000  -0.00000  -0.00022  -0.00015
        0.88000   0.00000   0.00000   0.00385  -0.00973  -0.00054   0.00016   0.00000   0.00000   0.00000   0.00017   0.00031   0.00000   0.00000   0.00000
        0.92000   0.00000   0.00000   0.01358  -0.00117   0.00188   0.00035  -0.00023  -0.00000   0.00000   0.00000  -0.00044   0.00000  -0.00012   0.00000
        0.96000   0.00000   0.00000   0.06506  -0.03072  -0.00141  -0.00027   0.00000   0.00000  -0.00011  -0.00014   0.00100   0.00000  -0.00014   0.00000
        0.98000   0.00000   0.00000  -0.00269   0.11064   0.00164  -0.00017   0.00000   0.00000   0.00018   0.00033  -0.00125   0.00000  -0.00016  -0.00000
        1.01000  -0.00010   0.00000   0.00000   0.00106   0.00040   0.00000   0.00000   0.00000  -0.00014   0.00000   0.00000   0.00000   0.00015  -0.00082
      </tableData>

    </table>
  </function>

  <function name="aero/CMz_flaps_30">
    <table>
      <independentVar lookup="row">velocities/mach</independentVar>
      <independentVar lookup="column">aero/alpha-deg</independentVar>
      <independentVar lookup="table">aero/beta-deg</independentVar>
      <tableData breakPoint="0.00000">
                -10.00     -5.00      0.00      5.00     10.00     12.50     15.00     17.50     20.00     25.00     30.00     40.00     50.00     60.00
        0.20000   0.00000   0.00000  -0.00015  -0.00019   0.00000  -0.00016  -0.00024   0.00011   0.00000   0.00000  -0.00000   0.00000   0.00021   0.00000
        0.60000   0.00000   0.00000  -0.00065   0.00624   0.00000  -0.00034  -0.00027   0.00013   0.00000   0.00000   0.00000  -0.00000  -0.00018  -0.00015
        0.88000   0.00000   0.00000   0.00253  -0.00326  -0.00030   0.00061   0.00000   0.00000   0.00000   0.00017   0.00075   0.00000   0.00000   0.00000
        0.92000   0.00000   0.00000   0.00288  -0.00091  -0.00034   0.00025   0.00036   0.00000   0.00018   0.00000   0.00000   0.00000  -0.00016   0.00000
        0.96000   0.00000   0.00051   0.05205   0.05873   0.00081   0.00014   0.00000   0.00000  -0.00014  -0.00028  -0.00964   0.00000  -0.00052   0.00000
        0.98000   0.00000   0.00125  -0.00243   0.02153   0.00376  -0.00014  -0.00019   0.00000  -0.00017   0.00043  -0.00053   0.00000  -0.00026   0.00000
        1.01000   0.00000   0.00000   0.00000   0.00024   0.00052   0.00000  -0.00017   0.00000  -0.00027   0.00021   0.00000   0.00000   0.00013  -0.00084
      </tableData>

    </table>
  </function>

  <function name="aero/CMz_flaps">
    <interpolate1d>
      <property>fcs/surfaces/flaps-pos-deg</property>
      <value>0</value> <value>0</value>
      <value>20</value> <property>aero/CMz_flaps_20</property>
      <value>30</value> <property>aero/CMz_flaps_30</property>
    </interpolate1d>
  </function>

  <!-- left-flaperon -->
  <function name="aero/CMz_left-flaperon_-51">
    <table>
      <independentVar lookup="row">velocities/mach</independentVar>
      <independentVar lookup="column">aero/alpha-deg</independentVar>
      <independentVar lookup="table">aero/beta-deg</independentVar>
      <tableData breakPoint="0.00000">
                -10.00     -5.00      0.00      5.00     10.00     12.50     15.00     17.50     20.00     25.00     30.00     40.00     50.00     60.00
        0.20000   0.00406   0.00338   0.00801   0.00394   0.00547   0.00507  -0.00095  -0.00649  -0.00400  -0.01105   0.00254  -0.00424  -0.00492  -0.00374
        0.60000   0.00506   0.00460   0.01033   0.00553   0.00165   0.00403  -0.00339  -0.00572  -0.00412  -0.02127  -0.00684  -0.00522  -0.00435  -0.00374
        0.88000   0.00759   0.01010   0.02002  -0.00288  -0.01646  -0.00020  -0.01825  -0.00370  -0.01982  -0.00112  -0.01129  -0.01874  -0.00420  -0.00458
        0.92000   0.00932   0.01572   0.01254   0.00791  -0.02322  -0.01554  -0.02995  -0.02977   0.00341   0.00797  -0.01190  -0.02744  -0.00423  -0.00885
        0.96000   0.01678   0.05520   0.05774   0.04799   0.00167  -0.01871  -0.03154  -0.06560  -0.02688   0.01476  -0.01986  -0.03250  -0.00421   0.00370
        0.98000  -0.04104   0.02089  -0.05527   0.04002   0.01599  -0.01534  -0.04733  -0.03014  -0.00743   0.01982  -0.02290  -0.01782  -0.00148  -0.00890
        1.01000   0.00432  -0.00929  -0.04439   0.01926   0.01481   0.01775   0.01748   0.02441   0.04433   0.05156   0.05363  -0.02667  -0.00175  -0.00282
      </tableData>

    </table>
  </function>

  <function name="aero/CMz_left-flaperon">
    <interpolate1d>
      <property>fcs/surfaces/left-flaperon-pos-deg</property>
      <value>-51</value> <property>aero/CMz_left-flaperon_-51</property>
      <value>0</value> <value>0</value>
    </interpolate1d>
  </function>

  <!-- right-flaperon -->
  <function name="aero/CMz_right-flaperon_-51">
    <table>
      <independentVar lookup="row">velocities/mach</independentVar>
      <independentVar lookup="column">aero/alpha-deg</independentVar>
      <independentVar lookup="table">aero/beta-deg</independentVar>
      <tableData breakPoint="0.00000">
                -10.00     -5.00      0.00      5.00     10.00     12.50     15.00     17.50     20.00     25.00     30.00     40.00     50.00     60.00
        0.20000  -0.00407  -0.00336  -0.00799  -0.00491  -0.00511  -0.00494   0.00079   0.00653   0.00400   0.01086  -0.00349   0.00427   0.00538   0.00383
        0.60000  -0.00507  -0.00470  -0.01057  -0.00481  -0.00148  -0.00358   0.00328   0.00588   0.00441   0.02112   0.00656   0.00508   0.00440   0.00351
        0.88000  -0.00750  -0.01019  -0.02043   0.00039  -0.00146  -0.00075   0.01797   0.00309   0.01983   0.00292   0.01127   0.01858   0.00431   0.00461
        0.92000  -0.00933  -0.01578  -0.01175  -0.00981   0.02404   0.01574   0.03295   0.02992  -0.00345  -0.00745   0.01209   0.02887   0.00426   0.00893
        0.96000  -0.01682  -0.05519  -0.04444  -0.01945  -0.00011   0.01851   0.03162   0.06381   0.02724  -0.01476   0.01972   0.03289   0.00449  -0.00379
        0.98000   0.04070  -0.02185   0.05534  -0.03228  -0.01587   0.01377   0.04801   0.03001   0.00761  -0.01917   0.02281   0.01819   0.00156   0.00891
        1.01000  -0.00384   0.00804   0.04381  -0.01994  -0.01377  -0.01779  -0.01559  -0.02269  -0.04236  -0.05235  -0.05306   0.02708   0.00225  -0.00238
      </tableData>

    </table>
  </function>

  <function name="aero/CMz_right-flaperon">
    <interpolate1d>
      <property>fcs/surfaces/right-flaperon-pos-deg</property>
      <value>-51</value> <property>aero/CMz_right-flaperon_-51</property>
      <value>0</value> <value>0</value>
    </interpolate1d>
  </function>

  <!-- rudder -->
  <function name="aero/CMz_rudder_-35">
    <table>
      <independentVar lookup="row">velocities/mach</independentVar>
      <independentVar lookup="column">aero/alpha-deg</independentVar>
      <independentVar lookup="table">aero/beta-deg</independentVar>
      <tableData breakPoint="-10.00000">
                -10.00     -5.00      0.00      5.00     10.00     12.50     15.00     17.50     20.00     25.00     30.00     40.00     50.00     60.00
        0.20000  -0.02954  -0.02987  -0.02984  -0.02673  -0.02101  -0.00233  -0.00181  -0.00627  -0.01017  -0.00150  -0.00209  -0.02395  -0.01476  -0.01395
        0.60000  -0.03135  -0.03127  -0.03083  -0.02222  -0.00728  -0.00043   0.00625   0.00110   0.00467  -0.05506  -0.01524  -0.01858  -0.01849  -0.01690
        0.88000  -0.03154  -0.02808  -0.01593   0.00171   0.01714   0.01865   0.00581  -0.04184  -0.03727  -0.02162   0.00055  -0.01249  -0.02433  -0.02442
        0.92000  -0.02602  -0.01783   0.01395   0.00790   0.01858   0.00247  -0.03540  -0.03827  -0.02275  -0.03551  -0.00789  -0.00947  -0.02651  -0.02430
        0.96000   0.02135   0.04116   0.02010  -0.04039  -0.01917   0.01769   0.01918  -0.00550  -0.02732  -0.04153  -0.21375  -0.00272  -0.02182  -0.02238
        0.98000   0.00821  -0.00816  -0.00677   0.01266   0.02487  -0.00454  -0.00174  -0.21748   0.01822  -0.08901  -0.02287   0.00144  -0.01778  -0.02366
        1.01000  -0.04519  -0.03974  -0.03840  -0.03992  -0.04579  -0.05553  -0.04950  -0.05530  -0.05954  -0.06096  -0.02442  -0.01570  -0.03770  -0.07734
      </tableData>

      <tableData breakPoint="-5.00000">
                -10.00     -5.00      0.00      5.00     10.00     12.50     15.00     17.50     20.00     25.00     30.00     40.00     50.00     60.00
        0.20000  -0.03216  -0.03273  -0.03216  -0.02756  -0.03313  -0.03396  -0.02321  -0.02606  -0.02920  -0.02810  -0.03089   0.01415  -0.02400  -0.01737
        0.60000  -0.03444  -0.03442  -0.03316  -0.02625  -0.03133  -0.03067  -0.02226  -0.02846  -0.02719  -0.03825  -0.04649  -0.03131  -0.02848  -0.02126
        0.88000  -0.03867  -0.03589  -0.03189   0.04491   0.00278  -0.01840  -0.04013  -0.00067   0.00776  -0.02540  -0.05206  -0.03426  -0.03707  -0.02906
        0.92000  -0.03841  -0.03343  -0.01485  -0.01544   0.00374  -0.04823  -0.05058   0.01831   0.00539  -0.02362  -0.05505  -0.03293  -0.03982  -0.03082
        0.96000  -0.02801  -0.00282  -0.00648   0.05435  -0.00075  -0.03438  -0.04623   0.05782   0.09532   0.00084  -0.05883  -0.02470  -0.04350  -0.03515
        0.98000   0.01667  -0.03803  -0.02501   0.16903   0.00942   0.03754   0.04507   0.05549   0.03259  -0.01375  -0.04347  -0.01786  -0.04765  -0.03486
        1.01000  -0.06316  -0.06639  -0.06597  -0.02935  -0.01754  -0.02375  -0.02602  -0.02610  -0.06182  -0.03594  -0.01291  -0.02130  -0.05180  -0.07070
      </tableData>

      <tableData breakPoint="0.00000">
                -10.00     -5.00      0.00      5.00     10.00     12.50     15.00     17.50     20.00     25.00     30.00     40.00     50.00     60.00
        0.20000  -0.03487  -0.03795  -0.04006  -0.01559  -0.02931  -0.02999  -0.03221  -0.03159  -0.03262  -0.04271  -0.01455  -0.02902  -0.03784  -0.01920
        0.60000  -0.03785  -0.04104  -0.04432  -0.01361  -0.03270  -0.03477  -0.03412  -0.03349  -0.03646  -0.01903  -0.03729  -0.03403  -0.02870  -0.02251
        0.88000  -0.04558  -0.04943  -0.05572  -0.03047  -0.04101  -0.04112  -0.03958  -0.03819  -0.02046  -0.03992  -0.04495  -0.04164  -0.03687  -0.03183
        0.92000  -0.04833  -0.05264  -0.05962  -0.04996  -0.03505  -0.04416  -0.04391  -0.03583  -0.04864  -0.04431  -0.04754  -0.04495  -0.04021  -0.03585
        0.96000  -0.05311  -0.05922  -0.01773  -0.07321  -0.05692  -0.04811  -0.04354  -0.04372  -0.05041  -0.04983  -0.05187  -0.05032  -0.04550  -0.03822
        0.98000  -0.03514  -0.05433  -0.05198  -0.07494  -0.05381  -0.03277   0.01182  -0.05380  -0.05429  -0.05326  -0.05599  -0.05471  -0.05072  -0.04516
        1.01000  -0.06129  -0.06191  -0.06268  -0.06256  -0.06264  -0.06321  -0.06313  -0.06291  -0.06239  -0.06178  -0.06251  -0.06094  -0.05855  -0.05644
      </tableData>

      <tableData breakPoint="5.00000">
                -10.00     -5.00      0.00      5.00     10.00     12.50     15.00     17.50     20.00     25.00     30.00     40.00     50.00     60.00
        0.20000  -0.03715  -0.04454  -0.03398  -0.01178  -0.04623  -0.03977  -0.00834  -0.01401  -0.02782  -0.02876  -0.03740  -0.02196  -0.03400  -0.02112
        0.60000  -0.04019  -0.04598  -0.03075   0.01863  -0.04595  -0.02166   0.00107  -0.01663  -0.02927  -0.03273   0.00902  -0.02557  -0.03268  -0.02300
        0.88000  -0.04550  -0.04843  -0.03547  -0.08608  -0.04039   0.03440  -0.04532   0.00195  -0.03194   0.00259  -0.03784  -0.04595  -0.03814  -0.03212
        0.92000  -0.04724  -0.04788  -0.04978  -0.03434  -0.02979  -0.02456   0.01096   0.00352   0.05013  -0.00663  -0.03852  -0.04782  -0.04136  -0.03588
        0.96000  -0.04960  -0.05477  -0.03296  -0.00275  -0.04028   0.04699  -0.05517   0.07034  -0.05329   0.00075  -0.02802  -0.04825  -0.04661  -0.04068
        0.98000   0.01740   0.04930  -0.03347  -0.05511  -0.07990  -0.04947  -0.10453  -0.04189  -0.06768   0.00571  -0.02106  -0.04631  -0.04919  -0.04764
        1.01000  -0.05426  -0.04664  -0.03817  -0.04253  -0.06876  -0.05422  -0.04007  -0.01414   0.01247  -0.00968  -0.04643  -0.05675  -0.05775  -0.04192
      </tableData>

      <tableData breakPoint="10.00000">
                -10.00     -5.00      0.00      5.00     10.00     12.50     15.00     17.50     20.00     25.00     30.00     40.00     50.00     60.00
        0.20000  -0.03244  -0.03353  -0.07644  -0.03024  -0.03962  -0.04136  -0.03094   0.00166   0.00152   0.00713   0.02399   0.02638  -0.03576  -0.02743
        0.60000  -0.03364  -0.03401  -0.04399  -0.04432  -0.03861  -0.03309  -0.03037   0.00778   0.00101   0.01021   0.00500  -0.01877  -0.03972  -0.02856
        0.88000  -0.03915  -0.04194  -0.06801  -0.04381  -0.03534  -0.00959   0.00693  -0.02773  -0.03323   0.01830   0.01196  -0.03891  -0.04234  -0.03522
        0.92000  -0.04354  -0.04786  -0.08388  -0.04561  -0.02310   0.02269  -0.02933  -0.02516  -0.03101   0.02839   0.01334  -0.03948  -0.04200  -0.03765
        0.96000  -0.05096  -0.04851   0.06421   0.00711  -0.03408   0.01641   0.02659   0.01104  -0.01851   0.03930  -0.05938  -0.03824  -0.03946  -0.03870
        0.98000   0.31503  -0.04284   0.01000  -0.01730  -0.01551  -0.00757  -0.02132  -0.02059  -0.09649  -0.00925  -0.00247  -0.03455  -0.03747  -0.03955
        1.01000  -0.05451  -0.04805  -0.03785  -0.03949  -0.02588  -0.01083  -0.00880   0.00017   0.00355  -0.04243  -0.03797  -0.04600  -0.05008  -0.03757
      </tableData>

    </table>
  </function>

  <function name="aero/CMz_rudder_35">
    <table>
      <independentVar lookup="row">velocities/mach</independentVar>
      <independentVar lookup="column">aero/alpha-deg</independentVar>
      <independentVar lookup="table">aero/beta-deg</independentVar>
      <tableData breakPoint="-10.00000">
                -10.00     -5.00      0.00      5.00     10.00     12.50     15.00     17.50     20.00     25.00     30.00     40.00     50.00     60.00
        0.20000   0.03246   0.03345   0.06738   0.02825   0.03952   0.04127   0.03027  -0.00157  -0.00157  -0.00737  -0.02413  -0.02689   0.03549   0.02740
        0.60000   0.03363   0.03397   0.04312   0.04452   0.03854   0.03291   0.03051  -0.00783  -0.00118  -0.00976  -0.00521   0.01906   0.03962   0.02860
        0.88000   0.03924   0.04207   0.06733   0.04375   0.03535   0.00823  -0.00529   0.02786   0.03332  -0.02221  -0.01179   0.03868   0.04218   0.03523
        0.92000   0.04351   0.04783   0.08618   0.04555   0.02296  -0.01495   0.02977   0.02181   0.03099  -0.02011  -0.01368   0.03894   0.04201   0.03767
        0.96000   0.05082   0.04949  -0.06403  -0.00947   0.03407  -0.01886  -0.02586  -0.00878  -0.00268  -0.03942   0.05920   0.03804   0.03945   0.03872
        0.98000  -0.19132   0.04275  -0.01001   0.01664   0.00401   0.00746  -0.02980   0.01880   0.09829   0.00947   0.00231   0.03447   0.03746   0.03960
        1.01000   0.05676   0.05033   0.03971   0.03961   0.02585   0.01160   0.01100   0.00269  -0.00335   0.04151   0.03889   0.04597   0.04897   0.03371
      </tableData>

      <tableData breakPoint="-5.00000">
                -10.00     -5.00      0.00      5.00     10.00     12.50     15.00     17.50     20.00     25.00     30.00     40.00     50.00     60.00
        0.20000   0.03711   0.04435   0.03067   0.01442   0.04584   0.03944   0.00846   0.01435   0.02673   0.02842   0.03798   0.02192   0.03374   0.02121
        0.60000   0.04018   0.04592   0.03178  -0.01589   0.04585   0.02104  -0.00077   0.01672   0.03303   0.03426   0.03141   0.02558   0.03283   0.02303
        0.88000   0.04552   0.04844   0.03312   193.38758   0.04073  -0.03432   0.04524  -0.00180   0.03242  -0.00339   0.03753   0.04603   0.03830   0.03225
        0.92000   0.04728   0.04783   0.04981   0.03679   0.02964   0.02428  -0.00722  -0.00330  -0.04839   0.00616   0.03811   0.04773   0.04147   0.03585
        0.96000   0.04958   0.05483   0.03329   0.00143   0.04137  -0.04615   0.05490  -0.06783   0.05081  -0.00093   0.02742   0.04780   0.04669   0.04075
        0.98000  -0.01583  -0.04948   0.03327   0.05662   0.07887   0.05009   0.10471   0.04163   0.06851  -0.00587   0.02053   0.04613   0.04936   0.04761
        1.01000   0.05537   0.04812   0.03936   0.04255   0.06842   0.05440   0.03960   0.01323  -0.01292   0.00846   0.04790   0.05706   0.05793   0.03759
      </tableData>

      <tableData breakPoint="0.00000">
                -10.00     -5.00      0.00      5.00     10.00     12.50     15.00     17.50     20.00     25.00     30.00     40.00     50.00     60.00
        0.20000   0.03485   0.03795   0.04004   0.02643   0.02923   0.03082   0.03154   0.03152   0.03293   0.04274   0.01436   0.02915   0.03696   0.01922
        0.60000   0.03790   0.04105   0.04428   0.03848   0.03299   0.03530   0.03422   0.03437   0.04575   0.01942   0.03727   0.03420   0.02869   0.02217
        0.88000   0.04558   0.04942   0.05573   0.04295   0.04152   0.04157   0.04038   0.03815   0.02566   0.04001   0.04499   0.04165   0.03698   0.03184
        0.92000   0.04823   0.05256   0.05961   0.04915   0.03886   0.04454   0.04435   0.03664   0.04861   0.04420   0.04760   0.04498   0.04028   0.03568
        0.96000   0.05295   0.05900   0.01765   0.07074   0.05599   0.04864   0.04320   0.04267   0.05027   0.04956   0.05204   0.05033   0.04554   0.03788
        0.98000   0.01939   0.05531   0.05197   0.07319   0.05400   0.01280  -0.00966   0.05383   0.05405   0.05365   0.05621   0.05479   0.05104   0.04517
        1.01000   0.06129   0.06207   0.06257   0.06315   0.06378   0.06324   0.06307   0.06305   0.06380   0.06231   0.06252   0.06100   0.05877   0.05647
      </tableData>

      <tableData breakPoint="5.00000">
                -10.00     -5.00      0.00      5.00     10.00     12.50     15.00     17.50     20.00     25.00     30.00     40.00     50.00     60.00
        0.20000   0.03215   0.03271   0.03211   0.02602   0.03294   0.03411   0.02268   0.02632   0.02842   0.02710   0.03168  -0.01368   0.02398   0.01740
        0.60000   0.03445   0.03442   0.03309   0.02646   0.03169   0.03065   0.02137   0.02904   0.03269   0.04090   0.04719   0.03130   0.02834   0.02126
        0.88000   0.03865   0.03582   0.03158  -0.04509  -0.00290   0.01766   0.03997  -0.00612  -0.00800   0.02455   0.05224   0.03462   0.03721   0.02907
        0.92000   0.03841   0.03331   0.01424   0.02142  -0.00395   0.04785   0.06032  -0.01607  -0.00647   0.02295   0.05508   0.03346   0.03993   0.03077
        0.96000   0.02815   0.00279   0.00667  -0.04829  -0.00086   0.03422   0.05159  -0.06932  -0.09198   0.00203   0.05881   0.02480   0.04366   0.03523
        0.98000  -0.01353   0.03796   0.02503  -0.12083  -0.00996  -0.03809  -0.04554  -0.05595  -0.03249   0.01377   0.04291   0.01837   0.04783   0.03484
        1.01000   0.06428   0.06787   0.06711   0.02939   0.01728   0.02257   0.02550   0.02539   0.06135   0.03476   0.01439   0.02160   0.05187   0.06629
      </tableData>

      <tableData breakPoint="10.00000">
                -10.00     -5.00      0.00      5.00     10.00     12.50     15.00     17.50     20.00     25.00     30.00     40.00     50.00     60.00
        0.20000   0.02954   0.02988   0.02967   0.02650   0.02081   0.00240   0.00197   0.00640   0.01031   0.00141   0.00185   0.02388   0.01465   0.01387
        0.60000   0.03132   0.03126   0.03057   0.02286   0.00686   0.00049  -0.00616  -0.00067  -0.00505   0.04032   0.01559   0.01867   0.01854   0.01689
        0.88000   0.03150   0.02816   0.01532  -0.00168  -0.01717  -0.01857  -0.00584   0.04208   0.03780   0.02316   0.00018   0.01259   0.02423   0.02444
        0.92000   0.02602   0.01771  -0.01428  -0.00739  -0.01879  -0.00288   0.03364   0.03748   0.02130   0.03590   0.00775   0.00933   0.02659   0.02436
        0.96000  -0.02139  -0.04114  -0.02013   0.03840   0.01874  -0.01754  -0.01872  -0.00145   0.02779   0.04543   0.16684   0.00272   0.02207   0.02244
        0.98000  -0.00752   0.01594   0.00589  -0.01312  -0.02532   0.00314   0.00131   0.26534  -0.01764   0.08986   0.02243  -0.00150   0.01792   0.02333
        1.01000   0.04741   0.04204   0.04024   0.04007   0.04580   0.05627   0.05178   0.05821   0.05990   0.05974   0.02534   0.01567   0.03674   0.07342
      </tableData>

    </table>
  </function>

  <function name="aero/CMz_rudder">
    <interpolate1d>
      <property>fcs/surfaces/rudder-pos-deg</property>
      <value>-35</value> <property>aero/CMz_rudder_-35</property>
      <value>0</value> <value>0</value>
      <value>35</value> <property>aero/CMz_rudder_35</property>
    </interpolate1d>
  </function>

  <!-- slats -->
  <function name="aero/CMz_slats_27.5">
    <table>
      <independentVar lookup="row">velocities/mach</independentVar>
      <independentVar lookup="column">aero/alpha-deg</independentVar>
      <independentVar lookup="table">aero/beta-deg</independentVar>
      <tableData breakPoint="0.00000">
                -10.00     -5.00      0.00      5.00     10.00     12.50     15.00     17.50     20.00     25.00     30.00     40.00     50.00     60.00
        0.20000   0.00000  -0.00000   0.00000  -0.00110   0.00000   0.00000  -0.00024   0.00000   0.00000   0.00000   0.00000   0.00000   0.00021   0.00000
        0.60000  -0.00000   0.00000  -0.00000  -0.00208   0.00000   0.00015   0.00000   0.00000   0.00000   0.00000   0.00000  -0.00000   0.00000  -0.00015
        0.88000   0.00000   0.00000   0.00000  -0.00390   0.00000   0.00000   0.00000   0.00000   0.00000   0.00017   0.00000  -0.00032   0.00000   0.00000
        0.92000   0.00000   0.00000   0.00000  -0.00362  -0.00011   0.00000  -0.00000  -0.00000   0.00000   0.00000   0.00012  -0.00021   0.00000   0.00000
        0.96000   0.00000   0.00000  -0.00014   0.00969  -0.00017   0.00000   0.00025   0.00000   0.00000   0.00000   0.00088   0.00053   0.00045  -0.00011
        0.98000  -0.00075  -0.00024   0.00000  -0.03883   0.00000   0.00000   0.00000   0.00000   0.00000   0.00033  -0.00204   0.00010   0.00021   0.00000
        1.01000   0.00000   0.00000  -0.00017   0.00044   0.00056   0.00000   0.00000   0.00000   0.00071  -0.00073   0.00010   0.00000   0.00017  -0.00073
      </tableData>

    </table>
  </function>

  <function name="aero/CMz_slats">
    <interpolate1d>
      <property>fcs/surfaces/slats-pos-deg</property>
      <value>0</value> <value>0</value>
      <value>27.5</value> <property>aero/CMz_slats_27.5</property>
    </interpolate1d>
  </function>

  <function name="aero/s/cmlp">
    <description>Roll damping derivative</description>
    <product>
      <property>aero/pb</property>
      <table>
        <independentVar lookup="row">velocities/mach</independentVar>
        <independentVar lookup="column">aero/alpha-deg</independentVar>
        <independentVar lookup="table">aero/beta-deg</independentVar>
        <tableData breakPoint="-10.0">
                   -10.0        -5.0         0.001         5.0        10.0        12.5        15.0        17.5        20.0        25.0        30.0        40.0        50.0        60.0
            0.2      0.1211955   0.3788194   0.4200443   0.3956596   0.0477730   0.0231151   0.0247471   0.0295898   0.0351717   0.0422955   0.0520868   0.0674376   0.0991019   0.1493113
            0.6      0.0475179   0.3517048   0.4569166   0.4488839   0.0238088   0.0108566   0.0189273   0.0698761   0.0427888   0.0318769   0.0454059   0.0708676   0.0976221   0.1495567
            0.88     0.0244916   0.2842074   0.5178098   0.2784285   0.0112186   0.0147781   0.0200975   0.0256882   0.0317964  -0.4582348   0.0743330   0.0707785   0.0860345   0.1347227
            0.92     0.0253187   0.2834530   0.7226998   0.3417786   0.0031100   0.0271877   0.0449032   0.0182685  -0.1068312   0.0206367   0.0543371   0.0226999   0.0843207   0.1215908
            0.96     0.0104425   0.4583232   0.5668406   0.2882849   0.0245383   0.0253424   0.0136573   0.0240785   0.0425257   0.0354372   0.0636450   0.0163824   0.0779933   0.1088060
            0.98     0.0509521   0.1714428   0.8332550   0.3287508   0.0456059   1.0533440   0.0106326   0.1189333   0.0891728   0.0276339   0.0508122   0.0571866   0.0801549   0.0979869
            1.01     0.0468089   0.1013642   0.6783277   0.1184708   0.0345820   0.0202103   0.0413652   0.0470441   0.0536285   0.0835963   0.1000912   0.1397269   0.1937491   0.2448957
        </tableData>
        <tableData breakPoint="-5.0">
                   -10.0        -5.0         0.001         5.0        10.0        12.5        15.0        17.5        20.0        25.0        30.0        40.0        50.0        60.0
            0.2      0.0576208   0.3932946   0.4309976   0.4440019   0.0245638   0.0241277   0.0277664   0.0234139   0.0329961   0.0573591   0.0565000   0.0760314   0.0999300   0.1533895
            0.6      0.0316952   0.3726480   0.4802136   0.4378537   0.0121269   0.0235374   0.0299255   0.0352647   0.0328413   0.0501159   0.0661364  -0.0161595   0.0979824   0.1509395
            0.88     0.0215043   0.3062821   0.5707546   0.4097264  -0.0494436   0.0207110   0.0300188   0.0008362   0.0412097   0.0616278   0.0522894   0.0562271   0.0880922   0.1337746
            0.92     0.0201226   0.3148330   0.5728050   0.3238675   0.1474851  -0.0052540   0.0364232   0.0241318   0.0300825  -0.0025186   0.0429684   0.0654551   0.0855001   0.1244322
            0.96     0.0360721   0.2780114   0.5943004   0.1452664   0.0989974  -0.0594604   0.0967641   0.1289314   0.1605279   0.0180058   0.0409022   0.0037187   0.0791730   0.1103335
            0.98     0.1031239   0.2955190   0.6791907   0.0871743   0.0783453   0.0372958   0.0122440   0.0621485   0.0457309   0.0135411   0.0727403   0.0323790   0.0795580   0.0976578
            1.01     0.0311870   0.0583041   0.6812420   0.0407271   0.0262932   0.0264166   0.0416555   0.0392240   0.0657146   0.0812963   0.0977728   0.1411294   0.1912374   0.2883658
        </tableData>
        <tableData breakPoint="0.0">
                   -10.0        -5.0         0.001         5.0        10.0        12.5        15.0        17.5        20.0        25.0        30.0        40.0        50.0        60.0
            0.2      0.0403371   0.4107645   0.4272769   0.4019763   0.0416795   0.0212282   0.0310785   0.0356659   0.0360021   0.0500561   0.0564209   0.0715085   0.0999809   0.1551487
            0.6      0.0220780   0.4010960   0.4594347   0.3723613   0.0264123   0.0202601   0.0321666   0.0277691   0.0317650   0.0529830   0.0589423   0.0711771   0.0981266   0.1513817
            0.88     0.0190646   0.3219870   0.5223710   0.3374740  -0.0039606   0.0309203   0.0320403   0.0278780   0.0340904   0.0541547   0.0458084   0.0703995   0.0876296   0.1317351
            0.92     0.0181496   0.2847048   0.5466473   0.2393234   0.0602428  -0.0157093   0.0304949   0.0266288   0.0211472   0.0591129   0.0481768   0.0649920   0.0845032   0.1249464
            0.96     0.0172636   0.2364034   0.7739452   0.1740035  -0.0569895   0.0226891   0.0450034   0.0399168  -0.0474971   0.0587301   0.0469305   0.0650962   0.0789407   0.1139710
            0.98    -0.0642482   0.1981614   0.6457656   0.3454808  -0.0059465   0.1023877   0.0466745   0.0376958   0.1780342   0.0602230   0.0496615   0.0700803   0.0789853   0.1104197
            1.01     0.0290277   0.0334948   0.6785386   0.1513516   0.0180697   0.0861147   0.0589693   0.0779708   0.0518027   0.0133782   0.1417591   0.1194735   0.2462648   0.3400942
        </tableData>
        <tableData breakPoint="5.0">
                   -10.0        -5.0         0.001         5.0        10.0        12.5        15.0        17.5        20.0        25.0        30.0        40.0        50.0        60.0
            0.2      0.0355127   0.4174752   0.4373056   0.4004937   0.0819057   0.0232941   0.0276097   0.0237381   0.0479056   0.0591048   0.0592067   0.0669946   0.0723446   0.1521001
            0.6      0.0214001   0.4317445   0.4793478   0.3741501   0.0351001   0.0307870   0.0264048   0.0303913   0.0375969   0.0688148   0.0495615   0.0918992   0.1002458   0.1506829
            0.88     0.0215020   0.3583384   0.5078088   0.3061066   0.0810131   0.0212253   0.0296975  -0.0327590   0.0855277   0.0861911   0.0886776   0.0356925   0.0876499   0.1343000
            0.92     0.0215292   0.3132526   0.5707626   0.3051488   0.0633023   0.0121607   0.0226535   0.0335853   0.0547105   0.0490562   0.1245527   0.0700277   0.0846988   0.1260370
            0.96     0.0345334   0.1976206   0.4854155   0.2722116   1.6079943   0.1659781  -0.0123163  -0.0615227  -0.0193181   0.2110682   0.0454325   0.1505512   0.0791692   0.1102940
            0.98    -0.0284776   0.1832803   0.6084869   0.2962204   0.0403616  -0.0217829   0.0494913  -0.0305891   0.0028844   0.0780425   0.0543646   0.0963086   0.0842130   0.1013302
            1.01     0.0295609   0.0261945   0.6670328   0.0523190   0.0244525   0.0354864   0.0614572   0.0070260   0.0638912   0.0628950   0.0988716   0.1391932   0.2101042   0.2785058
        </tableData>
        <tableData breakPoint="10.0">
                   -10.0        -5.0         0.001         5.0        10.0        12.5        15.0        17.5        20.0        25.0        30.0        40.0        50.0        60.0
            0.2      0.0370767   0.4179123   0.4275214   0.4069579   0.0951182   0.0223757   0.0245923   0.0288741   0.0351151   0.0382132   0.0509387   0.0698084   0.0986912   0.1444691
            0.6      0.0248453   0.4544091   0.4603992   0.3616771   0.0315511   0.0258214   0.0126105   0.0300196   0.0334624   0.0404257   0.0321515   0.0700015   0.0961926   0.1505412
            0.88     0.0253150   0.4079521   0.5508915   0.2524357   0.0078860   0.0165839   0.0087412   0.0147128   0.0454250   0.1092275   0.0875574   0.0724590   0.0865922   0.1345197
            0.92     0.0262560   0.3486014   0.4655873   0.2722088   0.0902407   0.0281420   0.0276753  -0.0438186   0.0416451   0.0637278   0.0694705   0.0489042   0.0834716   0.1217760
            0.96     0.0251733   0.1499106   0.6013909   0.2764313   0.0210260   0.0160371   0.0258087   0.0009736   57.0499757   0.0738840   0.0452467   0.0238807   0.0792980   0.1038053
            0.98    -0.0446350   0.2651008   0.3956779   0.2292657   0.0720511  -0.0584721  -0.0157881  -0.0493575   0.0562632   0.0087378   0.0471109   0.0579347   0.0829341   0.1026315
            1.01     0.0483061   0.0445313   0.6754610   0.0244093   0.0355892   0.0236487   0.0373024   0.0517973   0.0587462   0.0870736   0.1019258   0.1396232   0.1903771   0.2786805
        </tableData>
      </table>
    </product>
  </function>

  <function name="aero/s/cmlr">
    <description>Roll moment due to yaw rate</description>
    <product>
      <property>aero/rb</property>
      <table>
        <independentVar lookup="row">velocities/mach</independentVar>
        <independentVar lookup="column">aero/alpha-deg</independentVar>
        <independentVar lookup="table">aero/beta-deg</independentVar>
        <tableData breakPoint="-10.0">
                   -10.0        -5.0         0.001         5.0        10.0        12.5        15.0        17.5        20.0        25.0        30.0        40.0        50.0        60.0
            0.2      0.1597666   0.0740425  -0.0110005  -0.0378803  -0.1585715  -0.1675607  -0.1658205  -0.1712216  -0.1490242  -0.1536483  -0.1502384  -0.1704119   0.1780188  -0.0389873
            0.6      0.1633870   0.1009370   0.0219988  -0.0854160  -0.1515796  -0.1736378  -0.1620847  -0.1661355  -0.1573105  -0.1544761  -0.1408746  -0.1529996  -0.1441359  -0.0522575
            0.88     0.1653843   0.2254570   0.0115698  -0.1748831  -0.1400280  -0.1443515  -0.1626943  -0.1539972  -0.2103784  -0.2660561  -0.2314305  -0.2153994  -0.1108882  -0.0907880
            0.92     0.1695158   0.2668714   0.1171744  -0.3809219  -0.1595537  -0.1444180  -0.1340173  -0.1441337  -0.1585553  -0.2285284  -0.1963192  -0.2622549  -0.1509249  -0.0834263
            0.96     0.1798884   0.4318364   0.1269251  -0.2971014  -0.2532403  -0.2947183  -0.2254024  -0.2229102  -0.2157203  -0.0869747  -0.1501397  -0.2759868  -0.1424207  -0.0953028
            0.98     0.2346211   0.2802075   3.2837059  -0.3947317  -0.2794850   0.6958547  -0.4318226  -0.0091328  -0.2932215  -0.3598107  -0.2520467  -0.3043886  -0.1437522  -0.1125135
            1.01     0.1666278   0.1657627   0.0122233  -0.1324051  -0.1822772  -0.2127990  -0.1925775  -0.2163872  -0.2278025  -0.2555454  -0.2300370  -0.1867142  -0.1942558  -0.2288295
        </tableData>
        <tableData breakPoint="-5.0">
                   -10.0        -5.0         0.001         5.0        10.0        12.5        15.0        17.5        20.0        25.0        30.0        40.0        50.0        60.0
            0.2      0.1303288   0.0326522  -0.0126277  -0.0565793  -0.2123771  -0.1844600  -0.1824331  -0.1954804  -0.2497268  -0.1771749  -0.1640022  -0.2111293  -0.0580536  -0.0673098
            0.6      0.1366045   0.0846369   0.0008917  -0.1029644  -0.1927289  -0.1823054  -0.1793447  -0.2416681  -0.2325932  -0.1683216  -0.1577520  -0.2340546  -0.1468311  -0.0715505
            0.88     0.1559247   0.2680662   0.0559407  -0.2383112  -0.1909225  -0.1918191  -0.1622082  -0.1662138  -0.2124936  -0.1279585  -0.1102515  -0.1184253  -0.1612681  -0.0955857
            0.92     0.1719978   0.3145792   0.0362801  -0.2883214  -0.1006005  -0.1557272  -0.1491027  -0.2182181  -0.2207605  -0.2967396  -0.2087877  -0.1979119  -0.1758458  -0.1138332
            0.96     0.2072152   0.3465338  -0.0048849  -0.2964348  -0.0984225  -0.3550841  -0.2120776   0.0179943  -0.1389859  -0.3667395  -0.1664765  -0.2234912  -0.1912806  -0.1365448
            0.98     0.1416658   0.4373005   0.0493437  -0.4904344  -0.1657052  -0.2157440  -0.2324709  -0.0593432  -0.2055445  -0.1187624  -0.1799887  -0.2393505  -0.2093538  -0.1564313
            1.01     0.1278019   0.1340614  -0.0095937  -0.2032916  -0.1426909  -0.1463943  -0.1726270  -0.1178230  -0.1813086  -0.1549699  -0.1963746  -0.1852222  -0.2364897  -0.2076551
        </tableData>
        <tableData breakPoint="0.0">
                   -10.0        -5.0         0.001         5.0        10.0        12.5        15.0        17.5        20.0        25.0        30.0        40.0        50.0        60.0
            0.2      0.1275046   0.0250913  -0.0448691  -0.0824635  -0.1799593  -0.1828943  -0.1913897  -0.1977930  -0.1986606  -0.1996301  -0.1858170  -0.1730757  -0.1248764  -0.0614326
            0.6      0.1283865   0.0621705  -0.0506805  -0.1121985  -0.1824655  -0.1869227  -0.1936533  -0.2029793  -0.1910274  -0.2014588  -0.1858095  -0.1861422  -0.1409078  -0.0655265
            0.88     0.1310455   0.2152098   0.0031414  -0.3004419  -0.1370565  -0.1645471  -0.1789132  -0.1662740  -0.1945510  -0.1703434  -0.1998743  -0.1441115  -0.1551033  -0.0907883
            0.92     0.1282258   0.2649501   0.0081097  -0.2174295  -0.1976358  -0.1174806  -0.1585237  -0.1507187  -0.1334479  -0.2265315  -0.1795042  -0.1186299  -0.1653483  -0.1054965
            0.96     0.1678655   0.3265263  -0.1478914  -0.3104591  -0.1816003  -0.1172739  -0.1014301  -0.0930076  -0.1621299  -0.1400104  -0.2086208  -0.1621079  -0.1810020  -0.1279793
            0.98     0.1731379   0.4451616   0.0788631  -0.4779751  -0.2377865  -0.2588898  -0.2511653  -0.2854059  -0.2930779  -0.2952286  -0.2126136  -0.1045317  -0.1979900  -0.1645657
            1.01     0.1033192   0.1041510  -0.0478154  -0.2040324  -0.2700645  -0.2505899  -0.2052177  -0.1735060  -0.1486981  -0.1507769  -0.1743225  -0.2579652  -0.2068295  -0.1981565
        </tableData>
        <tableData breakPoint="5.0">
                   -10.0        -5.0         0.001         5.0        10.0        12.5        15.0        17.5        20.0        25.0        30.0        40.0        50.0        60.0
            0.2      0.1263923   0.0209077  -0.0289630  -0.0302937  -0.1455773  -0.1884929  -0.1976648  -0.1900453  -0.1808293  -0.1911815  -0.2065854  -0.1309893  -0.1312037  -0.0677035
            0.6      0.1271115   0.0576089  -0.0392563  -0.1043294  -0.1737691  -0.1936411  -0.2051659  -0.1899107  -0.1854748  -0.1903766  -0.2093898  -0.0963134  -0.1373437  -0.0643204
            0.88     0.1310089   0.2302028  -0.0378839  -0.2490962  -0.0136227  -0.2075473  -0.1926364  -0.2192518  -0.1602088  -0.1416774  -0.1930755  -0.1452470  -0.1422507  -0.0916612
            0.92     0.1324853   0.2434980  -0.0130474  -0.2931159  -0.1169739  -0.1890493  -0.2270285  -0.1735492  -0.1142317  -0.1215433  -0.1503821  -0.1339865  -0.1558012  -0.1489379
            0.96     0.1548624   0.2901746   0.0004035  -0.3590468  -0.1052636  -0.0791767  -0.2065554  -0.3326799  -0.2527224  -0.0582506  -0.1530259  -0.1357614  -0.1607709  -0.1101251
            0.98     0.1229329   0.3734911   0.0222079  -0.2957524  -0.1841561  -0.1968911  -0.0734363  -0.0974789  -0.3124413  -0.2131219  -0.1884655  -0.0685277  -0.1772314  -0.1865776
            1.01     0.1050121   0.1031359  -0.0506675  -0.3074108  -0.2805949  -0.1252750  -0.1488649  -0.1983774  -0.1667434  -0.2238353  -0.1723828  -0.2970704  -0.1369125  -0.1776088
        </tableData>
        <tableData breakPoint="10.0">
                   -10.0        -5.0         0.001         5.0        10.0        12.5        15.0        17.5        20.0        25.0        30.0        40.0        50.0        60.0
            0.2      0.1254951   0.0328764   0.0442767  -0.0588925  -0.1933048  -0.1905763  -0.1868921  -0.1798476  -0.1843504  -0.1819104  -0.1912144  -0.1235648  -0.1106688  -0.0670367
            0.6      0.1330486   0.0815610  -0.0016170  -0.1187118  -0.1789947  -0.1901315  -0.1780705  -0.1859772  -0.2255830  -0.1642481  -0.1627453  -0.1732283  -0.1456855  -0.0693018
            0.88     0.1543921   0.3141272   0.0202961  -0.3543590  -0.2455091  -0.1836047  -0.2025661  -0.1889025  -0.1586128  -0.1648883  -0.0891972  -0.1717150  -0.1505340  -0.0981684
            0.92     0.1648054   0.3380402  -0.0261268  -0.3119927  -0.2169540  -0.1728809  -0.1562477  -0.2223877  -0.2058305  -0.0940397  -0.1361615  -0.0639495  -0.1716232  -0.1067118
            0.96     0.1898811   0.2877482  -0.0012750  -0.1509857  -0.1257723  -0.0858973  -0.1733063  -0.1541424  -1.7901587  -0.2061015  -0.1914685  -0.1543879  -0.1901754  -0.1307589
            0.98     0.0200121   0.5377291   1.8396840  -0.4340507  -0.2613943  -0.3358130  -0.1768400  -0.1292003  -0.2103530  -0.1233746  -0.2474369  -0.1780348  -0.2109869  -0.1613545
            1.01     0.1299693   0.1417336   0.0018778  -0.1730112  -0.1265461  -0.1883141  -0.1809722  -0.2063199  -0.1989602  -0.1902897  -0.1896875  -0.1888230  -0.2272607  -0.1831847
        </tableData>
      </table>
    </product>
  </function>

  <function name="aero/s/cmmq">
    <description>Pitch damping derivative</description>
    <product>
      <property>aero/qb</property>
      <table>
        <independentVar lookup="row">velocities/mach</independentVar>
        <independentVar lookup="column">aero/alpha-deg</independentVar>
        <independentVar lookup="table">aero/beta-deg</independentVar>
        <tableData breakPoint="-10.0">
                   -10.0        -5.0         0.001         5.0        10.0        12.5        15.0        17.5        20.0        25.0        30.0        40.0        50.0        60.0
            0.2     -9.2352676  -10.1286753  -10.1518895  -10.6167989  -6.8773289  -6.8969016  -2.3897314  -1.0218174  -1.0107520  -1.1109171  -1.2087074  -1.4191674  -2.0943267  -3.2841094
            0.6     -10.3070574  -11.2567012  -11.1947260  -17.8384922  -6.6775263  -7.1155073  -1.6882998  -0.9584275  -1.0690144  -1.2267210  -1.3461174  -1.6153668  -2.2333850  -3.6817407
            0.88    -12.7599656  -13.5851205  -13.6207341  -13.8149944  -9.2965184  -4.6855851  -1.9474374  -1.3991183  -1.4609918  -1.7390190  -1.9239181  -2.3779710  -3.0909708  -4.4590625
            0.92    -13.5441612  -14.1739543  -14.3929236  -14.7021764  -9.5002253  -4.7010140  -2.3383773  -1.7224555  -1.6970391  -1.9359269  -2.1734837  -2.6865180  -3.4838516  -4.8520218
            0.96    -14.8753973  -15.0413521  -15.6040635  -13.9941477  -8.4741847  -5.6553000  -3.2444811  -2.2906596  -2.0770860  -2.3367487  -2.8283364  -2.0582674  -0.7321601  -0.0577190
            0.98    -18.9102849  -16.1899710  -16.7364656  -5.8798125  -9.5416971  -6.7951493  -3.9989138  -2.7939617  -0.8041149   0.1709518  -0.0818651  -3.6054824  -12.5520552  -24.4064968
            1.01    -18.2039186  -19.6601914  -21.4818816  -19.7136999  -14.1575209  -12.0590544  -9.8039855  -7.2890383  -4.4744787  -2.5138436  -2.8962776  -3.6796070  -4.5956703  -5.8184849
        </tableData>
      </table>
    </product>
  </function>

  <!-- old: -->
  <!-- <function name="aero/s/cmmq"> -->
  <!--   <description>Pitch damping derivative</description> -->
  <!--   <product> -->
  <!--     <property>aero/qb</property> -->
  <!--     <table> -->
  <!--       <independentVar lookup="row">velocities/mach</independentVar> -->
  <!--       <independentVar lookup="column">aero/alpha-deg</independentVar> -->
  <!--       <independentVar lookup="table">aero/beta-deg</independentVar> -->
  <!--       <tableData breakPoint="-10.0"> -->
  <!--                  -10.0         0.001        10.0        20.0        30.0        40.0        50.0        -->
  <!--           0.2     -10.6580144  -10.7870423  -9.0116075   3.6391795  -1.6633672  -1.9217559  -2.7016680 -->
  <!--           0.6     -11.6829229  -12.0215527  -9.9762437  -2.4459259  -1.3203895  -2.1717686  -2.8677000 -->
  <!--           0.88    -14.6785339  -15.0304235  -15.1405737  -1.7757822  -1.3509054  -1.4898277  -2.2941742 -->
  <!--           0.92    -15.0855373  -16.0267351  -15.0207606  -1.9740174  -1.1572158  -0.7517379  -0.4682852 -->
  <!--           0.96    -17.9077966  -17.5771385  -14.4280737  -1.9371961   6.7504513   18.0005258   21.8022349 -->
  <!--           0.98    -22.5458815  -19.0171486  -14.4311925   3.0645654   7.6649706   8.0135798   2.2581604 -->
  <!--           1.01    -22.0869222  -24.3379856  -20.3008803  -9.5528184  -2.0927506  -1.8166198  -1.0716747 -->
  <!--       </tableData> -->
  <!--     </table> -->
  <!--   </product> -->
  <!-- </function> -->

  <function name="aero/s/cmma">
    <description>Pitch moment alpha dot</description>
    <product>
      <property>aero/alphadot-rad_sec</property>
      <table>
        <independentVar lookup="row">velocities/mach</independentVar>
        <independentVar lookup="column">aero/alpha-deg</independentVar>
        <independentVar lookup="table">aero/beta-deg</independentVar>
        <tableData breakPoint="-10.0">
                   -10.0        -5.0         0.001         5.0        10.0        12.5        15.0        17.5        20.0        25.0        30.0        40.0        50.0        60.0
            0.2     -0.4988922  -0.8125856  -0.7620743  -0.8466699   0.0158722  -2.1218393  -0.3172158   0.3163450   0.3296600   0.2082378   0.0705377  -0.1468594  -0.3854247  -0.8258262
            0.6     -0.6112664  -0.9301127  -0.8198338  -0.6524893  -0.2833739  -1.4951651   0.0197506   0.4006582   0.3304681   0.2010167   0.0472297  -0.1748285  -0.4402219  -0.8332655
            0.88    -0.7067354  -0.8732162  -0.9062312  -0.4343279  -0.5391675  -0.8822567   0.0916544   0.3124164   0.2537304   0.0754582  -0.0623082  -0.2746944  -0.5371133  -1.0641504
            0.92    -0.7398001  -0.7083710  -0.9214214  -0.3995938  -1.8711012  -0.5804431   0.0345359   0.2410022   0.2066171   0.0415651  -0.1022869  -0.3722567  -0.6182492  -1.1056128
            0.96    -0.6744542  -0.3789742  -0.9381075   1.6901419  -0.6317211  -0.5481341  -0.0873742   0.2001631   0.0253291  -0.0765354  -0.2069572  -0.3848148  -0.6159409  -0.9921993
            0.98    -0.8053282  -0.1456927  -0.9517163   11.5120987  -0.8193881  -0.6782491  -0.1595946  -0.3532239  -0.1472699  -0.2045398  -0.3452664  -0.4899408  -0.6559166  -1.0645549
            1.01    -0.6436589  -0.2210877  -1.5329141  -0.2478759  -0.3508918  -0.4774933  -0.6275801  -0.8035056  -0.8231363   0.0725927  -0.0517100  -0.3954436  -0.7409935  -1.4907978
        </tableData>
      </table>
    </product>
  </function>

  <!-- old: -->
    <!-- <function name="aero/s/cmma"> -->
    <!-- <description>Pitch moment alpha dot</description> -->
    <!-- <product> -->
    <!--   <property>aero/alphadot-rad_sec</property> -->
    <!--   <table> -->
    <!--     <independentVar lookup="row">velocities/mach</independentVar> -->
    <!--     <independentVar lookup="column">aero/alpha-deg</independentVar> -->
    <!--     <independentVar lookup="table">aero/beta-deg</independentVar> -->
    <!--     <tableData breakPoint="-10.0"> -->
    <!--                -10.0         0.001        10.0        20.0        30.0        40.0        50.0        -->
    <!--         0.2     -1.0205348  -0.8877088  -0.0082635  -0.5367799  -0.4310412  -0.3458569  -0.3779460 -->
    <!--         0.6     -0.8273627  -0.9318883  -0.0831141  -1.8697130   0.3045179  -0.7134865   0.0737861 -->
    <!--         0.88    -0.7892155  -1.1563676  -0.5947905   0.0833025   0.0099980  -0.2809107  -0.6260390 -->
    <!--         0.92    -1.6475803  -1.0961426  -1.3804574  -0.0443028  -0.0404680  -0.3392891  -0.6135152 -->
    <!--         0.96    -0.9152553  -1.1649082  -0.4582710  -0.3552542  -0.2775066  -0.3549908  -0.7266719 -->
    <!--         0.98    -1.0468575  -1.2343866  -0.4763651  -0.4452555  -0.2457554  -0.3596131  -0.6423850 -->
    <!--         1.01    -0.8698276  -1.7542772  -0.4806433  -1.1713771  -0.0305774  -0.2042832  -0.2812515 -->
    <!--     </tableData> -->
    <!--   </table> -->
    <!-- </product> -->
    <!-- </function> -->

  <function name="aero/s/cmnp">
    <description>Yaw moment due to roll rate</description>
    <product>
      <property>aero/pb</property>
      <table>
        <independentVar lookup="row">velocities/mach</independentVar>
        <independentVar lookup="column">aero/alpha-deg</independentVar>
        <independentVar lookup="table">aero/beta-deg</independentVar>
        <tableData breakPoint="-10.0">
                   -10.0        -5.0         0.001         5.0        10.0        12.5        15.0        17.5        20.0        25.0        30.0        40.0        50.0        60.0
            0.2      0.0661593   0.0345560   0.1059048   0.3242128   0.0707153   0.0925429   0.0701306   0.0831860  -0.0207457  -0.0101186  -0.1884143   0.3719371   1.7076963   0.0708890
            0.6      0.0799748  -0.0203525  -0.2344805  -0.0100825   0.0322565   0.1155741   0.0447078   0.0689197   0.0773730   0.0233568  -0.3277599  -0.0493983  -0.0523699   0.0768429
            0.88     0.0949470   0.0427577   0.0180606   0.1944169  -0.0121868   0.0147161   0.1129255  -0.0393830   0.4181021   0.0146369   0.2120321   0.3308214   0.0400423   0.0154729
            0.92    -0.0188722  -0.1790839  -0.3071658   0.6926788   0.2417268  -0.2254639   0.4658741   0.5110459   0.4569211   0.4434708   0.1540577   0.2162154   0.0796724   0.0721181
            0.96    -0.2924974   0.5963809   0.0381461  -0.5873594   0.0998360   1.4336302   0.6169927   0.4048936  -0.9048478  -0.1840423  -0.0706473  -0.2175830  -0.0058219   0.0152087
            0.98     0.7971990   0.1144078   3.6236092   4.2379900  -1.7535618  -17.7765932  -0.8565455  -0.2475582   1.2785673   3.0332736  -0.7003857   0.4581467  -0.0969621  -0.0311396
            1.01     0.1698412   0.1889812   0.2265641   0.1075186   0.2202979   0.3577278   0.3225520   0.3610917   0.4517544   0.7103918   0.4359078   0.1358511   0.1588335   0.5113985
        </tableData>
        <tableData breakPoint="-5.0">
                   -10.0        -5.0         0.001         5.0        10.0        12.5        15.0        17.5        20.0        25.0        30.0        40.0        50.0        60.0
            0.2      0.1995487   0.2657529   0.0780790   0.1673627   0.3039509   0.1823968   0.1564522   0.2269421   0.5711533   0.0287941   0.1464055   0.1847578  -0.0606765   0.1074492
            0.6      0.1976666   0.1976971  -0.0800293   0.2868394   0.3019196   0.1592818   0.1217645   0.2124141   0.5679579   0.0234786   0.0963674   0.4597014   0.2179343   0.1209980
            0.88     0.1932118   0.0447357   0.1101222  -0.0368715  -0.0515108   0.1917738   0.0975106   0.2390220   0.7596858  -0.1827113  -0.2164422   0.1554800   0.2683595   0.1750964
            0.92     0.1330197  -0.1105211  -0.1291862   0.3320634   0.5786597   0.3009346   0.2200973   0.6434293   0.1568005   0.5985383  -0.9943810   0.3039014   0.2844224   0.2232500
            0.96    -0.2665528   0.1209255   0.3142461   0.3759650  -0.4041647   1.2863364   1.1265522  -3.2763457  -0.4681224   2.0368967   0.0516394   0.1977649   0.3333683   0.2543103
            0.98    -0.1571853   0.0902578   0.0505369   0.3987478   0.4576524   2.8577020  -1.0031849  -1.2742753   0.9914519   0.2945183   0.2818990   0.1355663   0.3361358   0.2357623
            1.01     0.3101374   0.3380637   0.3691791   0.1345486  -0.1159130  -0.1275750   0.0271100  -0.1723965   0.0172573   0.0842473   0.1947130   0.1006827   0.4406780   0.3341458
        </tableData>
        <tableData breakPoint="0.0">
                   -10.0        -5.0         0.001         5.0        10.0        12.5        15.0        17.5        20.0        25.0        30.0        40.0        50.0        60.0
            0.2      0.2147733   0.2826853   0.4575873   0.2084586   0.2271077   0.2511801   0.3099303   0.2775036   0.2344234   0.2042404   0.0908862   0.0435645   0.0189483   0.0318156
            0.6      0.2347135   0.3170150   0.5505092   0.4177761   0.3027816   0.3275124   0.3510389   0.3388924  -0.0438768   0.0571602   0.1452769  -0.0369465   0.1607510   0.0531687
            0.88     0.3214028   0.4814986   0.5834242   0.1844651   0.1959040   0.4277278   0.4081151   0.0099699   0.3381937   0.1218893   0.2201982  -0.1293169   0.1878397   0.1130857
            0.92     0.3987057   0.4885745   0.5564720  -0.1679055   0.2873647   0.0361776   0.3437631   0.2409746  -0.2254073   0.2662928   0.1247660  -0.2669489   0.2196447   0.1453866
            0.96     0.4354236   0.5247882   0.2592041  -0.1279850  -0.0022998   0.1925422  -0.3075523  -0.8655409   0.8377314   0.0611231   0.1457654  -0.0666155   0.3074308   0.2061228
            0.98     0.2628145   0.3270199  -0.3410079   0.4621878   0.3507253   0.7400924   0.7309094   0.8328403   0.7971647   0.4745559   0.1607003  -0.1917086   0.3465959   0.2846407
            1.01     0.0718718  -0.0266968  -0.0827172   0.3945294   0.4393891   0.3968505   0.1639168   0.0884790   0.0295973  -0.0721340   0.2451019   0.6214770   0.3606775   0.2216933
        </tableData>
        <tableData breakPoint="5.0">
                   -10.0        -5.0         0.001         5.0        10.0        12.5        15.0        17.5        20.0        25.0        30.0        40.0        50.0        60.0
            0.2      0.2237781   0.3042211   0.2668382   0.0919940  -0.0460681   0.2877360   0.3555572   0.2808276   0.0079584   0.0955925   0.2091903  -0.0566392   0.0841076   0.0520279
            0.6      0.2455268   0.3384829   0.4174082   0.2730662   0.2942363   0.3908470   0.4210064   0.0841790  -0.0411450   0.0125022   0.1102260  -0.2265917   0.1249936   0.0269911
            0.88     0.3365321   0.5135295   0.5952510   0.4285190   1.0161601   0.6693101   0.4477382   0.4384490   0.0155967  -0.2189107   0.2179065  -0.1074077   0.0975937   0.1069932
            0.92     0.4278154   0.6447851   0.6610454   0.0311750  -0.5369801   0.4966820   0.5148614   0.1638983  -0.5539925  -0.4052733  -0.0162852  -0.2479885   0.1342920   0.4332194
            0.96     0.7547134   1.0909183   0.0883230   0.4575744   0.0872107  -0.4237266   0.8944610   0.3756644   0.7757637  -0.6757182  -0.0033580  -0.1828653   0.1466758   0.0559526
            0.98     0.6931358   0.1781939   0.4040863  -0.4397087  -0.2526383  -1.3205353   2.7370737   0.4289625   2.1274271   0.0687409   0.1262664   0.1533868   0.1855101   0.3592600
            1.01     0.0486162  -0.0394186  -0.0209399   0.5223586   1.1715497   0.6222274   0.2534798   0.4192018   0.1927152   0.3429097   0.2716538   0.8080376  -0.1791762  -0.0023235
        </tableData>
        <tableData breakPoint="10.0">
                   -10.0        -5.0         0.001         5.0        10.0        12.5        15.0        17.5        20.0        25.0        30.0        40.0        50.0        60.0
            0.2      0.2068091   0.2420282  -0.2660746  -0.0046303   0.5401944   0.5827010   0.1744593   0.1104609   0.1495791   0.0546764   0.2237641  -0.1510918   0.1027548   0.0739434
            0.6      0.2007823   0.1734620   0.3135702   0.5659120   0.7014389   0.1714520   0.1193283   0.1513291   0.6115619   0.0706100   0.2827176   0.1261407   0.1965033   0.0858059
            0.88     0.2068945   0.1479156  -0.0691183   0.2221210   0.9202691   0.1309920   0.3231624   0.2715966  -0.0665754   0.5269330  -0.1221775   0.0749340   0.2600852   0.1348997
            0.92     0.2503058   0.2026851   0.2704079  -0.4883704   0.3865867   0.3043794  -0.4872172  -0.2827914   0.2849917  -0.4823751  -0.1384228  -0.1376899   0.2806241   0.1938236
            0.96     0.1584597  -0.6511023  -0.4078762   0.1682419   0.6163240  -0.5159968  -0.2899079  -0.3053686   7.3733490   0.3070052  -0.1621077   1.0254607   0.3762641   0.2529429
            0.98     0.2684565  -2.2077315  -0.4310439  -0.9111214   1.9480980   1.7122129  -0.1894661  -2.3212015   0.3754601  -0.1775379   0.2436034   0.2909506   0.4079142   0.2771144
            1.01     0.3183234   0.3193859   0.3379500   0.1414568  -0.1026570  -0.1034295   0.0946093   0.1571698   0.0911997   0.1596160   0.2007213   0.1526390   0.5501692   0.2723839
        </tableData>
      </table>
    </product>
  </function>

  <function name="aero/s/cmnr">
    <description>Yaw damping derivative</description>
    <product>
      <property>aero/rb</property>
      <table>
        <independentVar lookup="row">velocities/mach</independentVar>
        <independentVar lookup="column">aero/alpha-deg</independentVar>
        <independentVar lookup="table">aero/beta-deg</independentVar>
        <tableData breakPoint="-10.0">
                   -10.0        -5.0         0.001         5.0        10.0        12.5        15.0        17.5        20.0        25.0        30.0        40.0        50.0        60.0
            0.2     -0.0826150  -0.0900115   0.0183647   0.2485381  -0.0089963   0.0762436   0.0613466   0.0557525   0.0548831   0.0612943   0.0429552   0.0711042  -0.0250101   0.0586139
            0.6     -0.0725021  -0.0872079   0.0089086  -0.1394775   0.0326993   0.1012527   0.0850077  -0.1967260  -0.1091264   0.0738667   0.0389308   0.0470517   0.0571722   0.0569923
            0.88    -0.0602014  -0.0518462   0.0793232  -0.7323135   0.0550359   0.0958469   0.0906165   0.0932490   0.1104263  -1.3461635  -0.0724754   0.0513237   0.0713102   0.0705551
            0.92    -0.0411098  -0.0308144  -0.8868847   1.0947279   0.2686893  -0.0058418   0.0745474   0.1497445  -1.4361055   0.1832237   0.0912810   0.1481062   0.0714491   0.0819390
            0.96     0.2542291  -0.2465647   0.0440662   0.0041673  -0.1251739   0.0430489   0.1032446  -0.1705375  -1.9134150   0.1248341  -0.0152147  -0.3499242   0.0890142   0.0895452
            0.98     1.4224923   0.2677977  -1.9045206  -0.1811652  -2.3206233  -20.1550502   0.1470066   1.9969756  -0.5553778   0.1290461  -0.0207304   0.0072462   0.0871274   0.1084948
            1.01    -0.0435747  -0.0323331  -0.0262604  -0.1421776  -0.0039828   0.0469886  -0.0092218  -0.0213085   0.0032658  -0.0331675  -0.0259443   0.0008010   0.0137410   0.1711464
        </tableData>
        <tableData breakPoint="-5.0">
                   -10.0        -5.0         0.001         5.0        10.0        12.5        15.0        17.5        20.0        25.0        30.0        40.0        50.0        60.0
            0.2     -0.0643868  -0.0512037  -0.0248445  -0.0246542   0.0532931   0.0781013   0.0624238   0.0841932   0.0562061   0.0470701   0.0633327   0.0597417   0.0009665   0.0533016
            0.6     -0.0586262  -0.0463873  -0.1880580   0.3174346   0.1647277   0.0796018   0.0063926   0.0350588   0.0276008  -0.0009601  -0.1971333   0.4652788   0.0565771   0.0612779
            0.88    -0.0429142  -0.0308119   0.0837359  -0.5356233  -0.4631780   0.0538729   0.0564128   0.4913211   0.0662384   0.1183867  -0.0582869   0.1791238   0.0770856   0.0764808
            0.92    -0.0260160  -0.0625372  -0.4654244   0.1685512   0.4050383   0.0847827   0.3307832   0.1223957   0.0847841   0.3549279   0.2084565   0.0810691   0.0833119   0.0855978
            0.96    -0.0275585  -0.0151609   0.1359495  -0.0562517  -0.3520655   0.1515705   0.3099974   0.5109610  -1.4061786   0.4996607   0.2378353   0.2109141   0.0938840   0.1044231
            0.98     2.0995065  -0.1596425  -0.1994118   0.3338613  -0.3142282   2.0109125  -1.3423221  -0.2750412   0.0264615   0.2000044   0.1305012  -0.0613835   0.1170566   0.1375946
            1.01    -0.0479181  -0.0887680  -0.0702370  -0.0726559   0.0290906  -0.1098134  -0.0021051   0.0882120  -0.0459352   0.0083363  -0.0007779   0.0037914   0.0675558   0.0602981
        </tableData>
        <tableData breakPoint="0.0">
                   -10.0        -5.0         0.001         5.0        10.0        12.5        15.0        17.5        20.0        25.0        30.0        40.0        50.0        60.0
            0.2     -0.0562090  -0.0545163   0.0432843   0.0814953   0.0508916   0.0597063   0.0663878   0.0373278   0.0541646   0.0289482   0.0383672   0.0455702   0.0570396   0.0527479
            0.6     -0.0793134  -0.0459264   0.0788538   0.2614643   0.0499701   0.0888370   0.0335458   0.0875250   0.0716589   0.0288700   0.0272404   0.0510994   0.0599805   0.0641074
            0.88    -0.0220488   0.0282242   0.2529440  -0.1074684   0.1512560  -0.1808264   0.0520263   0.0779565   0.0904242   0.0471816   0.0875120   0.0476811   0.0814240   0.0861382
            0.92    -0.0033666   0.0997246   0.2773363   0.3969703  -0.4419930   0.4615167   0.0684693   0.0994051  -0.0521658  -0.1116065   0.0756962   0.0743828   0.0893167   0.0947491
            0.96     0.1468935   0.4355015   0.7874286   0.4749355   0.0294967   0.1172005  -0.0171267  -0.0057292   0.5621023  -0.1240814   0.0911289   0.0807201   0.1005094   0.0886525
            0.98     0.1859474  -0.5628250  -0.4856525   0.0318948  -0.1018170  -0.0964595   0.0635260   0.0641818  -0.6512915  -0.0249841   0.0999660   0.0833093   0.1141687   0.1527214
            1.01    -0.0291901  -0.0897722  -0.3178167  -0.4908207  -0.4239858   0.0119118  -0.0748221   0.0349830   0.1086600   0.3851398  -0.2167576   0.0960960  -0.3205912  -0.2793869
        </tableData>
        <tableData breakPoint="5.0">
                   -10.0        -5.0         0.001         5.0        10.0        12.5        15.0        17.5        20.0        25.0        30.0        40.0        50.0        60.0
            0.2     -0.0600199  -0.0509898  -0.1083099  -0.1979507  -0.1963448   0.0906058   0.0754178   0.0941693  -0.0442385   0.0595546  -0.0357670   0.0880357   0.3079111   0.0553260
            0.6     -0.0555071  -0.0505473  -0.1691516  -0.0439202   0.0286824   0.0407187   0.0375594  -0.0226872  -0.0247032  -0.2597478   0.0664527   0.0433836   0.0365310   0.0575825
            0.88    -0.0430886  -0.0090578  -0.0479726   0.5392646   1.2553367   0.0613214   0.0605747   0.4141220  -0.5217161  -0.3113316  -0.1147308   0.2285916   0.0786716   0.0776823
            0.92    -0.0261791  -0.0195044   0.0189090  -0.0659928  -0.1483060   0.0781400  -0.0094606   0.0587372  -0.0681192   0.0696895  -0.2742916   0.0667393   0.0891892   0.0816119
            0.96    -0.0233622  -0.0714254   0.2687481   0.0940025  -4.2990713  -1.7386606  -0.0303646  -0.4653877   1.3071406  -0.6298705  -0.0381471  -0.1616120   0.1018239   0.1059486
            0.98     0.2529490  -0.1129307   0.1910653  -0.9701684  -0.4167987  -1.1835035   3.0770415   1.2771795  -0.0277348  -0.1515612   0.1382649   0.4800559   0.1115669   0.1308382
            1.01    -0.0515636  -0.0749570  -0.1005777   0.0313307  -0.0009289  -0.1310041  -0.0451295   0.1370515  -0.0489480   0.0647017  -0.0052329   0.0123799   0.0480223   0.0998598
        </tableData>
        <tableData breakPoint="10.0">
                   -10.0        -5.0         0.001         5.0        10.0        12.5        15.0        17.5        20.0        25.0        30.0        40.0        50.0        60.0
            0.2     -0.0673463  -0.0878952  -0.1418516  -0.1240927   0.0801252   0.0708258   0.0611110   0.0588276   0.0511195   0.0826356   0.0565456   0.0188002   0.0317442   0.0504389
            0.6     -0.0714404  -0.0974317   0.1404973   0.2065578   0.0657724   0.0670356   0.1390259   0.0848500   0.0426213   0.0806915   0.1128735   0.0536638   0.0429424   0.0654070
            0.88    -0.0638508  -0.0739581  -0.0881385  -0.2311107   0.1014439   0.0630452   0.1523972   0.0222286   0.1300585   0.4672613  -0.0176938   0.0334138   0.0711120   0.0708790
            0.92    -0.0440881  -0.0450366   0.0782507  -0.7524235   0.3803708   0.0052190   0.0001510   0.4893055   0.0920269  -0.0081697   0.2528856   0.0952337   0.0674738   0.0776167
            0.96    -0.0591704  -0.5584138   0.0190982   0.2819213  -0.1320746   0.1144088   0.0317004   0.0097037  -386.7151833   0.0989036   0.0789742   1.0546278   0.0907575   0.1349297
            0.98    -0.7213396  -0.5519282  -4.4112561  -0.5520818   2.5682398   1.7184945   0.7285998  -0.3743499  -0.0683762   0.1221382   0.0248781   0.2636695   0.1047276   0.1165288
            1.01    -0.0470112  -0.0600654  -0.0321962   0.1833357  -0.0131627  -0.0096245  -0.0044517  -0.0332578  -0.0267976  -0.0357130  -0.0309161  -0.0029423   0.0447783   0.0820560
        </tableData>
      </table>
    </product>
  </function>

  <function name="aero/s/cfyp">
    <description>Side force due to roll rate</description>
    <product>
      <property>aero/pb</property>
      <table>
        <independentVar lookup="row">velocities/mach</independentVar>
        <independentVar lookup="column">aero/alpha-deg</independentVar>
        <independentVar lookup="table">aero/beta-deg</independentVar>
        <tableData breakPoint="-10.0">
                   -10.0        -5.0         0.001         5.0        10.0        12.5        15.0        17.5        20.0        25.0        30.0        40.0        50.0        60.0
            0.2      0.0271960  -0.0130097   0.0757186   0.2512195  -0.1367282   0.0153695  -0.0374323  -0.0433721  -0.0388621  -0.0459482  -0.0857970  -0.0321998  -0.3291240   0.0662648
            0.6      0.0184019   6.65e-050   0.0691360  -0.3775601   0.0009373  -0.0022198   0.0292229  -0.6294172  -0.2694798  -0.0231704  -0.0399274  -0.0804113  -0.0398141   0.0146728
            0.88     0.0108690   0.0077170   0.1810719  -2.2627971   0.0168228   0.0589005   0.0139546  -0.1129232   0.0648194  -1.9630667  -0.4138787  -0.0547817   0.0183797   0.0341579
            0.92     0.0090200  -0.1155622  -1.1244787   1.2109517   0.5712824  -0.1400651   0.1542439  -0.1432056  -3.3312314   0.3653175  -0.0176571   0.2603487  -0.0152016   0.0341316
            0.96    -0.1610313   0.0621648  -0.4968398  -0.3631430  -0.3354811   0.0073606   0.0300978  -0.3410671  -4.6382986  -0.0126529  -0.0352070  -0.9603070   0.0393734   0.0720451
            0.98     3.2662378   1.1998048  -4.6183478  -0.0487142  -6.3431316  -43.5042558   0.5033912   5.3029537  -0.7210779   0.1655457  -0.2218565  -0.0094548   0.0705906   0.1433240
            1.01    -0.1074835  -0.0433945  -0.0250776  -0.2627074  -0.0254090   0.0870402   0.0086898   0.0116423   0.0143166  -0.0406458  -0.0193141  -0.0077730   0.0090920   0.4178595
        </tableData>
        <tableData breakPoint="-5.0">
                   -10.0        -5.0         0.001         5.0        10.0        12.5        15.0        17.5        20.0        25.0        30.0        40.0        50.0        60.0
            0.2      0.0397008   0.0818170  -0.0219506  -0.2481864  -0.0186202  -0.0084748  -0.0452425   0.0168954  -0.0462063  -0.2262580  -0.0777162  -0.0706463  -0.1975177  -0.0446219
            0.6      0.0465068   0.0987848  -0.3150477   0.4822935  -0.5190742  -0.0085899  -0.1578296  -0.0012063  -0.0684172  -0.1955079  -0.4903441   0.9847233  -0.0514879  -0.0222420
            0.88     0.0850297   0.1396440   0.0707837  -0.9729629  -1.0794474  -0.0498135  -0.0369777   0.7779470  -0.0348741   0.5154286  -0.2472010   0.2018607   0.0004290   0.0176279
            0.92     0.1206036   0.0291233  -0.6625224   0.1833469   0.2924892   0.0096780   0.5375391   0.1191398   0.0079751   0.6906824   0.2335811  -2.71e-050   0.0098992   0.0343206
            0.96    -0.0499464   0.0451479   0.3249819  -0.6845951  -0.2962822   0.1510749   0.2322944   0.9796757  -2.4932545   0.7145048   0.2203276   0.4340541   0.0225362   0.0741191
            0.98     5.6751451  -0.1723860  -0.9704253   0.9436792  -0.9607664   2.5905794  -4.0047361  -0.6028679  -0.1366806   0.2464305   0.0904075   0.2970619   0.0804012   0.1433425
            1.01    -0.1302322  -0.2163628  -0.1478159  -0.1114914   0.0459719  -0.0911260  -0.0028893   0.0936661  -0.0692282   0.0190907  -0.0007760   0.0016512   0.1858774   0.1308782
        </tableData>
        <tableData breakPoint="0.0">
                   -10.0        -5.0         0.001         5.0        10.0        12.5        15.0        17.5        20.0        25.0        30.0        40.0        50.0        60.0
            0.2      0.0396109   0.0777822   0.1082629   0.0303111  -0.0347832  -0.0317350  -0.0219311  -0.0779864  -0.0588895  -0.1165473  -0.0993523  -0.0651188  -0.0507802  -0.0508051
            0.6      0.0117120   0.1036711   0.1831782   0.4014963  -0.0131391   0.0802122  -0.1373399   0.0042121  -0.0406605  -0.1393995  -0.1326570  -0.0649290  -0.0492176  -0.0118417
            0.88     0.1325744   0.2701472   0.5582629  -0.1786490   0.0199876  -0.5176813  -0.0510367  -0.0271595  -0.0115239  -0.2027428   0.0411841  -0.0697918   0.0084786   0.0418414
            0.92     0.1889651   0.4313031   0.6536123   0.3896317  -0.7156674   0.5860010  -0.0053816   0.0273020  -0.3096718  -0.1815688   0.0144417  -0.0039034   0.0144480   0.0373998
            0.96     0.5642265   1.1222995   1.8279577   0.5277667  -0.1050219   0.0754500  -0.1440375  -0.0763155   0.6946059  -0.2616990   0.0625253  -0.0050239   0.0389663   0.0483153
            0.98     0.5415815  -1.0971052  -0.9304965   0.1458668  -0.3183948  -0.2128039   0.0556541   0.0209808  -1.3056950  -0.1136809   0.0613018  -0.0077654   0.0877599   0.2126456
            1.01    -0.1341542  -0.2318219  -0.5752275  -0.6910837  -0.6710866  -0.0065068  -0.0013920   0.1688238   0.4082186   0.9758613  -0.4546885   0.2128329  -0.4318191  -0.3432545
        </tableData>
        <tableData breakPoint="5.0">
                   -10.0        -5.0         0.001         5.0        10.0        12.5        15.0        17.5        20.0        25.0        30.0        40.0        50.0        60.0
            0.2      0.0404265   0.0836684  -0.1719733  -0.6280079  -1.0005835   0.0176956   0.0072552   0.0282115  -0.2248092  -0.0567264  -0.2134655  -0.0245521   0.4655032  -0.0355319
            0.6      0.0491438   0.1003377  -0.2631555  -0.1663582  -0.0807242  -0.1518760  -0.1143205  -0.2077662  -0.1639048  -0.6747771  -0.0171959  -0.0704094  -0.0991006  -0.0289410
            0.88     0.0848885   0.1959102   0.0232460   0.6677019   3.0429241  -0.0364656  -0.0226396   0.6017226  -0.9362516  -0.5816438  -0.3383002   0.3148545   0.0061931   0.0293437
            0.92     0.1217405   0.1663732  -0.0070582  -0.2219347   0.1191234  -0.0066079  -0.1556937   0.0042976  -0.2793366  -0.0064256  -0.5829285  -0.0245757   0.0172490   0.0245112
            0.96     0.0615240  -0.0505025   0.4923422   0.0089882  -7.1207803  -3.2438492  -0.5479344  -1.1282798   2.0239877  -0.9534054  -0.2946889  -0.6778889   0.0436191   0.0843300
            0.98     0.0990686   0.0177046   1.1307905  -2.3628259  -0.7567642  -3.0792149   6.4344536   1.3111633  -0.2869327  -0.2384097   0.1153806   0.2466308   0.0844782   0.1489579
            1.01    -0.1153161  -0.1832365  -0.2210153   0.0505809   0.0025257  -0.1982219  -0.0745099   0.2601474  -0.0442911   0.1214568  -0.0058200   0.0185059   0.1220356   0.1809418
        </tableData>
        <tableData breakPoint="10.0">
                   -10.0        -5.0         0.001         5.0        10.0        12.5        15.0        17.5        20.0        25.0        30.0        40.0        50.0        60.0
            0.2      0.0250110  -0.0052620  -0.2650835  -0.0032173  -0.0039385   0.0022355  -0.0219523  -0.0378226  -0.0449266  -0.0001204  -0.0646866  -0.1291062  -0.1179748   0.0090381
            0.6      0.0153690  -3.1e-0600  -0.1723691  -0.1466411   0.0739617  -0.0126000   0.1617904   0.0448752  -0.0403455  -0.0035423   0.0319157  -0.0710889  -0.1086768   0.0804630
            0.88     0.0110341   0.0073502  -0.4026502  -0.0912639   0.1775528  -0.0199045   0.1040595  -0.0706234   0.1275838   0.9226012  -0.1632991  -0.0842565   0.0196731   0.0460292
            0.92     0.0149263  -0.0496824   0.8244658  -1.2645949   0.4579434  -0.1585277  -0.0341421   1.4626158  -0.0040533  -0.1254511   0.3368090   0.1677798  -0.0334838   0.0300903
            0.96    -0.2571179  -0.3979296  -0.0130202   0.1620419  -0.5802363   0.1018502  -0.3417147  -0.0294942  -909.7334944  -0.0648395  -0.1102918   2.1638429   0.0517438   0.1806726
            0.98    -1.3410137  -0.9099725  -8.9825200  -1.5742768   5.9517829   3.0770128   0.9911123  -2.1703842  -0.1055870  -0.0909337  -0.1174552   0.3386637   0.1151640   0.1942252
            1.01    -0.0906027  -0.1132831  -0.0148527   0.4164570  -0.0238072   0.0181188   0.0144703  -0.0579504  -0.0312819  -0.0430953  -0.0243803  -0.0119074   0.0731997   0.2528816
        </tableData>
      </table>
    </product>
  </function>

  <function name="aero/s/cfyr">
    <description>Side force due to yaw rate</description>
    <product>
      <property>aero/rb</property>
      <table>
        <independentVar lookup="row">velocities/mach</independentVar>
        <independentVar lookup="column">aero/alpha-deg</independentVar>
        <independentVar lookup="table">aero/beta-deg</independentVar>
        <tableData breakPoint="-10.0">
                   -10.0        -5.0         0.001         5.0        10.0        12.5        15.0        17.5        20.0        25.0        30.0        40.0        50.0        60.0
            0.2      0.2429775   0.0974873   0.2916947   0.5663957   0.1708131   0.2321392   0.1832586   0.2096568   0.0084314   0.0393353  -0.1509605   0.9073606   7.9720681   0.9149624
            0.6      0.2542362  -0.1251267   0.1280151  -0.0133963   0.0945976   0.2001292   0.1428861   0.1585613   0.0424504  -0.0473548  -0.4987097   0.1314769  -0.7468616   0.5396213
            0.88     0.2252776   0.1663964   0.6625064  -0.0076458  -0.0056812   0.0204624   0.2650720  -0.0686575   0.9234726  -0.0141934   0.2154980   0.4006471   0.1814545  -0.0120655
            0.92     0.0823946   0.0199334  -0.3449714   1.0203980   0.4358563  -0.2884737   0.9190620   1.0259596   0.7122826   1.0358481   0.1267840   0.6196483   0.3240540   0.3869810
            0.96    -0.0412353   0.7831250   0.0255237  -1.1655956   0.2811350   1.4815978   0.2398602   0.1110296  -4.4267208  -0.5273806  -0.1803318  -0.3980731   0.1282404   0.2014962
            0.98     2.0396174   0.1067550   9.8391061   10.7085815  -5.0235076  -39.1033577  -4.5525987   0.9618482   3.2637757   6.8594762  -1.3622861   0.7758662  -0.1477525   0.0004005
            1.01     0.2637927   0.2752994   0.2891099   0.1265832   0.3033708   0.4523169   0.4002884   0.5018596   0.5123398   1.1448459   0.4553801   0.1398152   0.1933621   0.8539945
        </tableData>
        <tableData breakPoint="-5.0">
                   -10.0        -5.0         0.001         5.0        10.0        12.5        15.0        17.5        20.0        25.0        30.0        40.0        50.0        60.0
            0.2      0.5190639   0.6228900   0.2272462   0.4615440   0.6534505   0.3867729   0.3170246   0.5099944   1.1104433   0.3127880   0.5501917   0.8848072   0.1186569   0.4744752
            0.6      0.5272502   0.5134122  -0.0586692   0.3918899   0.5838858   0.3420468   0.2234906   0.0747288   0.8745974   0.2456669   0.2360447   1.2151589   0.6441156   0.5051544
            0.88     0.5276815   0.2085959   0.0984914  -0.0185659  -0.0767285   0.3895025   0.2762159   0.4747647   1.5606330  -0.3314450  -0.1969232   0.4754112   0.7081096   0.5963536
            0.92     0.3705901  -0.1118361  -0.4453896  -0.1942326   0.7972652   0.5337682   0.5587231   1.1028065   0.4080753   1.2390934  -2.0490983   0.7528352   0.7249802   0.7173836
            0.96    -0.5317876  -0.0566432   0.0316457   0.7474663   0.3166692   1.5967709   0.4471318  -6.6594149  -0.5160806   1.4844844   0.1564626   0.6065845   0.8232012   0.7518064
            0.98    -0.1614438   0.0902069  -0.0012212   0.6134027  -0.2924983   5.9119714  -3.5614038  -1.4960660   2.3893715   0.5784609   0.8957050   0.8210111   0.7721503   0.6816682
            1.01     0.3877900   0.4334854   0.5954651   0.1862684  -0.2943088  -0.2460693  -0.0592826  -0.3735856  -0.0735604   0.0239916   0.1824982   0.0817464   0.7025676   0.5740263
        </tableData>
        <tableData breakPoint="0.0">
                   -10.0        -5.0         0.001         5.0        10.0        12.5        15.0        17.5        20.0        25.0        30.0        40.0        50.0        60.0
            0.2      0.5398547   0.6388749   0.9567013   0.4393906   0.5432943   0.5875609   0.6942313   0.6351904   0.5577566   0.5647474   0.3854717   0.5211471   0.2945341   0.3606778
            0.6      0.5956114   0.7313781   1.1369816   1.0560463   0.6973484   0.7457580   0.7631857   0.7487411   0.1878889   0.3830784   0.4477703   0.2081474   0.5354311   0.4085582
            0.88     0.8406041   1.1849194   1.1679973   0.2363895   0.5377053   0.8889687   0.8381944   0.1261051   0.7389249   0.4541968   0.6809688  -0.1373460   0.5862324   0.5098898
            0.92     1.0530647   1.2075891   1.0644019  -0.0878068   0.1441908   0.3849531   0.7121823   0.5683205  -0.2269371   0.4023530   0.4768138  -0.4469412   0.6543021   0.5799599
            0.96     1.1802080   1.1341203   0.4134618   0.1582819   0.1156104   0.6190800  -0.2147795  -1.2479733   1.6360616   0.3281142   0.2278781   0.0004208   0.8308217   0.7227972
            0.98     0.9286092   0.8358627  -0.8002041   0.5547996   0.1189450   0.5936354   0.7292223   1.1394037   1.0972551   0.7476459   0.2657790  -0.3641117   0.9000915   0.8959880
            1.01    -0.1290582  -0.3227534  -0.4813678   0.4165125   0.4769825   0.4030662   0.0059081  -0.0642620  -0.1573634  -0.2775380   0.4334422   1.0615265   0.6534731   0.3103529
        </tableData>
        <tableData breakPoint="5.0">
                   -10.0        -5.0         0.001         5.0        10.0        12.5        15.0        17.5        20.0        25.0        30.0        40.0        50.0        60.0
            0.2      0.5624829   0.6852180   0.6080192   0.2575206  -0.5020432   0.5940792   0.7554934   0.5747914   0.2094750   0.3366034   0.6234373  -0.1510755   0.3757948   0.3822686
            0.6      0.6203949   0.7753673   0.8962195   0.7761382   0.6763321   0.8258439   0.7847266   0.2813532   0.1330522   0.1864675   0.4496428  -0.4203084   0.4590229   0.3633325
            0.88     0.8607673   1.2261357   1.2478418   1.1432487   3.1035279   1.2101646   0.8294332   0.8487511   0.0436883  -0.3621224   0.5770819  -0.1261867   0.4071945   0.4810277
            0.92     1.0801825   1.5282714   1.2571444   0.2044716  -0.4460227   1.0874695   0.8718794   0.4038103  -0.9932626  -0.6385003   0.1851796  -0.3877906   0.4731943   1.0275362
            0.96     1.7942430   2.1581852   0.2553651   1.0387383  -0.3752114  -0.8759296   1.1372994   0.5062023   1.0565280  -0.7667085  -0.0214026  -0.3296647   0.5163682   0.4577764
            0.98     1.4495381   0.4308743   0.8767714  -1.2063138  -0.1180780  -2.9783532   6.8336325   0.2941841   3.6847524   0.0685231   0.0791820  -0.4677269   0.6005197   0.9757458
            1.01    -0.1351167  -0.3361083  -0.3799119   0.1903612   1.5264146   0.6232578   0.2126470   0.5954495   0.3065246   0.6710051   0.3347224   1.4438809  -0.2183010  -0.0740539
        </tableData>
        <tableData breakPoint="10.0">
                   -10.0        -5.0         0.001         5.0        10.0        12.5        15.0        17.5        20.0        25.0        30.0        40.0        50.0        60.0
            0.2      0.5369267   0.5584598  -0.4607799   0.1287923   0.9697140   1.1435641   0.4045896   0.2983343   0.2789748   0.2368915   0.5671410  -0.1905521   0.4991067   0.2093979
            0.6      0.5293442   0.4400424  -0.1335024   0.9561499   1.3870985   0.3517388   0.2775631   0.3733863   1.0876815   0.3143645   0.5504138   0.1825454   0.4698798   0.4456856
            0.88     0.4742963   0.2758935  -0.6441032   0.7443679   1.4563205   0.3035428   0.6163367   0.3723385  -0.1785558   1.1033222   0.0177652   0.3498423   0.6471442   0.4434927
            0.92     0.4401360   0.0990540   0.2552553  -0.9803230   0.4187445   0.5965375  -0.7905787  -0.6293593   0.5659576  -0.8490678  -0.3524567  -0.3168774   0.7164929   0.6676723
            0.96    -0.2534145  -1.2196328   0.4522745   0.8027885   1.0314666   0.0359596   0.1956188  -0.3680136   16.6266567   0.8727545  -0.1036424   2.2165373   0.8803088   0.7585387
            0.98    -0.2049647  -1.2248440  -1.0038702  -0.5689492   3.2533341   3.7547692   0.3743952  -4.0128732   0.1468048  -0.5387557   0.6332755   0.3991872   0.7994790   0.7307291
            1.01     0.3936484   0.4211446   0.5952610   0.2623718  -0.1888912  -0.1456774   0.0498585   0.0949860   0.0167423   0.1164519   0.1456453   0.1515493   0.9729679   0.4473347
        </tableData>
      </table>
    </product>
  </function>


    <function name="aero/force/CL">
	<sum>
	    <property>aero/CL_base</property>
	    <property>aero/CL_elevator</property>
	    <property>aero/CL_right-flaperon</property>
	    <property>aero/CL_left-flaperon</property>
	    <property>aero/CL_slats</property>
	    <property>aero/CL_flaps</property>
	</sum>
    </function>

    <axis name="LIFT">

	<function name="aero/force/Lift_combined">
	    <description>Lift due to alpha</description>
	    <product>
		<property>aero/qbar-psf</property>
		<property>metrics/Sw-sqft</property>
		<product>
		    <property>aero/force/CL</property>
		    <difference>
			<value>1</value>
			<product>
			    <property>fcs/wing-fold/wing-fold-pos</property>
			    <value>0.9</value>
			</product>
		    </difference>
		</product>
	    </product>
	</function>

	<function name="aero/force/Lift_pitch_rate">
	    <description>Lift due to pitch rate</description>
	    <product>
		<property>aero/qbar-psf</property>
		<property>metrics/Sw-sqft</property>
		<property>velocities/q-aero-rad_sec</property>
		<property>aero/ci2vel</property>
		<value> 4.2695 </value>
	    </product>
	</function>

	<function name="aero/force/Lift_alpha_rate">
	    <description>Lift due to alpha rate</description>
	    <product>
		<property>aero/qbar-psf</property>
		<property>metrics/Sw-sqft</property>
		<property>aero/alphadot-rad_sec</property>
		<property>aero/ci2vel</property>
		<value> 2.3362 </value>
	    </product>
	</function>

    </axis>

    <function name="aero/force/CDtot">
	<sum>
	    <property>aero/CDtot_base</property>
	    <property>aero/CDtot_elevator</property>
	    <property>aero/CDtot_right-flaperon</property>
	    <property>aero/CDtot_left-flaperon</property>
	    <property>aero/CDtot_slats</property>
	    <property>aero/CDtot_flaps</property>
	</sum>
    </function>

    <axis name="DRAG">

	<function name="aero/force/Drag_combined">
	    <description>Drag at zero lift</description>
	    <product>
		<property>aero/qbar-psf</property>
		<property>metrics/Sw-sqft</property>
		<property>aero/force/CDtot</property>
		<!-- manual drag correction to match level acceleration
		     performance -->
		<interpolate1d>
		    <property>velocities/mach</property>
		    <value>0</value><value>0.85</value>
		    <value>0.8</value><value>0.85</value>
		    <value>0.83</value><value>1.02</value>
		</interpolate1d>
	    </product>
	</function>

	<function name="aero/force/CD_stores">
	    <product>
		<property>aero/qbar-psf</property>
		<sum>
		    <product>
			<property>aero/cd_p1</property>
			<property>aero/eda_p1</property>
		    </product>
		    <product>
			<property>aero/cd_p2</property>
			<property>aero/eda_p2</property>
		    </product>
		    <product>
			<property>aero/cd_p3</property>
			<property>aero/eda_p3</property>
		    </product>
		    <product>
			<property>aero/cd_p4</property>
			<property>aero/eda_p4</property>
		    </product>
		    <product>
			<property>aero/cd_p5</property>
			<property>aero/eda_p5</property>
		    </product>
		</sum>
	    </product>
	</function>

	<function name="aero/force/Drag_gear">
	    <description>Drag due to gear</description>
	    <product>
		<property>aero/qbar-psf</property>
		<property>metrics/Sw-sqft</property>
		<property>gear/gear-pos-norm</property>
		<value> 0.0200 </value>
	    </product>
	</function>

	<function name="aero/force/Drag_speedbrake">
	    <description>Drag due to speedbrakes</description>
	    <product>
		<property>aero/qbar-psf</property>
		<property>metrics/Sw-sqft</property>
		<property>fcs/speedbrake-pos-norm</property>
		<value> 0.0800 </value>
	    </product>
	</function>

    </axis>

    <function name="aero/force/CS">
	<sum>
	    <property>aero/CS_base</property>
	    <property>aero/CS_flaps</property>
	    <property>aero/s/cfyp</property>
	    <property>aero/s/cfyr</property>
	    <!-- <product> -->
	    <!-- 	<property>aero/CS_rudder</property> -->
	    <!-- 	<value>1</value> -->
	    <!-- </product> -->
	</sum>
    </function>

    <axis name="SIDE">

	<function name="aero/force/Side_combined">
	    <description>Side force</description>
	    <product>
		<property>aero/qbar-psf</property>
		<property>metrics/Sw-sqft</property>
		<property>aero/force/CS</property>
	    </product>
	</function>

    </axis>

    <function name="aero/moment/CMy">
	<sum>
	    <property>aero/CMy_base</property>
	    <property>aero/CMy_elevator</property>
	    <property>aero/CMy_flaps</property>
	    <property>aero/CMy_slats</property>
	    <property>aero/s/cmmq</property>
	    <property>aero/s/cmma</property>
	</sum>
    </function>

    <axis name="PITCH">

	<function name="aero/moment/Pitch_combined">
	    <description>Pitch moment due to alpha</description>
	    <product>
		<property>aero/qbar-psf</property>
		<property>metrics/Sw-sqft</property>
		<property>metrics/cbarw-ft</property>
		<property>aero/moment/CMy</property>
	    </product>
	</function>
    </axis>

    <function name="aero/moment/CMx">
	<sum>
	    <property>-aero/CMx_base</property>
	    <property>-aero/s/cmlr</property>
	    <product>
		<sum>
		    <property>aero/CMx_rudder</property>
		    <property>aero/CMx_left-flaperon</property>
		    <property>aero/CMx_right-flaperon</property>
		    <property>aero/s/cmlp</property>
		</sum>
		<value>-1</value>
	    </product>
	</sum>
    </function>

    <axis name="ROLL">

	<function name="aero/moment/Roll_combined">
	    <description>Roll moment</description>
	    <product>
		<property>aero/qbar-psf</property>
		<property>metrics/Sw-sqft</property>
		<property>metrics/bw-ft</property>
		<property>aero/moment/CMx</property>
	    </product>
	</function>
    </axis>

    <function name="aero/moment/CMz">
	    <product>
		<sum>
		    <!-- <property>aero/CMz_base</property> -->
		    <property>aero/CMz_rudder</property>
		    <!-- <property>aero/s/cmnp</property> -->
		    <property>aero/s/cmnr</property>
		    <property>aero/CMz_left-flaperon</property>
		    <property>aero/CMz_right-flaperon</property>
		</sum>
		<value>-1</value>
	    </product>
    </function>

    <axis name="YAW">

	<function name="aero/moment/Yaw_combined">
	    <description>moment</description>
	    <product>
		<property>aero/qbar-psf</property>
		<property>metrics/Sw-sqft</property>
		<property>metrics/bw-ft</property>
		<property>aero/moment/CMz</property>
	    </product>
	</function>

	<function name="aero/moment/Yaw_damp">
	    <description>Yaw moment due to yaw rate</description>
	    <product>
		<property>aero/qbar-psf</property>
		<property>metrics/Sw-sqft</property>
		<property>metrics/bw-ft</property>
		<property>aero/bi2vel</property>
		<property>velocities/r-aero-rad_sec</property>
		<value>-0.2</value>
	    </product>
	</function>

      	<function name="aero/moment/Yaw_beta">
	    <description>Yaw moment due to beta</description>
	    <product>
		<property>aero/qbar-psf</property>
		<property>metrics/Sw-sqft</property>
		<property>metrics/bw-ft</property>
		<property>aero/beta-rad</property>
		<value>0.1926</value> <!-- 0.1626 -->
	    </product>
	</function>

	<function name="aero/moment/Yaw_stores">
	    <product>
		<property>aero/qbar-psf</property>
		<value>0.08333333</value> <!-- in to ft conversion for arm -->
		<sum>
		    <product>
			<property>aero/cd_p1</property>
			<property>aero/eda_p1</property>
			<property>inertia/pointmass-location-Y-inches</property>
		    </product>
		    <product>
			<property>aero/cd_p2</property>
			<property>aero/eda_p2</property>
			<property>inertia/pointmass-location-Y-inches[1]</property>
		    </product>
		    <product>
			<property>aero/cd_p3</property>
			<property>aero/eda_p3</property>
			<property>inertia/pointmass-location-Y-inches[2]</property>
		    </product>
		    <product>
			<property>aero/cd_p4</property>
			<property>aero/eda_p4</property>
			<property>inertia/pointmass-location-Y-inches[3]</property>
		    </product>
		    <product>
			<property>aero/cd_p5</property>
			<property>aero/eda_p5</property>
			<property>inertia/pointmass-location-Y-inches[4]</property>
		    </product>
		</sum>
	    </product>
	</function>

	<function name="aero/moment/Yaw_alpha">
	    <description>Yaw moment due to alpha</description>
	    <product>
		<property>aero/qbar-psf</property>
		<property>metrics/Sw-sqft</property>
		<property>metrics/bw-ft</property>
		<property>aero/alpha-rad</property>
		<table>
		    <independentVar lookup="row">aero/beta-rad</independentVar>
		    <independentVar lookup="column">aero/Re</independentVar>
		    <tableData>
                        8639072  9502980
			-0.3491  -0.9880   0.0000
			0.3491   0.9880   0.0000
		    </tableData>
		</table>
		<value>0.1674</value>
	    </product>
	</function>

	<!-- <function name="aero/moment/Yaw_roll_rate"> -->
	<!--     <description>Yaw moment due to roll rate</description> -->
	<!--     <product> -->
	<!-- 	<property>aero/qbar-psf</property> -->
	<!-- 	<property>metrics/Sw-sqft</property> -->
	<!-- 	<property>metrics/bw-ft</property> -->
	<!-- 	<property>aero/bi2vel</property> -->
	<!-- 	<property>velocities/r-aero-rad_sec</property> -->
	<!-- 	<value>-1.1</value> -->
	<!--     </product> -->
	<!-- </function> -->

    </axis>
</aerodynamics>
