<?xml version="1.0"?>

<!--
File:     J52-P8.xml
Author:   AeromatiC++ v 3.3.0

See: http://wiki.flightgear.org/JSBSim_Engines#FGTurbine

Inputs:
name:                    J52-P8
type:                    Turbine Engine
thrust:                  8700.0 lbf
bypass ratio:            1.000:1
overall pressure ratio:  14.6:1
augmented?               no
injected?                no

Outputs
tsfc:                    0.8
engine weight:           1794.4 lbs
engine length:           6.8 ft
engine diameter:         3.8 ft
-->

<turbine_engine name="J52-P8">
    <milthrust> 8700.0 </milthrust>
    <bypassratio>     1.000 </bypassratio>
    <tsfc>            0.760 </tsfc>
    <bleed>           0.03</bleed>
    <idlen1>         30.0 </idlen1>
    <idlen2>         60.0 </idlen2>
    <maxn1>         100.0 </maxn1>
    <maxn2>         100.0 </maxn2>
    <augmented>         0 </augmented>
    <injected>          0 </injected>

    <function name="IdleThrust">
	<table>
	    <independentVar lookup="row">velocities/mach</independentVar>
	    <independentVar lookup="column">atmosphere/density-altitude</independentVar>
	    <tableData>
		-10000     0     10000   20000   30000   40000   50000   60000
		0.0  0.0430  0.0488  0.0528  0.0694  0.0899  0.1183  0.1467  0
		0.2  0.0500  0.0501  0.0335  0.0544  0.0797  0.1049  0.1342  0
		0.4  0.0040  0.0047  0.0020  0.0272  0.0595  0.0891  0.1203  0
		0.6 -0.0804 -0.0804 -0.0560 -0.0237  0.0276  0.0718  0.1073  0
		0.8 -0.2129 -0.2129 -0.1498 -0.1025  0.0474  0.0868  0.0900  0
		1.0 -0.2839 -0.2839 -0.1104 -0.0469 -0.0270  0.0552  0.0800  0
	    </tableData>
	</table>
    </function>

    <function name="MilThrust">
	<table>
	    <independentVar lookup="row">velocities/mach</independentVar>
	    <independentVar
		lookup="column">atmosphere/density-altitude</independentVar>
	    <!--
	    <tableData>
		-10000       0   10000   20000   30000   40000   50000   60000
		0.0  1.2600  1.0000  1.0000  0.5340  0.3720  0.2410  0.1490  0.0000
		0.2  1.1491  0.9965  0.9965  0.4965  0.3484  0.2267  0.1403  0.0000
		0.4  1.1070  0.9850  0.9850  0.4871  0.3436  0.2243  0.1396  0.0000
		0.6  1.1147  0.9676  0.9676  0.5022  0.3568  0.2341  0.1454  0.0000
		0.8  1.1639  0.7900  0.7900  0.5385  0.3858  0.2544  0.1573  0.0000
		1.0  1.2410  0.6513  0.6513  0.5901  0.4306  0.2855  0.1768  0.0000
		1.1  0.0000  0.0000  0.0000  0.0000  0.0000  0.0000  0.0000  0.0000
	    </tableData>
	    -->
	    <tableData>
		-10000       0   10000   20000   30000   40000   50000   60000
		0.00  1.2600  1.0000  1.0000  0.5340  0.3720  0.2410  0.1490  0.0000
		0.20  1.1491  0.9995  0.9995  0.4965  0.3484  0.2267  0.1403  0.0000
		0.40  1.1070  0.9375  0.9995  0.4871  0.3436  0.2243  0.1396  0.0000
		0.50  1.1070  0.8025  0.9995  0.4871  0.3436  0.2243  0.1396  0.0000
		0.60  1.1147  0.9100  0.7500  0.5022  0.3568  0.2341  0.1454  0.0000
		0.70  1.1147  0.8750  0.7500  0.5022  0.3568  0.2341  0.1454  0.0000
		0.75  1.1147  0.7643  0.6475  0.5022  0.3568  0.2341  0.1454  0.0000
		0.80  1.1639  0.6535  0.5450  0.5385  0.3858  0.2544  0.1573  0.0000
		0.85  1.1639  0.7000  0.5450  0.5385  0.3858  0.2544  0.1573  0.0000
		0.90  1.1639  0.6500  0.0000  0.5385  0.3858  0.2544  0.1573  0.0000
		1.00  1.2410  0.0000  0.0000  0.5901  0.4306  0.2855  0.1768  0.0000
	    </tableData>
	</table>
    </function>

</turbine_engine>
